# GLAPOR Schaumglas

Dataset: ILCD process, EPD, specific dataset
Geography: DE
Reference year: 2017
Valid until: 2022
Classification: OEKOBAU.DAT: Dämmstoffe / Schaumglas / Platten
Classification: IBUCategories: 02 Bauprodukte / Wärmedämmungsprodukte / Mineralische Dämmstoffe
Method details: Mineralische Dämmstoffe.pdf
Registration number: 10314
Owner: GLAPOR Werk Mitterteich GmbH
Compliance: DIN EN 15804; ISO 14025
Review: Accredited third party review by Institut Bauen und Umwelt e. V.
Amounts: rows without a unit in brackets have none in this file; such an amount is in the reference unit of its flow, which a separate flow dataset defines
copyright: true

## General comment
GLAPOR Schaumglasplatten / Schaumglasprodukte sind dampfdichte, leichte Dämmstoffe für die Bauindustrie und bestehen zu 100 % aus Recyclingglas. Durch die Kombination der physikalischen Eigenschaften von Glas mit den Dämmeigenschaften einer geschlossenen Zellstruktur bieten GLAPOR Schaumglasprodukte eine hohe Druckfestigkeit, sind leicht, nicht brennbar und schädlingssicher. Der permanente, kontinuierliche Produktionsprozess garantiert eine gleichbleibend hohe Qualität.

Diese EPD gilt für die GLAPOR Schaumglasplatten:
GLAPOR Schaumglasplatten PG 600 (110 kg/m3)

Die LCA-Daten können über die spezifischen Dichten auf andere Produkte hochgerechnet werden, insbesondere bei:
GLAPOR Schaumglasplatten PG 900.2 (135 kg/m3)
GLAPOR Schaumglasplatten PG 1000 (135 kg/m3)

## Technology and included processes
GLAPOR Schaumglasplatten sind eine vielfältig einsetzbare Wärmedämmung für den Hochbau und verschiedene Sondereinsatzgebiete. Sie werden aus 100 % Recyclingglas und Aktivatoren aufgeschäumt. Zur Produktpalette gehören Flachplatten, Gefälleplatten, Dachreiter und konfektionierte Sonderbauteile. Es werden Schaumglasplatten mit unterschiedlichen Druckfestigkeiten und Wärmeleitfähigkeiten in Dämmdicken von 30 – 150 mm hergestellt. Glapor Schaumglasplatten sind geschlossenzellig, baupraktisch dampfdicht und stauchungsfrei und nicht brennbar.
Deklarierte Einheit:
Die Deklaration gilt für 1 m3 GLAPOR Schaumglas mit einer Dichte von 120 kg/m3, einer typischen Dicke von 160 mm und einer Wärmeleitfähigkeit von 0,054 W/(mK) (Quelle: Fraunhofer 2017).

## Technical purpose
GLAPOR Schaumglasplatten finden in vielen anspruchsvollen Einsatzgebieten eine Verwendung.

Von der Leichtbaukonstruktionen einer behindertengerechten Rampe, bis zum hochbelasteten Hubschrauberlandeplatz ist Schaumglas immer eine gute Wahl.

Die Anwendungen für den Einsatz in Hochbauprojekten sind in der Anwendungsnorm DIN 4108-10 geregelt. Darüber hinaus finden die Schaumglasplatten in Tiefbau- und Leichtkonstruktionen sowie technischer Isolierung Verwendung.

Diese Anwendungen umfassen in:

Hochbauanwendungen:

•ungenutzte, genutzte, begehbare und befahrbare Flachdächer

•Innendämmung von Decke und Wand

•Innendämmsysteme unter Estrich und sonstigen Bodenkonstruktionen

•Fassadendämmsysteme unter Bekleidungen, Wärmebrückenelemente sowie Sockeldämmung und Brandriegel

•Perimeterdämmung für Wände und unter Bodenplatten

Industriegebäuden: Technische Isolierung

•Frischwasserbehälter

•Lüftungskanäle und Lüftungsanlagen

Öffentlichen Gebäuden: Sonderanwendungen

•Behindertengerechtes Bauen

•Radonsicherheit durch Schaumglaskonstruktionen

•Leichtkonstruktionen

Nähere Informationen zur Anwendung von GLAPOR Schaumglas sind unter www.glapor.de zu finden.

## Scenarios
- S1: Recycling zu Schaumglasschotter
- S2: Deponierung

## Reference product
- GLAPOR Schaumglas / pro m³ (120 kg/m³): 1

## Inputs
- Erneuerbare Primärenergie als Energieträger (PERE) [MJ]: A1-A3 130, A4 0.408, A5 0.00227, C2 (S1) 0.408, C2 (S2) 0.0583, C3 0.953, C4 0, D (S1) -5.19, D (S2) -0.935
- Erneuerbare Primärenergie zur stofflichen Nutzung (PERM) [MJ]: A1-A3 0, A4 0, A5 0, C2 (S1) 0, C2 (S2) 0, C3 0, C4 0, D (S1) 0, D (S2) 0
- Total erneuerbare Primärenergie (PERT) [MJ]: A1-A3 130, A4 0.408, A5 0.00227, C2 (S1) 0.408, C2 (S2) 0.0583, C3 0.953, C4 0, D (S1) -5.19, D (S2) -0.935
- Nicht-erneuerbare Primärenergie als Energieträger (PENRE) [MJ]: A1-A3 1430, A4 71.9, A5 29.2, C2 (S1) 71.9, C2 (S2) 10.3, C3 13.1, C4 0, D (S1) -24, D (S2) -20.4
- Nicht-erneuerbare Primärenergie zur stofflichen Nutzung (PENRM) [MJ]: A1-A3 29.2, A4 0, A5 -29.2, C2 (S1) 0, C2 (S2) 0, C3 0, C4 0, D (S1) 0, D (S2) 0
- Total nicht erneuerbare Primärenergie (PENRT) [MJ]: A1-A3 1460, A4 71.9, A5 0.0375, C2 (S1) 71.9, C2 (S2) 10.3, C3 13.1, C4 0, D (S1) -24, D (S2) -20.4
- Einsatz von Sekundärstoffen (SM) [kg]: A1-A3 153, A4 0, A5 0, C2 (S1) 0, C2 (S2) 0, C3 0, C4 0, D (S1) 0, D (S2) 0
- Erneuerbare Sekundärbrennstoffe (RSF) [MJ]: A1-A3 0, A4 0, A5 0, C2 (S1) 0, C2 (S2) 0, C3 0, C4 0, D (S1) 0, D (S2) 0
- Nicht erneuerbare Sekundärbrennstoffe (NRSF) [MJ]: A1-A3 0, A4 0, A5 0, C2 (S1) 0, C2 (S2) 0, C3 0, C4 0, D (S1) 0, D (S2) 0
- Einsatz von Süßwasserressourcen (FW) [m^3]: A1-A3 0.412, A4 0.00205, A5 4.95e-5, C2 (S1) 0.00205, C2 (S2) 0.000293, C3 0.00234, C4 0, D (S1) -0.0591, D (S2) -0.00254

## Outputs
- Gefährlicher Abfall zur Deponie (HWD) [kg]: A1-A3 0.00158, A4 1.57e-5, A5 4.09e-7, C2 (S1) 1.57e-5, C2 (S2) 2.24e-6, C3 2.7e-5, C4 0, D (S1) -3.34e-5, D (S2) -3.17e-5
- Entsorgter nicht gefährlicher Abfall (NHWD) [kg]: A1-A3 0.00105, A4 2.36e-5, A5 3.04e-9, C2 (S1) 2.36e-5, C2 (S2) 3.38e-6, C3 1.74e-7, C4 0, D (S1) -5.98e-7, D (S2) -1.76e-7
- Entsorgter radioaktiver Abfall (RWD) [kg]: A1-A3 0.0068, A4 0.00109, A5 2e-7, C2 (S1) 0.00109, C2 (S2) 0.000156, C3 6.97e-5, C4 0, D (S1) -0.000128, D (S2) -8.71e-5
- Komponenten für die Wiederverwendung (CRU) [kg]: A1-A3 0, A4 0, A5 0, C2 (S1) 0, C2 (S2) 0, C3 0, C4 0, D (S1) 0, D (S2) 0
- Stoffe zum Recycling (MFR) [kg]: A1-A3 0.00629, A4 0, A5 0, C2 (S1) 0, C2 (S2) 0, C3 110, C4 0, D (S1) 0, D (S2) 0
- Stoffe für die Energierückgewinnung (MER) [kg]: A1-A3 0, A4 0, A5 0, C2 (S1) 0, C2 (S2) 0, C3 0, C4 0, D (S1) 0, D (S2) 0
- Exportierte elektrische Energie (EEE) [MJ]: A1-A3 0, A4 0, A5 3.33, C2 (S1) 0, C2 (S2) 0, C3 0, C4 0, D (S1) 0, D (S2) 0
- Exportierte thermische Energie (EET) [MJ]: A1-A3 0, A4 0, A5 6.79, C2 (S1) 0, C2 (S2) 0, C3 0, C4 0, D (S1) 0, D (S2) 0

## Impact indicators
- Globales Erwärmungspotenzial (GWP) [kg CO_(2)-Äq.]: A1-A3 87.3, A4 4.68, A5 1.99, C2 (S1) 4.68, C2 (S2) 0.669, C3 0.662, C4 0, D (S1) -1.37, D (S2) -1.11
- Abbau Potential der stratosphärischen Ozonschicht (ODP) [kg CFC11-Äq.]: A1-A3 9.82e-6, A4 8.96e-7, A5 8.79e-10, C2 (S1) 8.96e-7, C2 (S2) 1.28e-7, C3 3.39e-8, C4 0, D (S1) 1.37e-7, D (S2) -1.06e-7
- Versauerungspotenzial von Boden und Wasser (AP) [kg SO_(2)-Äq.]: A1-A3 0.209, A4 0.0138, A5 2.65e-5, C2 (S1) 0.0138, C2 (S2) 0.00197, C3 0.000944, C4 0, D (S1) -0.00308, D (S2) -0.00142
- Eutrophierungspotenzial (EP) [kg PO_(4)^(3)-Äq.]: A1-A3 0.0686, A4 0.00226, A5 7.79e-6, C2 (S1) 0.00226, C2 (S2) 0.000322, C3 0.000343, C4 0, D (S1) -0.00065, D (S2) -0.000358
- Bildungspotential für troposphärisches Ozon (POCP) [kg Ethen-Äq.]: A1-A3 0.0099, A4 0.000651, A5 4.62e-6, C2 (S1) 0.000651, C2 (S2) 9.3e-5, C3 5.62e-5, C4 0, D (S1) -0.000297, D (S2) -9.44e-5
- Potenzial für den abiotischen Abbau nicht fossiler Ressourcen (ADPE) [kg Sb-Äq.]: A1-A3 7.35e-6, A4 1.13e-7, A5 3.08e-10, C2 (S1) 1.13e-7, C2 (S2) 1.61e-8, C3 1.5e-8, C4 0, D (S1) -2.16e-7, D (S2) -1.47e-8
- Potenzial für den abiotischen Abbau fossiler Brennstoffe (ADPF) [MJ]: A1-A3 1350, A4 71.4, A5 0.033, C2 (S1) 71.4, C2 (S2) 10.2, C3 10.6, C4 0, D (S1) -21.5, D (S2) -18

## Use advice
Gültigkeitsbereich:
Diese EPD bezieht sich auf Schaumglas, das am Produktionsstandort von GLAPOR in Mitterteich, Deutschland, hergestellt wird.
Systemgrenze:
Typ der EPD: Wiege-bis-Werkstor – mit Optionen.

Die Systemgrenze von Modul A1-A3 umfasst alle Prozesse in Verbindung mit der Produktion von Schaumglas. Die Systemgrenze für das recycelte Glas wird nach dem Sortieren der zu recycelnden Glasscherben angesetzt. Innerhalb der Systemgrenzen von A1-A3 werden betrachtet:

· Zerkleinern der recycelten Glasscherben

· Produktion aller Hilfsstoffe

· Stromerzeugung

· Wärmeerzeugung für den Produktionsprozess

· Produktion von Verpackungsmaterial

· sämtliche Transporte, einschließlich dem Transport der Glasscherben zur externen Zerkleinerung und dem Transport der Rohstoffe zur Produktionsstätte.

Beim Herstellungsprozess fällt kein Abwasser an.

Der Prozess erzeugt ca. 30 % Produktionsabfälle, die für die Herstellung von Schaumglasschotter verwendet werden. Dieses Nebenprodukt verlässt den Produktionskreislauf ohne Umweltbelastung.

Es fallen keine anderen Abfälle in maßgeblichen Mengen an.

Modul A4 berücksichtigt das durchschnittliche Transportszenario von der Produktionsstätte zur Baustelle.

Modul A5 umfasst die Entsorgung der PE-Verpackung in einer kommunalen Müllverbrennungsanlage. Die dabei erzeugte Energie wird aus dem Produktsystem abgeführt und die sich daraus ergebenden Vorteile sind Modul D zugeordnet.

Für das Ende des Lebenswegs werden zwei Szenarien deklariert.

Szenario 1: Recycling in Schaumglasschotter

Modul C2/1 beinhaltet ein Standard-Transportszenario (350 km per LKW) des Schaumglases vom Demontageort zum GLAPOR Produktionsstandort (siehe auch Modul A4).

Modul C3/1 beinhaltet den Stromverbrauch bei der Zerkleinerung des ausgebauten Schaumglases zu Schotter mit einer Größe von weniger als 60 mm.

Modul D/1 beinhaltet die Vorteile, die sich durch den Austausch von natürlichem Kies sowie die bei der Behandlung der PE-Verpackung in einer kommunalen Müllverbrennungsanlage rückgewonnene Energie ergeben.

Szenario 2: Deponierung

Modul C2/2 beinhaltet ein Standard-Transportszenario (50 km per LKW) des Schaumglases vom Demontageort zur Deponie für Inertabfälle.

Modul C4/2 beinhaltet die Deponierung des Schaumglases.

Modul D/2 beinhaltet die Vorteile, die sich durch die bei der Behandlung der PE-Verpackung in einer kommunalen Müllverbrennungsanlage rückgewonnene Energie ergeben.

## Data sources
- GLAPOR Schaumglas.pdf
- ecoinvent database (all versions)
- ecoinvent 3.2 database
