# NedZink NOVA, NedZink NOIR

Dataset: ILCD process, EPD, specific dataset
Geography: NL
Reference year: 2015
Valid until: 2020
Classification: OEKOBAU.DAT: Metalle / Zink / Zinkbleche
Classification: IBUCategories: 02 Bauprodukte / Metallbauprodukte und Zubehör / Baumetalle
Method details: Baumetalle.pdf
Owner: NedZink B.V.
Compliance: DIN EN 15804; ISO 14025
Review: Accredited third party review by IBU
Amounts: rows without a unit in brackets have none in this file; such an amount is in the reference unit of its flow, which a separate flow dataset defines
copyright: true

## General comment
Das NedZink® NOVA / NedZink® NOIR Titanzink wird von NedZink gemäß EN 988 hergestellt. Geringe Mengen der Legierungselemente Kupfer, Titan und Aluminium, wie in EN 988 festgelegt, werden zu dem elektrolytisch raffinierten Zink (mit einer Reinheit von mind. 99,995% Zn, Z1 gemäß EN 1179) zugegeben. Die chemische Zusammensetzung, die mechanischen und physikalischen Eigenschaften sowie Messtoleranzen sind im KOMO-Produktzertifikat und dem Produktzertifikat vom Lloyds Register festgelegt, LRIQS (Approval QIS122). Die definierten Materialeigenschaften sind durch ein unabhängiges und neutrales Forschungsinstitut geprüft. Diese Produktzertifizierung und das ISO 9001 Zertifikat für das Qualitätsmanagementsystem bei NedZink garantieren einen konstanten und gleich bleibenden hohen Qualitätsstandard.

NedZink® NOVA ist vorbewittertes Titanzink in einem matten, natürlichen mittelgrauen Farbton. NedZink® NOIR ist vorbewittertes Titanzink in einem anthrazit schwarzen Farbton.

## Technology and included processes
NedZink NOVA; NedZink NOIR ist Titanzink gemäß DIN EN 988. Wesentliche Bestandteile sind hochreines Zink (Feinzink mit einem Reinheitsgrad von 99,995 % Zn – Z1 nach DIN EN 1179) zusammen mit den Legierungselementen Kupfer, Titan und Aluminium. In einem ersten Schritt wird die Vorlegierung separat in einem Induktionsofen vorbereitet. Anschließend wird die Vorlegierung im Schmelzofen mit dem hochreinen Feinzink vermischt. Die fertige Legierung wird nun in einer Vertikalgießanlage in Blöcke gegossen. Diese Blöcke werden gleichmäßig erhitzt und in verschiedenen Schritten warmgewalzt und nach dem Abkühlen auf die gewünschte Materialdicke kaltgewalzt. Zum Schluß erfolgt das Steckrichten und bei Bedarf der Patinierungsprozess zur Herstellung vorbewitterter Oberflächen und die Konfektionierung zu den gewünschten Band- und Tafelabmessungen. Alle eingesetzten Verpackungsmaterialien (Holz, Papier/Pappe und PE-Folien) sind wiederverwendbar oder recycelbar. Das Verpackungsrecycling ist in dieser Studie nicht berücksichtigt. Die Ökobilanzergebnisse umfassen die Lebenszyklusstadien angefangen von der Herstellung der Vormaterialien bis hin zur Rohstoffgewinnung und der Verarbeitungsprozesse der als Input dienenden Sekundärstoffe (z.B. Recyclingprozesse), deren Transporte zum Werk sowie die Produktion selbst, einschließlich der Bereitstellung aller Hilfs- und Betriebsstoffe, Energie, sowie die vollständige Abfallbehandlung oder die Deponierung der Reststoffe während des Stadiums der Produktion. Die Module A1, A2 und A3 sind hier als ein aggregiertes Modul A1-A3 ausgewiesen. Falls für diesen Datensatz weitere Module berechnet wurden, sind diese separat zu finden und können für eine Betrachtung des gesamten Lebenszyklus zusammengeführt werden.
Deklarierte Einheit:
Die deklarierte Einheit ist 1 kg NedZink NOVA / NedZink NOIR, vorbewittertes Titanzink.

## Technical purpose
NedZink® NOVA / NedZink® NOIR Titanzink- Bänder, Tafeln, Streifen und Profile werden zur Dächer- und Fassadenabdeckung, Innenverkleidung und für Regenwasserdrainagesysteme (Dachrinnen, Fallrohre und Zubehör) verwendet.

NedZink® NOVA / NedZink® NOIR ist hauptsächlich für den Außengebrauch konzipiert. Trotzdem ist das Produkt für den Innengebrauch sicher und kann somit auch so verwendet werden. Es gibt keine schädlichen Emissionen in die Raumluft. Das Produkt enthält keine VOCs.

## Reference product
- 1 kg NEDZINK NOVA/NOIR: 1

## Inputs
- Erneuerbare Primärenergie als Energieträger (PERE) [MJ]: A1-A3 1.37, D -0.256
- Erneuerbare Primärenergie zur stofflichen Nutzung (PERM) [MJ]
- Total erneuerbare Primärenergie (PERT) [MJ]: A1-A3 1.37, D -0.256
- Nicht-erneuerbare Primärenergie als Energieträger (PENRE) [MJ]: A1-A3 22.2, D -11.7
- Nicht-erneuerbare Primärenergie zur stofflichen Nutzung (PENRM) [MJ]
- Total nicht erneuerbare Primärenergie (PENRT) [MJ]: A1-A3 222, D -117
- Einsatz von Sekundärstoffen (SM) [kg]
- Erneuerbare Sekundärbrennstoffe (RSF) [MJ]
- Nicht erneuerbare Sekundärbrennstoffe (NRSF) [MJ]
- Einsatz von Süßwasserressourcen (FW) [m^3]: A1-A3 2.26, D -1.45

## Outputs
- Gefährlicher Abfall zur Deponie (HWD) [kg]: A1-A3 0.002
- Entsorgter nicht gefährlicher Abfall (NHWD) [kg]: A1-A3 0.0185
- Entsorgter radioaktiver Abfall (RWD) [kg]
- Komponenten für die Wiederverwendung (CRU) [kg]
- Stoffe zum Recycling (MFR) [kg]: D 0.9
- Stoffe für die Energierückgewinnung (MER) [kg]
- Exportierte elektrische Energie (EEE) [MJ]
- Exportierte thermische Energie (EET) [MJ]

## Impact indicators
- Globales Erwärmungspotenzial (GWP) [kg CO_(2)-Äq.]: A1-A3 2.09, D -1.15
- Abbau Potential der stratosphärischen Ozonschicht (ODP) [kg CFC11-Äq.]: A1-A3 1.11e-7, D -7.4e-8
- Versauerungspotenzial von Boden und Wasser (AP) [kg SO_(2)-Äq.]: A1-A3 0.012, D -0.00964
- Eutrophierungspotenzial (EP) [kg PO_(4)^(3)-Äq.]: A1-A3 0.00326, D -0.00182
- Bildungspotential für troposphärisches Ozon (POCP) [kg Ethen-Äq.]: A1-A3 0.000203, D -8.09e-5
- Potenzial für den abiotischen Abbau nicht fossiler Ressourcen (ADPE) [kg Sb-Äq.]: A1-A3 8.13e-5, D -7.42e-5
- Potenzial für den abiotischen Abbau fossiler Brennstoffe (ADPF) [MJ]

## Use advice
Gültigkeitsbereich:
Die Ökobilanz (LCA) wurde gemäß ISO 14040, ISO 14044 und EN 15804 durchgeführt. Die LCA erfolgte für die vorbewitterten Produkte NedZink® NOVA/NedZink® NOIR hergestellt durch NedZink B.V. in Budel-Dorplein, Niederlande. NedZink B.V. lieferte die standortspezifischen Daten, Hintergrundprozesse wurden der Ecoinvent-Datenbank (Version 2) entnommen.

Die LCA wurde für die Herstellungsphase des deklarierten Produkts durchgeführt, inklusive der Informationen über die Produktion von Roh- und Sekundärmaterialien sowie Transport und Verpackung (cradle to crate). Mögliche Gutschriften nach der Entsorgungsphase (Modul D) sind auch enthalten. Bei diesem Dokument handelt es sich um eine vom Englischen ins Deutsche übersetzte Umwelt-Produktdeklaration. Grundlage ist die englische Ursprungsversion EPD-NED-20140083-IBA1-EN. Der Verifizierer hat keinen Einfluss auf die Qualität der Übersetzung.
Systemgrenze:
Typ der EPD: Cradle-to-Gate für ein spezifisches im NedZink-Werk entstandenes Produkt (Deklaration eines spezifischen Produkts von einem Herstellerwerk). Die Module A1, A2 und A3 enthalten Informationen über Roh- und Sekundärmaterialgewinnung, Transport zum Hersteller, Herstellung und Verpackung. Mögliche Gutschriften nach der Entsorgung des Produkts sind auch enthalten (Modul D). Anderen Module sind in der EPD nicht enthalten. Angesichts des wirtschaftlichen Wertes von Zink ist das Stadium des Abfallendes nach dem Rückbau des Metalls aus dem Gebäude (mit Handwerkzeugen) erreicht. Infolge dessen, gibt es keinen Beitrag von Modul C.

## Data sources
- NedZink NOVA, NedZink NOIR.pdf
- ecoinvent database (all versions)
- ecoinvent 2.2 database
