# FOAMGLAS® W+F und FOAMGLAS® T3+

Dataset: ILCD process, EPD, specific dataset
Geography: RER
Reference year: 2015
Valid until: 2020
Classification: OEKOBAU.DAT: Dämmstoffe / Schaumglas / Platten
Classification: IBUCategories: 02 Bauprodukte / Wärmedämmungsprodukte / Mineralische Dämmstoffe
Method details: Mineralische Dämmstoffe.pdf
Registration number: 7480
Owner: Pittsburgh Corning Europe NV
Compliance: DIN EN 15804; ISO 14025
Review: Accredited third party review by Institut Bauen und Umwelt e. V.
Amounts: rows without a unit in brackets have none in this file; such an amount is in the reference unit of its flow, which a separate flow dataset defines
copyright: false

## General comment
FOAMGLAS® ist ein Wärmedämmstoff aus aufgeschäumtem Glas für den Hochbau sowie für betriebstechnische Anlagen. Aus ihm werden maßhaltige Platten, Boards, Rohrschalen, Segmente und andere Spezialelemente gefertigt.

FOAMGLAS® Platten bzw. Elemente werden vorwiegend aus hochwertigem Recyclingglas (z.B. Windschutzscheiben) sowie mineralischen Grundstoffen, wie Sand, ohne Einsatz von Bindemitteln hergestellt. Die Struktur ist geschlossenzellig. Deklariert wird das Produkt FOAMGLAS® W+F mit Rohdichte 100 kg/m³ (± 15 %). Die Produkte werden in Dicken zwischen 40 mm und 140 mm geliefert, beispielsweise als druckfeste Platten. Der Einsatz von beschichtetem oder unbeschichtetem FOAMGLAS® ist anwendungs-abhängig. Zur Innendämmung wird häufig die unbeschichtete Platte eingesetzt und mit diversen Putzen beschichtet.

Bei Dächern wird FOAMGLAS® entweder mit Heißbitumen beschichtet bevor die Abdichtungsbahn aufgebracht wird, oder es werden spezielle Boards verwendet wie z.B. FOAMGLAS® READY BOARD. Diese werkseitige Beschichtung ist eine dünne Bitumenbeschichtung in Kombination mit Folie oder Vlies

Die Produkte von Pittsburgh Corning Europe NV entstammen dem Werk Tessenderlo (B).

## Technology and included processes
FOAMGLAS® ist ein Wärmedämmstoff aus aufgeschäumtem Glas für den Hochbau sowie für betriebstechnische Anlagen. Aus ihm werden maßhaltige Platten, Boards, Rohrschalen, Segmente und andere Spezialelemente gefertigt. FOAMGLAS® Platten bzw. Elemente werden vorwiegend aus hochwertigem Recyclingglas (z.B. Windschutzscheiben) sowie natürlich vorkommenden mineralischen Grundstoffen, wie Sand, ohne Einsatz von Bindemitteln hergestellt. Die Struktur ist geschlossenzellig. Deklariert wird das Produkt FOAMGLAS® T4+ mit Rohdichte 115 kg/m³ (± 15 %). Die Produkte werden in Dicken zwischen 40 mm und 200 mm geliefert, beispielsweise als druckfeste Platten. Der Dämmstoff FOAMGLAS® wird für die gesamte Gebäudehülle eingesetzt.
Deklarierte Einheit:
Die Deklaration bezieht sich auf den Lebenszyklus von 1kg FOAMGLAS® W+F und FOAMGLAS® T3+. Die Rohdichte des Produktes beträgt 100 kg/m³.

## Technical purpose
Der Dämmstoff FOAMGLAS® wird für die gesamte

Gebäudehülle eingesetzt.

• Alle Anwendungsbereiche entsprechen /DIN4108/ oder anderen lokalen Anwendungsrichtlinien für die Anwendungsgebiete Dach, Wand, Decke, Perimeter und weitere Spezialanwendungen.

• Haustechnik (Luftschächte, Kaltwasser -anlagen, Kanäle).

• Technische Isolierung (Dämmung von Rohrleitungen, Behältern, Tanks und Apparaturen)

• Brandschutzelemente (Brandschutzertüchtigungen von Wänden, Anschlüssen und Rohrdurchführungen)

## Reference product
- 1 kg FOAMGLAS® W+F bzw. FOAMGLAS® T3+: 1

## Inputs
- Erneuerbare Primärenergie als Energieträger (PERE) [MJ]: A1-A3 8.66, A4 0.00919, A5 0.00106, C4 0.0154, D -0.00949
- Erneuerbare Primärenergie zur stofflichen Nutzung (PERM) [MJ]: A1-A3 0
- Total erneuerbare Primärenergie (PERT) [MJ]: A1-A3 8.66, A4 0.00919, A5 0.00106, C4 0.0154, D -0.00949
- Nicht-erneuerbare Primärenergie als Energieträger (PENRE) [MJ]: A1-A3 19.8, A4 0.234, A5 0.0116, C4 0.186, D -0.219
- Nicht-erneuerbare Primärenergie zur stofflichen Nutzung (PENRM) [MJ]: A1-A3 0
- Total nicht erneuerbare Primärenergie (PENRT) [MJ]: A1-A3 19.8, A4 0.234, A5 0.0116, C4 0.186, D -0.219
- Einsatz von Sekundärstoffen (SM) [kg]: A1-A3 0.47, A4 0, A5 0, C4 0, D 0
- Erneuerbare Sekundärbrennstoffe (RSF) [MJ]: A1-A3 0, A4 0, A5 0, C4 0, D 0
- Nicht erneuerbare Sekundärbrennstoffe (NRSF) [MJ]: A1-A3 0, A4 0, A5 0, C4 0, D 0
- Einsatz von Süßwasserressourcen (FW) [m^3]: A1-A3 0.0146, A4 6.49e-6, A5 5.39e-5, C4 -0.000711, D -2.4e-5

## Outputs
- Gefährlicher Abfall zur Deponie (HWD) [kg]: A1-A3 0.000476, A4 5.33e-7, A5 1.46e-6, C4 8.36e-6, D -1.97e-5
- Entsorgter nicht gefährlicher Abfall (NHWD) [kg]: A1-A3 0.0455, A4 2.94e-5, A5 0.00222, C4 1, D -5.17e-5
- Entsorgter radioaktiver Abfall (RWD) [kg]: A1-A3 0.000206, A4 3.06e-7, A5 5.62e-7, C4 3.25e-6, D -2.4e-5
- Komponenten für die Wiederverwendung (CRU) [kg]: A1-A3 0, A4 0, A5 0, C4 0
- Stoffe zum Recycling (MFR) [kg]: A1-A3 0, A4 0, A5 0, C4 0
- Stoffe für die Energierückgewinnung (MER) [kg]: A1-A3 0, A4 0, A5 0.0087, C4 0
- Exportierte elektrische Energie (EEE) [MJ]: A1-A3 0, A4 0, A5 0, C4 0, D -0.0424
- Exportierte thermische Energie (EET) [MJ]: A1-A3 0, A4 0, A5 0, C4 0, D -0.102

## Impact indicators
- Globales Erwärmungspotenzial (GWP) [kg CO_(2)-Äq.]: A1-A3 1.26, A4 0.0169, A5 0.022, C4 0.0135, D -0.00971
- Abbau Potential der stratosphärischen Ozonschicht (ODP) [kg CFC11-Äq.]: A1-A3 2.52e-11, A4 8.09e-14, A5 2.65e-14, C4 1.84e-13, D -1.13e-11
- Versauerungspotenzial von Boden und Wasser (AP) [kg SO_(2)-Äq.]: A1-A3 0.00289, A4 7.74e-5, A5 5.39e-6, C4 8.62e-5, D -1.12e-5
- Eutrophierungspotenzial (EP) [kg PO_(4)^(3)-Äq.]: A1-A3 0.000348, A4 1.77e-5, A5 4.3e-7, C4 1.18e-5, D -1.59e-6
- Bildungspotential für troposphärisches Ozon (POCP) [kg Ethen-Äq.]: A1-A3 0.000222, A4 -2.5e-5, A5 2.93e-7, C4 8.09e-6, D -1.55e-6
- Potenzial für den abiotischen Abbau nicht fossiler Ressourcen (ADPE) [kg Sb-Äq.]: A1-A3 6.78e-6, A4 6.37e-10, A5 3.16e-9, C4 5.1e-9, D -6.95e-10
- Potenzial für den abiotischen Abbau fossiler Brennstoffe (ADPF) [MJ]: A1-A3 19.3, A4 0.233, A5 0.0102, C4 0.178, D -0.158

## Use advice
Gültigkeitsbereich:
Dieses Dokument bezieht sich auf die Herstellung von 1 kg unbeschichtetem Schaumglas „FOAMGLAS® W+F“ hergestellt in Belgien am Produktionsstandort Tessenderlo der Firma Pittsburgh Corning Europe NV. Mit Hilfe eines Zuschlagfaktors in Höhe von 13% sind die Umweltwirkungen des beschichteten Produktes „FOAMGLAS® W+F“ abzuschätzen.

Die Ökobilanzergebnisse des „FOAMGLAS® W+F“ kann als repräsentativ für das „FOAMGLAS® T3+“ Produkt angesehen werden. Aufgrund der um 5% niedrigeren Rohdichte liegen auch die Ökobilanzergebnisse von „FOAMGLAS® T3+“ um etwa 5% unter denen von „FOAMGLAS® W+F“, da der Herstellungsprozess sowie die eingesetzten Rohmaterialien nahezu identisch sind. Dementsprechend können die Ergebnisse von „FOAMGLAS® W+F“ als „worst case“ für „FOAMGLAS® T3+“ interpretiert werden.
Systemgrenze:
Typ der EPD: Wiege-bis-Werkstor

Die berechnete Ökobilanz adressiert das Lebens-zyklusstadium der Produktherstellung. Die Produktherstellung umfasst die Module A1 (Rohstoffbereitstellung), A2 (Transport) und A3 (Herstellung).

Im Einzelnen wurden folgende Prozesse in das Produktstadium A1–A3 der Herstellung einbezogen:

· Bereitstellungsprozesse von Vorprodukten und Energie

· Transporte der Rohstoffe und Vorprodukte zum Werk

· Herstellprozess im Werk inklusive energetischen Aufwendungen, Entsorgung von anfallenden Reststoffen und Emissionen

· Herstellung der Verpackung Bei den berücksichtigten Mengen der Verpackungsmaterialien handelt es sich um Jahresverbrauchs-/Jahreszukaufmengen.

Modul A4 berücksichtigt den Transport zur Baustelle. Die Verwertung der Verpackungsmaterialien wird in Modul A5 zugeordnet. Umweltwirkungen durch Installationsverluste sind in den LCA Ergebnissen nicht enthalten, da diese abhängig vom Bauprojekt sind und damit variieren. Zur Berechnung der zusätzlichen Umweltlasten, die durch Herstellung und Entsorgung der Installationsverlusten entstehen, können die LCA Ergebnisse für einen spezifischen Installationsverlust berechnet werden (z.B. Installationsverlust 3%, Multiplikation der LCA Ergebnisse mit 1,03). Die Deponierung von Reststoffen ist dem Modul C4 zugeordnet.

Gutschriften aus der thermischen Verwertung von Reststoffen sind dem Modul D zugeordnet.

## Data sources
- FOAMGLAS® W+F und FOAMGLAS® T3+.pdf
- GaBi Database (all versions)
- GaBi database SP20 2013
