# MSH-Profile

Dataset: ILCD process, EPD, average dataset
Geography: DE
Reference year: 2015
Valid until: 2020
Classification: OEKOBAU.DAT: Metalle / Stahl und Eisen / Stahlprofile
Classification: IBUCategories: 02 Bauprodukte / Metallbauprodukte und Zubehör / Baustähle
Method details: Baustähle.pdf
Owner: Vallourec Deutschland GmbH
Compliance: DIN EN 15804; ISO 14025
Review: Accredited third party review by IBU
Amounts: rows without a unit in brackets have none in this file; such an amount is in the reference unit of its flow, which a separate flow dataset defines
copyright: true

## General comment
Bei MSH (Warmgefertigte Stahlbau-Hohlprofil)-Profilen handelt es sich um warmgefertigte Hohlprofile für den Stahlbau, die aus unlegierten Baustählen und aus Feinkornbaustählen nach /DIN EN 10 210-/1 gefertigt werden.

## Technology and included processes
siehe EPD
Technische Daten:
Die mechanisch-technologischen Eigenschaften von warmgefertigten Hohlprofilen können der Liefernorm /DIN EN 10210/ Teil 1, Tabelle A.3 (unlegierte Baustähle) bzw. Tabelle B.3 (Feinkornbaustähle), entnommen werden
Deklarierte Einheit:
Die Deklaration bezieht sich auf die Herstellung von 1 t Stahlbau-Hohlprofil.

## Technical purpose
MSH-Profile werden in zahlreichen Bauanwendungen eingesetzt:
Industrie- und Hallenbau
Brückenbau
Kesselgerüste
Sportstätten (Stadien)
Ausstellungsbauten
Flughafenterminals und Hangars
Stahl-Glas-Fassadenkonstruktionen
Offshore Konstruktionen

## Reference product
- 1 lfm Stahlschutzplanke: 1000

## Inputs
- Erneuerbare Primärenergie als Energieträger (PERE) [MJ]: A1-A3 1228.8, C3 0, D 281.37
- Erneuerbare Primärenergie zur stofflichen Nutzung (PERM) [MJ]: A1-A3 0, C3 0, D 0
- Total erneuerbare Primärenergie (PERT) [MJ]: A1-A3 1228.8, C3 0, D 281.37
- Nicht-erneuerbare Primärenergie als Energieträger (PENRE) [MJ]: A1-A3 26973, C3 0, D -15308
- Nicht-erneuerbare Primärenergie zur stofflichen Nutzung (PENRM) [MJ]: A1-A3 0, C3 0, D 0
- Total nicht erneuerbare Primärenergie (PENRT) [MJ]: A1-A3 26973, C3 0, D -15308
- Einsatz von Sekundärstoffen (SM) [kg]: A1-A3 172, C3 0, D 930
- Erneuerbare Sekundärbrennstoffe (RSF) [MJ]: A1-A3 0, C3 0, D 0
- Nicht erneuerbare Sekundärbrennstoffe (NRSF) [MJ]: A1-A3 0, C3 0, D 0
- Einsatz von Süßwasserressourcen (FW) [m^3]: A1-A3 2.2654, C3 0, D -1.1444

## Outputs
- Gefährlicher Abfall zur Deponie (HWD) [kg]: A1-A3 0.066252, C3 0, D -0.0054016
- Entsorgter nicht gefährlicher Abfall (NHWD) [kg]: A1-A3 29.25, C3 0, D -23.376
- Entsorgter radioaktiver Abfall (RWD) [kg]: A1-A3 0.30756, C3 0, D 0.24059
- Komponenten für die Wiederverwendung (CRU) [kg]: A1-A3 0, C3 0, D 0
- Stoffe zum Recycling (MFR) [kg]: A1-A3 0, C3 990, D 0
- Stoffe für die Energierückgewinnung (MER) [kg]: A1-A3 0, C3 0, D 0
- Exportierte elektrische Energie (EEE) [MJ]: A1-A3 0, C3 0, D 0
- Exportierte thermische Energie (EET) [MJ]: A1-A3 0, C3 0, D 0

## Impact indicators
- Globales Erwärmungspotenzial (GWP) [kg CO_(2)-Äq.]: A1-A3 2605.1, C3 0, D -1684.1
- Abbau Potential der stratosphärischen Ozonschicht (ODP) [kg CFC11-Äq.]: A1-A3 2.7244e-8, C3 0, D 1.2533e-8
- Versauerungspotenzial von Boden und Wasser (AP) [kg SO_(2)-Äq.]: A1-A3 8.3244, C3 0, D -6.3513
- Eutrophierungspotenzial (EP) [kg PO_(4)^(3)-Äq.]: A1-A3 0.72878, C3 0, D -0.53593
- Bildungspotential für troposphärisches Ozon (POCP) [kg Ethen-Äq.]: A1-A3 1.1635, C3 0, D -0.93392
- Potenzial für den abiotischen Abbau nicht fossiler Ressourcen (ADPE) [kg Sb-Äq.]: A1-A3 0.00060494, C3 0, D -8.0698e-5
- Potenzial für den abiotischen Abbau fossiler Brennstoffe (ADPF) [MJ]: A1-A3 26199, C3 0, D -15915

## Use advice
Gültigkeitsbereich:
Diese Umwelt-Produktdeklaration bezieht sich auf warmgefertigte MSH-Profile mit kreisförmigem, quadratischem und rechteckigem Querschnitt aus den Vallourec-Werken in Düsseldorf Rath und Mülheim (Deutschland).
Systemgrenze:
Typ der EPD: Wiege bis Werkstor - mit Optionen.

Die folgenden Lebenszyklusphasen werden berücksichtigt:
Produktstadium (Modul A1-A3)
Abfallbehandlung (Modul C3)
Gutschriften und Lasten außerhalb der Systemgrenzen (Modul D)

Das Produktionsstadium berücksichtigt:

Bereitstellung von Rohmaterial (Stahl-Bramme), Hilfsstoffen und Energie
Transport des Rohmaterials

Herstellprozess im Werk inklusive energetischer Aufwendungen, Herstellung von Hilfsstoffen,

Entsorgung von anfallenden Reststoffen und der Berücksichtigung von auftretenden Werksemissionen

Abfallbehandlung sowie Gutschriften und Lasten außerhalb der Systemgrenze:

Für Stahlschrott wird angenommen das, dass Ende der Abfalleigenschaft nach dem Sortieren und Einsammeln beim Abriss

erreicht ist. In Modul D werden Wiederverwendung und Recycling von MSH-Profilen berücksichtigt.

## Data sources
- MSH-Profile.pdf
- GaBi Database (all versions)
- GaBi database SP29 2016
