# Holzfaserdämmplatten

Dataset: ILCD process, EPD, average dataset
Geography: DE
Reference year: 2015
Valid until: 2020
Classification: OEKOBAU.DAT: Dämmstoffe / Holzfasern / Holzfaserdämmplatte
Classification: IBUCategories: 02 Bauprodukte / Holzwerkstoffe / Holzwerkstoffe
Method details: Holzwerkstoffe.pdf
Owner: GUTEX Holzfaserplattenwerk H. Henselmann GmbH + Co KG
Compliance: DIN EN 15804; ISO 14025
Review: Accredited third party review by IBU
Amounts: rows without a unit in brackets have none in this file; such an amount is in the reference unit of its flow, which a separate flow dataset defines
copyright: true

## General comment
GUTEX Holzfaserplatten sind plattenförmige Holzwerkstoffe, die nach /DIN EN 13171/ aus Holzfasern hergestellt werden.

Im Trockenverfahren werden aus Holzfasern unter Zugabe geringer Mengen PUR-Harz Dämmplatten gefertigt, diese werden am Ende online aufgeteilt, gegebenenfalls profiliert und konfektioniert. Es können hydrophobierte und nicht hydrophobierte einschichtige Dämmplatten bis zu 240 mm hergestellt werden.

## Technology and included processes
Grundstoffe/Hilfsstoffe - Nadelholz Tanne /Fichte: ca. 94,5 % - PUR Harz: max. 4,0 % - Paraffin: max. 1,5 % Herstellung: Der Herstellungsprozess gliedert sich in folgende Prozessschritte: 1. Anlieferung der Hackschnitzel 2. Zerfasern der Hackschnitzel mit Hilfe des Defibratorverfahrens 3. Hydrophobierung der Fasern mit Paraffin 4. Fasertrocknung im Stromtrockner 5. Beleimung der Faser mit PUR Harz 6. Streuung der Fasern auf das Formband zu einer Matte 7. Aushärtung der Matte in der Kalibrier- und Aushärteeinheit 8. Aufteilen, Profilieren und Konfektionieren.
Technische Daten:
Folgende (bau)technische Daten im Lieferzustand sind für GUTEX Holzfaserplatten relevant:
Deklarierte Einheit:
Die zugrundeliegende deklarierte Einheit ist 1 m³ Holzfaserdämmplatte mit einer nach Produktionsmengen (m³/Jahr) gewichteten mittleren Dichte von 173 kg/m³.

## Technical purpose
Sowohl im Neu- als auch im Altbau können die GUTEX Dämmstoffe eingesetzt werden: als Wärmedämmverbundsystem für die komplette Hausfassade, Wanddämmung für die hinterlüftete Fassade, Aufdach- und oder Gefachdämmung zuzüglich Unterdeckung im Dach, Dämmung von Geschossdecken, Innendämmung der Außenwand, Dämmung der Installationsebene und Trittschalldämmung für Fußböden.

## Reference product
- 1 m³ Holzfaserdämmplatte: 1

## Inputs
- Erneuerbare Primärenergie als Energieträger (PERE) [MJ]: A1-A3 383
- Erneuerbare Primärenergie zur stofflichen Nutzung (PERM) [MJ]: A1-A3 2960, C3 -2960
- Total erneuerbare Primärenergie (PERT) [MJ]: A1-A3 3340, D -504
- Nicht-erneuerbare Primärenergie als Energieträger (PENRE) [MJ]: A1-A3 1830
- Nicht-erneuerbare Primärenergie zur stofflichen Nutzung (PENRM) [MJ]: A1-A3 254, C3 -254
- Total nicht erneuerbare Primärenergie (PENRT) [MJ]: A1-A3 2080, D -3210
- Einsatz von Sekundärstoffen (SM) [kg]: A1-A3 0, D 0
- Erneuerbare Sekundärbrennstoffe (RSF) [MJ]: A1-A3 0, D 2960
- Nicht erneuerbare Sekundärbrennstoffe (NRSF) [MJ]: A1-A3 0, D 254
- Einsatz von Süßwasserressourcen (FW) [m^3]: A1-A3 0.505, D -0.253

## Outputs
- Gefährlicher Abfall zur Deponie (HWD) [kg]: A1-A3 0.0361, D -0.722
- Entsorgter nicht gefährlicher Abfall (NHWD) [kg]: A1-A3 0.605, D 0.319
- Entsorgter radioaktiver Abfall (RWD) [kg]: A1-A3 0.0143, D -0.284
- Komponenten für die Wiederverwendung (CRU) [kg]: A1-A3 0
- Stoffe zum Recycling (MFR) [kg]: A1-A3 0
- Stoffe für die Energierückgewinnung (MER) [kg]: C3 173
- Exportierte elektrische Energie (EEE) [MJ]
- Exportierte thermische Energie (EET) [MJ]

## Impact indicators
- Globales Erwärmungspotenzial (GWP) [kg CO_(2)-Äq.]: A1-A3 -164, C3 271.1, D -225.7
- Abbau Potential der stratosphärischen Ozonschicht (ODP) [kg CFC11-Äq.]: A1-A3 8.75e-10, D -1.56e-8
- Versauerungspotenzial von Boden und Wasser (AP) [kg SO_(2)-Äq.]: A1-A3 0.196, D -0.235
- Eutrophierungspotenzial (EP) [kg PO_(4)^(3)-Äq.]: A1-A3 0.0316, D -0.0179
- Bildungspotential für troposphärisches Ozon (POCP) [kg Ethen-Äq.]: A1-A3 0.0281, D -0.00639
- Potenzial für den abiotischen Abbau nicht fossiler Ressourcen (ADPE) [kg Sb-Äq.]: A1-A3 0.000114, D -3.29e-5
- Potenzial für den abiotischen Abbau fossiler Brennstoffe (ADPF) [MJ]: A1-A3 2050, D -2500

## Use advice
Gültigkeitsbereich:
Die Deklaration gilt für die im Trockenverfahren hergestellten Holzfaserdämmplatten die von der Firma
GUTEX am Standort Waldshut-Tiengen hergestellt werden.
Systemgrenze:
Als Typ der EPD wird deklariert: Wiege bis Werkstor - mit Optionen. Die Umweltproduktdeklaration bezieht sich auf das Produktstadium (Modul A1-A3, inklusive Rohstoffbereitstellung, Transport, Herstellung und Verpackungsmaterialen). Darüber hinaus wurde auch ein End-of-Life-Szenario (Modul D) berechnet: die Verbrennung in einem Biomassekraftwerk mit Energierückgewinnung. Die Verwertung der Verpackungsmaterialien ist nicht berücksichtigt, da Modul A5 nicht deklariert wird.

## Data sources
- Holzfaserdämmplatten.pdf
- GaBi Database (all versions)
- GaBi database SP20 2013
