# SWISS KRONO OSB

Dataset: ILCD process, EPD, specific dataset
Geography: EU-25
Reference year: 2015
Valid until: 2020
Classification: OEKOBAU.DAT: Holz / Holzwerkstoffe / OSB-Platte
Classification: IBUCategories: 02 Bauprodukte / Holzwerkstoffe / Holzwerkstoffe
Method details: Holzwerkstoffe.pdf
Owner: KRONOTEC AG
Compliance: DIN EN 15804; ISO 14025
Review: Accredited third party review by IBU
Amounts: rows without a unit in brackets have none in this file; such an amount is in the reference unit of its flow, which a separate flow dataset defines
copyright: false

## General comment
OSB-Platten (Oriented Strand Board – SWISS KRONO OSB) sind klebstoffgebundene, dreischichtig aufgebaute Holzwerkstoffplatten (Flachpressplatten) aus orientiert gestreuten, länglichen Holzspänen (120 - 160 mm lange Kiefernholz Furnierstreifen), sog. Strands gemäß /EN13986/ bzw. /EN 300/ „OSB“. „Strands“ aus einer definierten Dicke und Form, vornehmlich aus Rundhölzern, werden in mehreren Schichten verleimt. Die Orientierung der Mittelschicht erfolgt dabei im 90° Winkel zu den Deckschichten. Die OSB-Platten werden mit einem PMDI-Harz verleimt und in Dicken von 8 bis 40 mm hergestellt.
Für die schwer entflammbare SWISS KRONO OSB/SF-B wird ein Flammschutzmittel zugesetzt.

Das deklarierte Produkt stellt einen massengewichteten Durchschnitt der hergestellten Sortimente dar. Bei der Berechnung des Durchschnittes wird berücksichtigt, dass in den beiden Werken unterschiedliche Mengen mit unterschiedlichen Dichten produziert werden.

## Technology and included processes
OSB-Platten (Oriented Strand Board – Kronoply/ Kronopol OSB) sind klebstoffgebundene, dreischichtig aufgebaute Holzwerkstoffplatten (Flachpressplatten) aus orientiert gestreuten, länglichen Holzspänen (120 - 160 mm lange Kiefernholz Furnierstreifen), sog. Strands gemäß /EN13986/ bzw. /EN 300/ „OSB“. „Strands“ aus einer definierten Dicke und Form, vornehmlich aus Rundhölzern, werden in mehreren Schichten verleimt. Die Orientierung der Mittelschicht erfolgt dabei im 90° Winkel zu den Deckschichten. Die OSB-Platten werden mit einem PMDI-Harz verleimt und in Dicken von 8 bis 40 mm herge­stellt. Für die schwer entflammbare Kronoply OSB/SF-B wird ein Flammschutzmittel zugesetzt. Alle relevanten Hintergrund-Datensätze wurden der Datenbank der Software /GaBi 6/ (GABI 6 2013)entnommen.
Deklarierte Einheit:
Die Deklaration bezieht sich auf die Herstellung von 1m³ OSB Platte mit einem Gewicht von 617 kg/m³.

## Technical purpose
Die SWISS KRONO OSB entsprechen der Nutzungsklasse 1 und 2 nach EC5 und dürfen daher in Feuchtbereich bzw. nicht bewitterten Außenbereich verwendet werden. OSB-Platten können in tragenden und aussteifenden Bauteilen eingesetzt werden.

## Reference product
- 1 m³ OSB Platte (617 kg): 1

## Inputs
- Erneuerbare Primärenergie als Energieträger (PERE) [MJ]: A1-A3 899.286, C3 0, D 10400
- Erneuerbare Primärenergie zur stofflichen Nutzung (PERM) [MJ]: A1-A3 11866.7, C3 -11900, D 0
- Total erneuerbare Primärenergie (PERT) [MJ]: A1-A3 12766, C3 -11900, D 10400
- Nicht-erneuerbare Primärenergie als Energieträger (PENRE) [MJ]: A1-A3 4270.32, C3 0, D -10500
- Nicht-erneuerbare Primärenergie zur stofflichen Nutzung (PENRM) [MJ]: A1-A3 537.218, C3 -537, D 0
- Total nicht erneuerbare Primärenergie (PENRT) [MJ]: A1-A3 4807.54, C3 -537, D -10500
- Einsatz von Sekundärstoffen (SM) [kg]: A1-A3 0, C3 0, D 0
- Erneuerbare Sekundärbrennstoffe (RSF) [MJ]: A1-A3 211.653, C3 0, D 11400
- Nicht erneuerbare Sekundärbrennstoffe (NRSF) [MJ]: A1-A3 0, C3 0, D 0
- Einsatz von Süßwasserressourcen (FW) [m^3]: A1-A3 0.720711, C3 0, D -2.16477

## Outputs
- Gefährlicher Abfall zur Deponie (HWD) [kg]: A1-A3 0.00169974, C3 0, D -0.00389204
- Entsorgter nicht gefährlicher Abfall (NHWD) [kg]: A1-A3 3.06443, C3 0, D 1.26622
- Entsorgter radioaktiver Abfall (RWD) [kg]: A1-A3 0.0812574, C3 0, D -1.06505
- Komponenten für die Wiederverwendung (CRU) [kg]: A1-A3 0, C3 0
- Stoffe zum Recycling (MFR) [kg]: A1-A3 0, C3 0
- Stoffe für die Energierückgewinnung (MER) [kg]: C3 605.122
- Exportierte elektrische Energie (EEE) [MJ]: C3 0
- Exportierte thermische Energie (EET) [MJ]: C3 0

## Impact indicators
- Globales Erwärmungspotenzial (GWP) [kg CO_(2)-Äq.]: A1-A3 -760.457, C3 1040, D -649
- Abbau Potential der stratosphärischen Ozonschicht (ODP) [kg CFC11-Äq.]: A1-A3 0.000135803, C3 0, D -2.97194e-7
- Versauerungspotenzial von Boden und Wasser (AP) [kg SO_(2)-Äq.]: A1-A3 1.03862, C3 0, D -0.386339
- Eutrophierungspotenzial (EP) [kg PO_(4)^(3)-Äq.]: A1-A3 0.139179, C3 0, D 0.000288361
- Bildungspotential für troposphärisches Ozon (POCP) [kg Ethen-Äq.]: A1-A3 0.150304, C3 0, D 0.0521005
- Potenzial für den abiotischen Abbau nicht fossiler Ressourcen (ADPE) [kg Sb-Äq.]: A1-A3 0.00012848, C3 0, D -7.81874e-5
- Potenzial für den abiotischen Abbau fossiler Brennstoffe (ADPF) [MJ]: A1-A3 4605.09, C3 0, D -8411.1

## Use advice
Gültigkeitsbereich:
Dieses Dokument bezieht sich auf alle OSB-Platten, welche in folgenden Werken der SWISS KRONO GROUP hergestellt werden:
SWISS KRONO GmbH, Heiligengrabe, Deutschland

SWISS KRONO Sp. z o.o, Zary, Polen
Systemgrenze:
Es handelt sich um eine „von der Wiege bis zum
Werkstor, mit Optionen“ EPD. Die
Lebenszyklusanalyse für die betrachteten Produkte
umfasst die Lebenswegabschnitte „Produktionsstadium“,
sowie "Gutschriften und Lasten jenseits der Grenzen
des Produktsystems". Die Systeme beinhalten somit
folgende Stadien gemäß /EN 15804/: Produktstadium
(Module A1-A3):
- A1 Rohstoffbereitstellung und –verarbeitung
und Verarbeitungsprozesse von als Input
dienenden Sekundärstoffen
- A2 Transport zum Hersteller,
- A3 Herstellung
In Modul C3 wird der Nettofluss und die Emission des biogenen CO2 angeführt.
Nachdem das Produkt als gehacktes Altholz den End-of-Waste Status erreicht hat, wird angenommen, dass das Produkt einer Biomasseverbrennung zugeführt wird, welche thermische Energie und Elektrizität produziert. Daraus entstehende Wirkungen und Gutschriften sind im Modul D deklariert.

## Data sources
- SWISS KRONO OSB.pdf
- GaBi Database (all versions)
- GaBi database SP27 2015
