# MDF (Roh)

Dataset: ILCD process, EPD, average dataset
Geography: DE
Reference year: 2015
Valid until: 2020
Classification: OEKOBAU.DAT: Holz / Holzwerkstoffe / Spanplatten
Classification: IBUCategories: 02 Bauprodukte / Holzwerkstoffe / Holzwerkstoffe
Method details: Holzwerkstoffe.pdf
Owner: Fritz EGGER GmbH & Co. OG Holzwerkstoffe
Compliance: DIN EN 15804; ISO 14025
Review: Accredited third party review by IBU
Amounts: rows without a unit in brackets have none in this file; such an amount is in the reference unit of its flow, which a separate flow dataset defines
copyright: true

## General comment
Rohe MDF-Platten sind plattenförmige Werkstoffe gemäß /EN 622-5/ für den trockenen Möbel- und Innenausbau.

## Technology and included processes
Rohe MDF-Platten sind plattenförmige Werkstoffe gemäß /EN 622-5/ für den trockenen Möbel- und Innenausbau. Herstellung 1. Entrindung der Stämme 2. Zerspanung des Holzes zu Spänen 3. Kochen der Späne 4. Zerfaserung im Refiner 5. Trocknung der Fasern auf ca. 2-3 % Restfeuchte 6. Beleimung der Fasern mit Harzen 7. Streuung der beleimten Fasern auf ein Formband 8. Verpressen der Fasermatte in einer kontinuierlich arbeitenden Heißpresse 9. Aufteilen und Besäumen des Faserstranges zu Rohplattenformaten 10. Auskühlen der Rohplatten in Sternkühlwendern 11. Abstapelung zu Großstapeln 12. Nach Klimatisierungsphase Schleifen der Ober- und Unterseite Alle Werke, in denen EGGER MDF-Platten hergestellt werden, sind mit einem Qualitätsmanagementsystem nach /ISO 9001/ zertifiziert.
Technische Daten:
Technische Daten für EGGER MDF-ST E1CE
Deklarierte Einheit:
Die Deklaration bezieht sich auf die Herstellung von einem Kubikmeter unbeschichteter MDF Platte. Unbeschichtete MDF Platten weisen eine mittlere Dichte von 720 kg/m³ auf.

## Technical purpose
MDF-Platten können aufgrund ihres homogenen Aufbaues dreidimensional ausgefräst und anschließend entweder lackiert oder mit einer Folie in einer Membranpresse beschichtet werden. Vorwiegend werden sie beschichtet und als Möbelplatte eingesetzt. Sie finden bspw. als Tiefziehfronten im Küchenbereich Anwendung.

## Reference product
- 1 m³ MDF Platte unbeschichtet: 1

## Inputs
- Erneuerbare Primärenergie als Energieträger (PERE) [MJ]: A1-A3 6056.18
- Erneuerbare Primärenergie zur stofflichen Nutzung (PERM) [MJ]: A1-A3 11477.4
- Total erneuerbare Primärenergie (PERT) [MJ]: A1-A3 17533.6, D -770.408
- Nicht-erneuerbare Primärenergie als Energieträger (PENRE) [MJ]: A1-A3 5674.94
- Nicht-erneuerbare Primärenergie zur stofflichen Nutzung (PENRM) [MJ]: A1-A3 1855.87
- Total nicht erneuerbare Primärenergie (PENRT) [MJ]: A1-A3 7530.81, D -6488.06
- Einsatz von Sekundärstoffen (SM) [kg]: A1-A3 0, D 0
- Erneuerbare Sekundärbrennstoffe (RSF) [MJ]: A1-A3 6604.5, D 11500
- Nicht erneuerbare Sekundärbrennstoffe (NRSF) [MJ]: A1-A3 0, D 1860
- Einsatz von Süßwasserressourcen (FW) [m^3]: A1-A3 1.65553, D -1.48031

## Outputs
- Gefährlicher Abfall zur Deponie (HWD) [kg]: A1-A3 0.205969, D -0.583562
- Entsorgter nicht gefährlicher Abfall (NHWD) [kg]: A1-A3 7.34824, D 4.43357
- Entsorgter radioaktiver Abfall (RWD) [kg]: A1-A3 0.144977, D -0.607377
- Komponenten für die Wiederverwendung (CRU) [kg]: A1-A3 0
- Stoffe zum Recycling (MFR) [kg]: A1-A3 0
- Stoffe für die Energierückgewinnung (MER) [kg]: C3 342.453
- Exportierte elektrische Energie (EEE) [MJ]
- Exportierte thermische Energie (EET) [MJ]

## Impact indicators
- Globales Erwärmungspotenzial (GWP) [kg CO_(2)-Äq.]: A1-A3 -668.631, C3 633.538, D -357
- Abbau Potential der stratosphärischen Ozonschicht (ODP) [kg CFC11-Äq.]: A1-A3 3.58046e-8, D -1.62253e-7
- Versauerungspotenzial von Boden und Wasser (AP) [kg SO_(2)-Äq.]: A1-A3 1.2764, D -0.210438
- Eutrophierungspotenzial (EP) [kg PO_(4)^(3)-Äq.]: A1-A3 0.484365, D 0.00822176
- Bildungspotential für troposphärisches Ozon (POCP) [kg Ethen-Äq.]: A1-A3 0.378049, D 0.0375392
- Potenzial für den abiotischen Abbau nicht fossiler Ressourcen (ADPE) [kg Sb-Äq.]: A1-A3 0.000212202, D -3.70666e-5
- Potenzial für den abiotischen Abbau fossiler Brennstoffe (ADPF) [MJ]: A1-A3 7174.43, D -4962.97

## Use advice
Gültigkeitsbereich:
Dieses Dokument bezieht sich auf unbeschichtete mitteldichte Faserplatten EGGER MDF (Durchschnitt), welche in folgendem Werk der Gruppe hergestellt werden:

Egger Holzwerkstoffe Wismar GmbH & Co. KG, Am Haffeld 1, 23970 Wismar, Deutschland

Die Produktionsbedingungen in Wismar sind repräsentativ für die anderen Werke. Sie entsprechen den in allen Standorten eingesetzten Technologien und Standards.
Systemgrenze:
Es handelt sich um eine „von der Wiege bis zum Werkstor, mit Optionen" EPD. Die Lebenszyklusanalyse für die betrachteten Produkte umfasst die Lebenswegabschnitte „Produktstadium", sowie „Gutschriften und Lasten jenseits der Grenzen des Produktsystems". Die Systeme beinhalten somit folgende Stadien gemäß /EN 15804/: Produktstadium (Module A1-A3):

A1 Rohstoffbereitstellung und -verarbeitung und Verarbeitungsprozesse von als Input dienenden Sekundärstoffen
A2 Transport zum Hersteller
A3 Herstellung

Gutschriften und Lasten jenseits der Grenzen des Produktsystems (Modul D):

D Wiederverwendungs-; Rückgewinnungs- oder Recyclingpotential

## Data sources
- MDF (Roh).pdf
- GaBi Database (all versions)
- GaBi database SP26 2014
