# pladur®

Dataset: ILCD process, EPD, specific dataset
Geography: DE
Reference year: 2015
Valid until: 2020
Classification: OEKOBAU.DAT: Metalle / Stahl und Eisen / Stahlbleche
Classification: IBUCategories: 02 Bauprodukte / Metallbauprodukte und Zubehör / Dünnwandige Profile und Profiltafeln aus Metall
Method details: Dünnwandige Profile und Profiltafeln aus Metall.pdf
Owner: ThyssenKrupp
Compliance: DIN EN 15804; ISO 14025
Review: Accredited third party review by IBU
Amounts: rows without a unit in brackets have none in this file; such an amount is in the reference unit of its flow, which a separate flow dataset defines
copyright: true

## General comment
Schmelztauchveredeltes Feinblech nach DIN EN 10346 und SEW 022 mit optimalen mechanischen und physikalischen Eigenschaften für Baustahlqualitäten mit gängigen Schmelztauchüberzügen aus:
Zink (Z), Zink-Magnesium (ZM) und galfan® (ZA).

Weiterhin mögliche Schmelztauchüberzüge: Zink-Eisen (ZF), galvalume® (AZ) und Aluminium-Silicium (AS).

Zudem, mit einer organischen Beschichtung versehen nach DIN 55634 und DIN EN 10169.
Die organisch beschichteten Bänder und Bleche werden unter dem Markennamen pladur® vertrieben.

## Technology and included processes
Diese EPD bezieht sich auf den Fertigungsweg und Prozess für kontinuierlich schmelztauchveredelte Bleche und Bänder, die mit einer organischen Beschichtung versehen sind.
Technische Daten:
Technologische Werte: nach DIN EN 10346: 2009, s. Tabelle.
Deklarierte Einheit:
Die Deklaration bezieht sich auf 1 m² organisch beschichtetes Stahlblech (Referenz-Stärke 0,78mm) . Die deklarierte Einheit bezieht sich auf „Produkt am Werkstor“. Installationsmaterial und Verluste in der Installationsphase sind nicht berücksichtigt. Die Tabelle unten zeigt die Konfiguration für 1 m² Stahlblech.

Für pladur®-Produkte in anderen als der Referenz-Stärke, ist die lineare Umrechnung der Ökobilanzergebnisse über kg notwendig.

## Technical purpose
Die organisch beschichteten Bänder und Bleche werden in zahlreichen Bauanwendungen und weiteren Anwendungen eingesetzt:

Dacheindeckungen (Trapezbleche, Dachpfannen)
Fassadenverkleidung (Trapezbleche, Sandwichelemente, Wandkassetten)
Innenverkleidungen (Trapezbleche, Sandwichelemente, Wandkassetten)
Flachbleche (Abdeckungen, konstruktive Bleche, Wandabschlüsse, Dacheinfassungen)
Dachentwässerungssysteme ( Dachrinnen, Fallrohre, Traufbleche und Zubehör)
Automotive (Fahrzeugbau, Trailer, Kühlaufbauten)
Garagenindustrie
Weiße Ware (Haushaltsgeräte)
Braune Ware (Haushaltsgeräte, Gehäuse für die Unterhaltungselektronik)

## Reference product
- 1 m² pladur®: 1

## Inputs
- Erneuerbare Primärenergie als Energieträger (PERE) [MJ]: A1-A3 6.5114
- Erneuerbare Primärenergie zur stofflichen Nutzung (PERM) [MJ]: A1-A3 0
- Total erneuerbare Primärenergie (PERT) [MJ]: A1-A3 6.5114, C2 0.028025, C4 0.0093521, D 1.7552
- Nicht-erneuerbare Primärenergie als Energieträger (PENRE) [MJ]: A1-A3 219.22
- Nicht-erneuerbare Primärenergie zur stofflichen Nutzung (PENRM) [MJ]: A1-A3 0
- Total nicht erneuerbare Primärenergie (PENRT) [MJ]: A1-A3 219.22, C2 0.7135, C4 0.11338, D -81.912
- Einsatz von Sekundärstoffen (SM) [kg]: A1-A3 0.71914, C2 0, C4 0, D 0
- Erneuerbare Sekundärbrennstoffe (RSF) [MJ]: A1-A3 0, C2 0, C4 0, D 0
- Nicht erneuerbare Sekundärbrennstoffe (NRSF) [MJ]: A1-A3 0, C2 0, C4 0, D 0
- Einsatz von Süßwasserressourcen (FW) [m^3]: A1-A3 0.025451, C2 1.9776e-5, C4 -0.00034228, D -0.0048705

## Outputs
- Gefährlicher Abfall zur Deponie (HWD) [kg]: A1-A3 0.0038832, C2 1.6254e-6, C4 5.1378e-6, D 0.0064635
- Entsorgter nicht gefährlicher Abfall (NHWD) [kg]: A1-A3 0.095502, C2 8.9727e-5, C4 0.60923, D -0.13453
- Entsorgter radioaktiver Abfall (RWD) [kg]: A1-A3 0.0019217, C2 9.3419e-7, C4 1.9751e-6, D 0.0022265
- Komponenten für die Wiederverwendung (CRU) [kg]: A1-A3 0, C2 0, C4 0
- Stoffe zum Recycling (MFR) [kg]: A1-A3 0, C2 0, C4 0
- Stoffe für die Energierückgewinnung (MER) [kg]: A1-A3 0, C2 0, C4 0
- Exportierte elektrische Energie (EEE) [MJ]: A1-A3 0, C2 0, C4 0
- Exportierte thermische Energie (EET) [MJ]: A1-A3 0, C2 0, C4 0

## Impact indicators
- Globales Erwärmungspotenzial (GWP) [kg CO_(2)-Äq.]: A1-A3 15.592, C2 0.0048692, C4 0.008246, D -9.4048
- Abbau Potential der stratosphärischen Ozonschicht (ODP) [kg CFC11-Äq.]: A1-A3 4.5763e-11, C2 2.4678e-13, C4 1.0341e-13, D 6.7339e-11
- Versauerungspotenzial von Boden und Wasser (AP) [kg SO_(2)-Äq.]: A1-A3 0.044998, C2 5.4676e-5, C4 5.2389e-5, D -0.035973
- Eutrophierungspotenzial (EP) [kg PO_(4)^(3)-Äq.]: A1-A3 0.0048758, C2 6.305e-6, C4 7.1888e-6, D -0.0029928
- Bildungspotential für troposphärisches Ozon (POCP) [kg Ethen-Äq.]: A1-A3 0.0070445, C2 6.7903e-6, C4 4.9964e-6, D -0.0054019
- Potenzial für den abiotischen Abbau nicht fossiler Ressourcen (ADPE) [kg Sb-Äq.]: A1-A3 0.00046413, C2 1.9426e-9, C4 3.1032e-9, D -1.8595e-7
- Potenzial für den abiotischen Abbau fossiler Brennstoffe (ADPF) [MJ]: A1-A3 214.39, C2 0.71116, C4 0.1084, D -87.529

## Use advice
Gültigkeitsbereich:
Diese Umwelt-Produktdeklaration bezieht sich auf schmelztauchveredelte Bleche und Bänder aus den Produktionsstätten der thyssenkrupp Steel Europe AG in Duisburg, Kreuztal-Eichen und Kreuztal-Ferndorf.
Systemgrenze:
Typ der EPD: Wiege bis Werkstor – mit Optionen.
Die berechnete Ökobilanz adressiert das Lebenszyklusstadium der Produktherstellung sowie ein Verwertungsszenario. Die Produktherstellung umfasst die Module A1 (Rohstoffbereitstellung

und Vorproduktherstellung), A2 (Transport) und A3 (Herstellung). Das Verwertungsszenario umfasst die Module C2 (Transport zur Entsorgung/Verwertung), und C4 (Entsorgung). Im Modul D werden gemäß der /EN 15804/ Gutschriften und Lasten außerhalb der Systemgrenzen dargestellt.

## Data sources
- pladur®.pdf
- GaBi Database (all versions)
- GaBi database SP25 2014
