# ITS 96 System und TS 97

Dataset: ILCD process, EPD, average dataset
Geography: DE
Reference year: 2015
Valid until: 2020
Classification: OEKOBAU.DAT: Komponenten von Fenstern und Vorhangfassaden / Antriebssysteme / mechanisch
Classification: IBUCategories: 02 Bauprodukte / Türen, Fenster, Beschläge und Zubehör / Schlösser und Beschläge
Method details: Schlösser und Beschläge.pdf
Owner: DORMA Deutschland GmbH
Compliance: DIN EN 15804; ISO 14025
Review: Accredited third party review by IBU
Amounts: rows without a unit in brackets have none in this file; such an amount is in the reference unit of its flow, which a separate flow dataset defines
copyright: true

## General comment
Im Rahmen dieser EPD wird ein durchschnittliches Gleitschienen-Türschließersystem deklariert. Zugrunde gelegt werden dabei zwei Modelle der integrierten Türschließer-Reihe ITS 96, gemittelt aus den Produktausprägungen:

· EN 2-4 / ANSI 1-3

· EN 3-6 / ANSI 2-5

sowie eine Ausführung des aufliegenden Türschließers TS 97 EN 2-4.

ITS 96 System Das integrierte Gleitschienen-Türschließersystem ITS 96 ist ein modulares und multifunktionales System, welches mit wenigen Türschließermodellen und verschiedenen Gleitschienen viele Funktionsanforderung erfüllt. Es ermöglicht, Türen für die verschiedensten Anwendungen und in den unterschiedlichsten Ausführungen auszurüsten. Durch die verdeckte Einbauweise des Schließers als auch der Gleitschiene wird das System durch den Nutzer nicht wahrgenommen und bietet somit visuelle Vorteile als auch Schutz vor Vandalismus.

TS 97Im Unterschied zu den integrierten Türschließern, handelt es sich bei dem Modell TS 97 um einen aufgesetzten Gleitschienentürschließer. Das Gehäuse des TS 97 schließt bündig mit der Gleitschiene ab und die einteilige Front zeigt weder Nuten noch Befestigungspunkte. Die Endkappen sind innen liegend und alle Spaltmaße sind stark reduziert.

Optische Gestaltungsmöglichkeiten ergeben sich aus einer Vielfalt an verfügbaren Oberflächen. Die Funktionen des TS 97 können individuell an die jeweilige Türsituation angepasst und auf unterschiedliche Anforderungen abgestimmt werden.

## Technology and included processes
ITS 96 System: Das integrierte Gleitschienen-Türschließersystem ITS 96 ist ein modulares und multifunktionales System, welches mit wenigen Türschließermodellen und verschiedenen Gleitschienen viele Funktionsanforderung erfüllt. Es ermöglicht, Türen für die verschiedensten Anwendungen und in den unterschiedlichsten Ausführungen auszurüsten. Durch die verdeckte Einbauweise des Schließers als auch der Gleitschiene wird das System durch den Nutzer nicht wahrgenommen und bietet somit visuelle Vorteile als auch Schutz vor Vandalismus. TS 97: Im Unterschied zu den integrierten Türschließern, handelt es sich bei dem Modell TS 97 um einen aufgesetzten Gleitschienentürschließer. Das Gehäuse des TS 97 schließt bündig mit der Gleitschiene ab und die einteilige Front zeigt weder Nuten noch Befestigungspunkte. Die Endkappen sind innen liegend und alle Spaltmaße sind stark reduziert. Optische Gestaltungsmöglichkeiten ergeben sich aus einer Vielfalt an verfügbaren Oberflächen. Die Funktionen des TS 97 können individuell an die jeweilige Türsituation angepasst und auf unterschiedliche Anforderungen abgestimmt werden. Nach Anlieferung des Gehäuse-Rohteils erfolgt der erste Bearbeitungsgang im DORMA-Werk in Ennepetal (Fräsen, Bohren, Schneiden, Waschen, Entfetten, Prüfen des fertigen Rohlings). Im Anschluss erfolgt die Montage der Gehäuse-Komponenten (Achse, Achslager, Druckfeder, Kolben, Ventile, Öl). Nach Prüfung der fertig montierten Gehäuse-Komponenten wird der Schließer lackiert, tamponiert und bedruckt. Anlieferung des Gleitschienenprofils in Ennepetal, Sägen und Montage der Gleitschienenkomponenten (Gleitstück, Befestigungsstücke, Schrauben). Nach Anlieferung des Rohhebels in Ennepetal erfolgt das Bohren, Räumen, Prägen und abschließend die Lackierung des fertigen Gleitschienenhebels.
Deklarierte Einheit:
Die deklarierte Einheit ist ein durchschnittliches Türschließersystem. Der Durchschnitt wurde aus einer verkaufsmengenbezogenen Gewichtung der in Kapitel 2.2 genannten Schließervarianten ermittelt. Die Masse der deklarierten Einheit beträgt 2,45 kg/ Stück.

Nachfolgende Tabelle zeigt die massebezogenen Informationen pro Türschließer.

## Technical purpose
ITS 96 System
Die integrierten Türschließer des DORMA ITS 96 Systems sind universell einsetzbar. Je nach Zubehör ist eine Verwendung an 1- oder 2-flügeligen Feuer- und Rauchschutztüren möglich, insofern ein Eignungsnachweis in Verbindung mit der jeweiligen Feuer- und Rauchschutztür vorliegt. Dies gilt auch für den Einsatz an Türen ohne Anforderungen. Durch die kompakte Bauweise des ITS 96 Systems, kann dieses in alle Türen ab 40 mm Türblattstärke eingesetzt werden. Die Funktionen des ITS 96 Systems können individuell auf die jeweilige Türsituation und örtliche Gegebenheit abgestimmt werden. Anpassungen der Schließkraft auf die jeweilige Türbreite können über die, von oben zugängliche Stellschraube, getätigt werden. Die Schließgeschwindigkeit und der Endschlag (nicht für 2S Version) sind ebenfalls – auch im eingebauten Zustand – jederzeit von oben einstellbar. Die Anforderungen an barrierefreies Bauen nach /DIN 18040/ und /CEN/TR 15894/ werden bei dem ITS 96 System erfüllt.

TS 97

Der aufgesetzte Gleitschienentürschließer TS 97 kann an 1-flügeligen Feuer- und Rauchschutztüren eingesetzt werden, insofern ein Eignungsnachweis in Verbindung mit der jeweiligen Feuer- und Rauchschutztür vorliegt. Natürlich ist ebenfalls der Einsatz an Türen ohne Anforderungen möglich. Die Anforderungen an barrierefreies Bauen nach /DIN 18040/ und /CEN/TR 15894/ werden beim TS 97 ebenfalls erfüllt.

Die Schließgeschwindigkeit und der Endschlag des TS 97 sind über Ventile von vorne stufenlos einstellbar. Die Schließkraft kann beim TS 97 ebenfalls stufenlos von EN 2–4 d. h. bis zu einer Türbreite von 1.100 mm eingestellt werden. Die integrierte mechanische Öffnungsbegrenzung des TS 97 ist progressiv gedämpft und schützt bei normaler Türbegehung sowohl Wände als auch Türen vor Beschädigung durch zu weites Öffnen. Sie kann auf einen Öffnungswinkel zwischen 80° und max. 120° eingestellt werden. Je nach Anwendungsfall ist es möglich, den TS 97 auch mit einem Glastürschuh an Ganzglastüren zu befestigen.

## Reference product
- 1 Stück Durchschnittstürschließer inkl. Verpackungsmaterialien: 1

## Inputs
- Erneuerbare Primärenergie als Energieträger (PERE) [MJ]: A1-A3 26.2207, A4 0.0503718, A5 0.00554622, C2 0.0119217, C3 0.150458, C4 0.0292811, D -2.7407
- Erneuerbare Primärenergie zur stofflichen Nutzung (PERM) [MJ]: A1-A3 0.093678, A4 9.19629e-14, A5 2.93457e-13, C2 2.18381e-14, C3 0.0163941, C4 7.69313e-13, D -0.00137435
- Total erneuerbare Primärenergie (PERT) [MJ]: A1-A3 26.325, A4 0.0503718, A5 0.00554622, C2 0.0119217, C3 0.167152, C4 0.0292811, D -2.7407
- Nicht-erneuerbare Primärenergie als Energieträger (PENRE) [MJ]: A1-A3 144.098, A4 0.661091, A5 -1.18093, C2 0.156773, C3 2.0173, C4 0.514819, D -43.3353
- Nicht-erneuerbare Primärenergie zur stofflichen Nutzung (PENRM) [MJ]: A1-A3 0.000466275, A4 0, A5 0, C2 0, C3 5.12897e-6, C4 0, D 2.2364e-9
- Total nicht erneuerbare Primärenergie (PENRT) [MJ]: A1-A3 144.098, A4 0.661091, A5 -1.18093, C2 0.156773, C3 2.0173, C4 0.514819, D -43.3353
- Einsatz von Sekundärstoffen (SM) [kg]: A1-A3 0.11633, A4 0, A5 0, C2 0, C3 0, C4 0, D 0
- Erneuerbare Sekundärbrennstoffe (RSF) [MJ]: A1-A3 0, A4 5.38085e-6, A5 -1.90903e-6, C2 1.27553e-6, C3 6.83715e-9, C4 0.00035796, D -0.000491107
- Nicht erneuerbare Sekundärbrennstoffe (NRSF) [MJ]: A1-A3 0, A4 5.62116e-5, A5 -0.000106041, C2 1.33553e-5, C3 7.28096e-8, C4 0.000754143, D -0.00431418
- Einsatz von Süßwasserressourcen (FW) [m^3]

## Outputs
- Gefährlicher Abfall zur Deponie (HWD) [kg]: A1-A3 0.00013701, A4 0, A5 0, C2 0, C3 0, C4 0, D -7.10252e-5
- Entsorgter nicht gefährlicher Abfall (NHWD) [kg]: A1-A3 38.8414, A4 0.00443299, A5 0.0215663, C2 0.00105501, C3 0.000392864, C4 0.758269, D -9.81268
- Entsorgter radioaktiver Abfall (RWD) [kg]: A1-A3 0.00570258, A4 8.77905e-7, A5 2.03368e-6, C2 2.08045e-7, C3 1.70756e-7, C4 8.32389e-6, D -0.000355207
- Komponenten für die Wiederverwendung (CRU) [kg]: A1-A3 0, A4 0, A5 0, C2 0, C3 0, C4 0, D 0
- Stoffe zum Recycling (MFR) [kg]: A1-A3 0, A4 0, A5 0, C2 0, C3 2.12518, C4 0, D 0
- Stoffe für die Energierückgewinnung (MER) [kg]: A1-A3 0, A4 0, A5 0, C2 0, C3 0, C4 0.689963, D 0
- Exportierte elektrische Energie (EEE) [MJ]: A1-A3 0, A4 0, A5 0.255782, C2 0, C3 0.0214174, C4 0, D 0
- Exportierte thermische Energie (EET) [MJ]: A1-A3 0, A4 0, A5 0.634071, C2 0, C3 0.0671191, C4 0, D 0

## Impact indicators
- Globales Erwärmungspotenzial (GWP) [kg CO_(2)-Äq.]: A1-A3 11.3813, A4 0.0460625, A5 0.124084, C2 0.013709, C3 0.122955, C4 0.0354475, D -4.0648
- Abbau Potential der stratosphärischen Ozonschicht (ODP) [kg CFC11-Äq.]: A1-A3 -2.76298e-8, A4 5.95504e-14, A5 1.6897e-13, C2 1.41079e-14, C3 7.05375e-9, C4 1.73891e-12, D 7.76895e-8
- Versauerungspotenzial von Boden und Wasser (AP) [kg SO_(2)-Äq.]: A1-A3 0.0303414, A4 0.000118027, A5 -1.75202e-5, C2 3.30809e-5, C3 0.000549812, C4 0.000104233, D -0.0121124
- Eutrophierungspotenzial (EP) [kg PO_(4)^(3)-Äq.]: A1-A3 0.00191356, A4 3.3303e-5, A5 3.387e-6, C2 9.23386e-6, C3 0.000351977, C4 1.26799e-5, D -0.000499786
- Bildungspotential für troposphärisches Ozon (POCP) [kg Ethen-Äq.]: A1-A3 0.00411894, A4 -3.30262e-5, A5 -3.89096e-6, C2 -1.03539e-5, C3 4.31785e-5, C4 1.15305e-5, D -0.00187828
- Potenzial für den abiotischen Abbau nicht fossiler Ressourcen (ADPE) [kg Sb-Äq.]: A1-A3 0.000188855, A4 2.4918e-9, A5 1.66063e-9, C2 5.90368e-10, C3 3.77176e-7, C4 6.52582e-9, D -0.000120277
- Potenzial für den abiotischen Abbau fossiler Brennstoffe (ADPF) [MJ]: A1-A3 130.592, A4 0.658091, A5 -1.19078, C2 0.156605, C3 1.27427, C4 0.493681, D -43.1723

## Use advice
Gültigkeitsbereich:
Die vorliegende EPD bezieht sich auf den gesamten Lebensweg eines durchschnittlichen ITS 96 sowie eines TS 97 Türschließers von DORMA. Die unterschiedlichen technischen Eigenschaften werden in Kapitel 2.3 dargestellt.

Die Produkte werden am DORMA Produktionsstandort in Ennepetal, Deutschland, produziert.
Systemgrenze:
Typ der EPD: Wiege bis Werkstor – mit Optionen

Module A1-A3

Das Produktstadium enthält die Produktion der notwendigen Rohstoffe inklusive aller Vorketten sowie der notwendigen Beschaffungstransporte. Für die Produktion der deklarierten Einheit wurden auch die hierfür notwendigen Hilfs- und Betriebsstoffe sowie deren Vorketten betrachtet.

Modul A4

Dieses Modul betrachtet die ökologischen Auswirkungen des Transportes der deklarierten Einheit vom Werkstor bis zur Baustelle.

Modul A5

Hier wurden die entstehenden Umweltwirkungen bei der Entsorgung der Produktverpackungsmaterialien berücksichtigt.

Module C2-C4

Die Module beinhalten die Umweltwirkungen der Abfallbehandlung am Ende der Produktnutzung sowie die zugehörigen Transporte.

Modul D

Die aus der Abfallbehandlung (aus A5, C3 und C4) resultierenden Wertströme, die wiederum potenziell als energetischer (MVA-Route) oder werkstofflicher Input (Recycling) für ein nachgelagertes Produktsystem dienen können, werden hier als Gutschriften ausgewiesen.

## Data sources
- ITS 96 System und TS 97.pdf
- GaBi Database (all versions)
- GaBi database SP28 2015
