# Calciumsulfat-Fließestrich und Konventioneller Calciumsulfatestrich

Dataset: ILCD process, EPD, average dataset
Geography: DE
Reference year: 2015
Valid until: 2020
Classification: OEKOBAU.DAT: Mineralische Baustoffe / Bindemittel / Gips
Classification: IBUCategories: 02 Bauprodukte / Mauerwerk und Mörtel / Mineralische Werkmörtel
Method details: Mineralische Werkmörtel.pdf
Owner: Bundesverband der Gipsindustrie
Compliance: DIN EN 15804; ISO 14025
Review: Accredited third party review by IBU
Amounts: rows without a unit in brackets have none in this file; such an amount is in the reference unit of its flow, which a separate flow dataset defines
copyright: false

## General comment
Diese Deklaration beschreibt Calciumsulfat-Fließestriche und Konventionelle Calciumsulfatestriche.

Als deklarierte Einheit wird 1 kg der trockenen Mischung vor dem Versetzen mit Wasser auf der Baustelle genutzt. Diese Trockenmischung weist eine Trockenrohdichte > 1500 kg/m3 auf.

Das Hauptbindemittel ist abbindefähiges Calciumsulfat, welches unabhängig von der Verarbeitungskonsistenz als Fließestrich (flüssig) oder Konventioneller Estrich (erdfeucht) nach Wasserzugabe auf der Baustelle zu Gips hydratisiert wird.

Die Deklaration ist unabhängig von der Lieferung als Werk-Trockenmörtel, Werk-Frischmörtel oder Bindemittel-Compound, denen nur noch Zuschlag und Wasser zugegeben werden.

Diese Deklaration gilt, unabhängig davon, dass auch Zement als Zuschlag zugesetzt werden kann, nicht für Zementestriche mit Zement als Hauptbindemittel.

Diese Deklaration gilt nur für Estriche und Bindemittel-Compounds, die in loser Form in Transportbehältern geliefert werden, also nicht für Sackware.

## Technology and included processes
Calciumsulfat-Fließestrich und Konventioneller Calciumsulfatestrich als fertiges Gemisch oder in Form eines auf der Baustelle hergestellten Gemisches
Technische Daten:
Bautechnische Daten ergeben sich aus den Angaben der Hersteller und der vorgesehenen Estrichkonstruktionen, z.B. hinsichtlich der Estrichnenndicke. Da die Deklaration nur bis zur Lieferung an die Baustelle erfolgt, werden diese technischen Daten hier nicht aufgeführt. Für nähere Informationen sei auf das Merkblatt "Calciumsulfat-Fließestriche" - Hinweise für die Planung /IGE Planung/ verwiesen.

Die allgemeinen technischen Daten können der nachfolgenden Übersicht entnommen werden /Gips-Datenbuch/:
Deklarierte Einheit:
Diese Berechnungen beziehen sich die arithmetische Mittlung der zunächst gesondert erhobenen Daten für:
- 1 kg Estrich Naturanhydrit
- 1 kg Estrich Alpha-Halbhydrat
- 1 kg Estrich Thermischer Anhydrit
- 1 kg Estrich HF-Anhydrit

## Technical purpose
Calciumsulfat-Fließestriche und Konventionelle Calciumsulfatestriche finden Anwendung in der fugenlosen Verlegung großer Estrichflächen.
Mit den Produkten sind verschiedene Estrichkonstruktionen, z.B. als Verbundestrich /DIN 18560-3/, Estrich auf Trennschicht /DIN 18560-4/, Estrich auf Dämmschicht /DIN 18560-2/, Heizestrich /DIN 18560-2/, Estrich auf Hohlböden /DIN EN 13213/ ausführbar.

## Reference product
- 1 kg Estrich (trocken, vor Wasserzugabe): 1

## Inputs
- Erneuerbare Primärenergie als Energieträger (PERE) [MJ]: A1-A3 0.165, A4 0.00474, A5 0.000104
- Erneuerbare Primärenergie zur stofflichen Nutzung (PERM) [MJ]
- Total erneuerbare Primärenergie (PERT) [MJ]: A1-A3 0.165, A4 0.00474, A5 0.000104
- Nicht-erneuerbare Primärenergie als Energieträger (PENRE) [MJ]: A1-A3 0.913, A4 0.0622, A5 0.000378
- Nicht-erneuerbare Primärenergie zur stofflichen Nutzung (PENRM) [MJ]
- Total nicht erneuerbare Primärenergie (PENRT) [MJ]: A1-A3 0.913, A4 0.0622, A5 0.000378
- Einsatz von Sekundärstoffen (SM) [kg]
- Erneuerbare Sekundärbrennstoffe (RSF) [MJ]
- Nicht erneuerbare Sekundärbrennstoffe (NRSF) [MJ]
- Einsatz von Süßwasserressourcen (FW) [m^3]: A1-A3 0.168, A4 0.000297, A5 5.46e-5

## Outputs
- Gefährlicher Abfall zur Deponie (HWD) [kg]: A1-A3 6.32e-7, A4 5.01e-8, A5 3.64e-10
- Entsorgter nicht gefährlicher Abfall (NHWD) [kg]: A1-A3 0.352, A4 0.000417, A5 1.64e-8
- Entsorgter radioaktiver Abfall (RWD) [kg]: A1-A3 5.9e-5, A4 8.27e-8, A5 3.44e-8
- Komponenten für die Wiederverwendung (CRU) [kg]
- Stoffe zum Recycling (MFR) [kg]
- Stoffe für die Energierückgewinnung (MER) [kg]
- Exportierte elektrische Energie (EEE) [MJ]
- Exportierte thermische Energie (EET) [MJ]

## Impact indicators
- Globales Erwärmungspotenzial (GWP) [kg CO_(2)-Äq.]: A1-A3 0.111, A4 0.00455, A5 2.88e-5
- Abbau Potential der stratosphärischen Ozonschicht (ODP) [kg CFC11-Äq.]: A1-A3 7.08e-12, A4 5.61e-15, A5 3.26e-16
- Versauerungspotenzial von Boden und Wasser (AP) [kg SO_(2)-Äq.]: A1-A3 0.000173, A4 1.15e-5, A5 4.4e-8
- Eutrophierungspotenzial (EP) [kg PO_(4)^(3)-Äq.]: A1-A3 2.52e-5, A4 3.23e-6, A5 6.39e-9
- Bildungspotential für troposphärisches Ozon (POCP) [kg Ethen-Äq.]: A1-A3 1.18e-5, A4 -3.3e-6, A5 3.43e-9
- Potenzial für den abiotischen Abbau nicht fossiler Ressourcen (ADPE) [kg Sb-Äq.]: A1-A3 3.75e-8, A4 2.35e-10, A5 1.93e-11
- Potenzial für den abiotischen Abbau fossiler Brennstoffe (ADPF) [MJ]: A1-A3 1.18, A4 0.062, A5 0.000292

## Use advice
Gültigkeitsbereich:
Die vorliegende EPD gilt als Verbands-EPD für alle Mitgliedsunternehmen des Bundesverbandes der Gipsindustrie e.V. und der Industriegruppe Estrichstoffe gemäß Mitgliederliste auf www.gips.de.

Das Bilanzergebnis umfasst Estriche mit Calciumsulfat- Bindemitteln betreffend die Herstellung in Deutschland und kann insbesondere zu Planungszwecken auch vor Auftragsvergabe genutzt werden. Über die Mitglieder des Bundesverbandes der Gipsindustrie e.V. und der Industriegruppe Estrichstoffe ist eine hohe Repräsentativität für den Markt von Estrichen mit Calciumsulfat als Bindemittel gegeben.

Die technischen Daten wurden den aktuell vorliegenden Publikationen des Bundesverbandes der Gipsindustrie e.V. und der Industriegruppe Estrichstoffe sowie von den dort vertretenden Herstellern entnommen.
Systemgrenze:
Der Deklarationstyp entspricht der, eines EPD-Typ von der Wiege bis zur Errichtung des Bauwerkes.

Folgende Informationsmodule sind gemäß DIN EN 15804 berücksichtigt worden:
Bereitstellung der Rohstoffe (Modul A1), die Transporte (Modul A2) und die Herstellung (Modul A3), einschließlich der Bereitstellung von allen Stoffen, Produkten und Energie.

Für die Module A4 und A5 erfolgt die Übernahme aus der Muster-Deklaration des Industrieverbandes Werkmörtel e.V. (IWM).

## Data sources
- Calciumsulfat-Fließestrich und Konventioneller Calciumsulfatestrich.pdf
- GaBi Database (all versions)
- GaBi database SP26 2014
