# Thermofloc

Dataset: ILCD process, EPD, average dataset
Geography: AT
Reference year: 2015
Valid until: 2020
Classification: OEKOBAU.DAT: Dämmstoffe / Zellulosefaser / Zellulose-Einblas-Dämmstoff
Classification: IBUCategories: 02 Bauprodukte / Wärmedämmungsprodukte / Dämmstoffe aus Zellulosefasern
Method details: Dämmstoffe aus Zellulosefasern.pdf
Owner: Peter Seppele Gesellschaft m.b.H.
Compliance: DIN EN 15804; ISO 14025
Review: Accredited third party review by IBU
Amounts: rows without a unit in brackets have none in this file; such an amount is in the reference unit of its flow, which a separate flow dataset defines
copyright: false

## General comment
Der Thermofloc - Zellulosedämmstoff wird aus sortenreinem Papier von Tageszeitungen unter Zugabe von Additiven zum Schutz gegen Brand und Schimmel hergestellt. Der Zellulosedämmstoff wird von zertifizierten Verarbeitern mit speziell dafür ausgerüsteten Verblasmaschinen eingebaut.

## Technology and included processes
Sortenreines Tageszeitungspapier wird mit Hilfe eines Staplers der Anlage zugeführt. Über ein Förderband gelangen die Tageszeitungen in den Schredder, wo das Papier zerkleinert wird. Das zerkleinerte Tageszeitungspapier wird in den Vorbehälter weitertransportiert, von wo aus es aus über Wiegebänder in die Refiner gelangt. In den Refinern wird das Papier zerfasert und mit mineralischen Additiven imprägniert. Über Rohrleitungen wird der Zellulosedämmstoff in einen Filter-Vorbehälter und von dort aus zur Absackung weitertransportiert, wo der Zellulosedämmstoff in Säcken luftdicht verpackt wird.
Technische Daten:
In folgender Tabelle sind die technischen Daten des Produktes zu sehen.
Deklarierte Einheit:
Für das Produkt Thermofloc wurden die erforderlichen Module gemäß EN 15804 für eine Ökobilanz „von der Wiege bis zum Werkstor mit Optionen“ gewählt. Die betrachteten Module A1 bis A3, A4 bis A5, C1 bis C4 sowie das Modul D wurden gemäß der PCR für Dämmstoffe aus Zellulosefasern für 1 kg Dämmung gewählt und deklariert.

## Technical purpose
- Nicht begehbare Aufblasdämmung für Decken unter nicht ausgebauten Dachgeschossen (Dämmen zwischen oder über der Tragkonstruktion)
Einblasdämmung zwischen den Lagerhölzern von Fußbodenkonstruktionen als Hohlraumdämmung bzw. Dämpfung
Anwendungsbereich Decke /Boden:

- Einblasdämmung für Flachdächer mit oberer Abdeckung und nicht belüftetem Hohlraum unter der Dachabdichtung- Einblasdämmung für geneigte und nicht belüftete Hohlräume unter der Dachabdichtung (Vollsparrendämmung)Anwendungsbereich Dach:

- Einblasdämmung für Zwischenwandhohlräume im Holzrahmenbau

- Einblasdämmung für Außenwandhohlräume im HolzrahmenbauAnwendungsbereich Wand und Fassade:

Thermofloc Zellulosedämmung ist für Verwendungszecke einsetzbar, wo der nicht belastete Dämmstoff vorwiegend in vertikale oder horizontale Hohlräume raumfüllend eingeblasen oder auf horizontale leicht gewölbte bzw. leicht geneigte (≤ 10°) Flächen freiliegend offen aufgeblasen wird.

## Reference product
- 1 kg Thermofloc Zellulosedämmstoff: 1

## Inputs
- Erneuerbare Primärenergie als Energieträger (PERE) [MJ]: A1 0.038, A2 0.015, A3 0.596, A4 0.034, A5 0.0004, C1 0, C2 0.008, C3 0, C4 13, D -1.645
- Erneuerbare Primärenergie zur stofflichen Nutzung (PERM) [MJ]: A1 12.934, A2 0, A3 0, A4 0, A5 0, C1 0, C2 0, C3 0, C4 -12.9, D 0
- Total erneuerbare Primärenergie (PERT) [MJ]: A1 12.972, A2 0.015, A3 0.596, A4 0.034, A5 0.0004, C1 0, C2 0.008, C3 0, C4 0.04, D -1.645
- Nicht-erneuerbare Primärenergie als Energieträger (PENRE) [MJ]: A1 0.752, A2 0.263, A3 0.607, A4 0.445, A5 0.003, C1 0, C2 0.105, C3 0, C4 0.422, D -9.094
- Nicht-erneuerbare Primärenergie zur stofflichen Nutzung (PENRM) [MJ]: A1 0, A2 0, A3 0, A4 0, A5 0, C1 0, C2 0, C3 0, C4 0, D 0
- Total nicht erneuerbare Primärenergie (PENRT) [MJ]: A1 0.752, A2 0.263, A3 0.607, A4 0.445, A5 0.003, C1 0, C2 0.105, C3 0, C4 0.422, D -9.094
- Einsatz von Sekundärstoffen (SM) [kg]: A1 0.916, A2 0, A3 0, A4 0, A5 0, C1 0, C2 0, C3 0, C4 0, D 0
- Erneuerbare Sekundärbrennstoffe (RSF) [MJ]: A1 0, A2 0, A3 0, A4 0, A5 0, C1 0, C2 0, C3 0, C4 0, D 0
- Nicht erneuerbare Sekundärbrennstoffe (NRSF) [MJ]: A1 0, A2 0, A3 0, A4 0, A5 0, C1 0, C2 0, C3 0, C4 0, D 0
- Einsatz von Süßwasserressourcen (FW) [m^3]: A1 0.00015, A2 2.48e-5, A3 0.000451, A4 2e-5, A5 4.85e-5, C1 0, C2 4.72e-6, C3 0, C4 0.00379, D -0.00194

## Outputs
- Gefährlicher Abfall zur Deponie (HWD) [kg]: A1 7.56e-7, A2 1.33e-7, A3 2.97e-5, A4 3.57e-7, A5 1.27e-10, C1 0, C2 8.43e-8, C3 0, C4 0, D -3.22e-6
- Entsorgter nicht gefährlicher Abfall (NHWD) [kg]: A1 0.0617, A2 0.0025, A3 0.0245, A4 0.0045, A5 2.08e-5, C1 0, C2 0.00106, C3 0, C4 2.11e-5, D -0.753
- Entsorgter radioaktiver Abfall (RWD) [kg]: A1 3.34e-5, A2 5.41e-7, A3 1.02e-6, A4 7.84e-7, A5 2.38e-7, C1 0, C2 1.85e-7, C3 0, C4 9.25e-6, D -9.17e-5
- Komponenten für die Wiederverwendung (CRU) [kg]: A1 0, A2 0, A3 0, A4 0, A5 0, C1 0, C2 0, C3 0, C4 0, D 0
- Stoffe zum Recycling (MFR) [kg]: A1 0, A2 0, A3 0, A4 0, A5 0, C1 0, C2 0, C3 0, C4 0, D 0
- Stoffe für die Energierückgewinnung (MER) [kg]: A1 0, A2 0, A3 0, A4 0, A5 0, C1 0, C2 0, C3 0, C4 0, D 0
- Exportierte elektrische Energie (EEE) [MJ]: A1 0, A2 0, A3 0, A4 0, A5 0.041, C1 0, C2 0, C3 0, C4 1.7, D 0
- Exportierte thermische Energie (EET) [MJ]: A1 0, A2 0, A3 0, A4 0, A5 0.092, C1 0, C2 0, C3 0, C4 4.01, D 0

## Impact indicators
- Globales Erwärmungspotenzial (GWP) [kg CO_(2)-Äq.]: A1 0.043, A2 0.019, A3 0.018, A4 0.033, A5 0.022, C1 0, C2 0.00787, C3 0, C4 0.031, D -0.826
- Abbau Potential der stratosphärischen Ozonschicht (ODP) [kg CFC11-Äq.]: A1 2.69e-9, A2 1.21e-13, A3 2.33e-13, A4 6.19e-14, A5 5.09e-14, C1 0, C2 1.46e-14, C3 0, C4 6.46e-12, D -5.95e-12
- Versauerungspotenzial von Boden und Wasser (AP) [kg SO_(2)-Äq.]: A1 0.000477, A2 8.63e-5, A3 9.8e-5, A4 0.000148, A5 1.67e-6, C1 0, C2 3.5e-5, C3 0, C4 0.000295, D -0.00518
- Eutrophierungspotenzial (EP) [kg PO_(4)^(3)-Äq.]: A1 5.87e-5, A2 2.2e-5, A3 8.2e-6, A4 4e-5, A5 3.14e-7, C1 0, C2 9.45e-6, C3 0, C4 5.18e-5, D -0.000543
- Bildungspotential für troposphärisches Ozon (POCP) [kg Ethen-Äq.]: A1 2.94e-5, A2 -2.88e-5, A3 1.13e-5, A4 -5.03e-5, A5 1.94e-7, C1 0, C2 -1.19e-5, C3 0, C4 2.1e-5, D -0.000394
- Potenzial für den abiotischen Abbau nicht fossiler Ressourcen (ADPE) [kg Sb-Äq.]: A1 2.19e-6, A2 8.94e-10, A3 2.01e-8, A4 1.72e-9, A5 1.15e-10, C1 0, C2 4.07e-10, C3 0, C4 2.37e-8, D -6.71e-8
- Potenzial für den abiotischen Abbau fossiler Brennstoffe (ADPF) [MJ]: A1 0.656, A2 0.261, A3 0.559, A4 0.443, A5 0.00251, C1 0, C2 0.105, C3 0, C4 0.358, D -8.705

## Use advice
Gültigkeitsbereich:
Thermofloc – Zellulosedämmung boratfrei, aus dem Werk der Fa. Peter Seppele Gesellschaft m.b.H., Bahnhofstraße 79, 9710-Feistritz/Drau, in Österreich.
Systemgrenze:
Bilanz von der Wiege bis zur Bahre. Die Ökobilanz bezieht sich auf die Bereitstellung (Modul A1), den Transport (Modul A2), die Herstellung (Modul A3), die Auslieferung (Modul A4), den Einbau (Modul A5), die Entsorgungsphase (Module C1-C4) sowie die Gutschriften und Lasten (Modul D).

## Data sources
- Thermofloc.pdf
- GaBi Database (all versions)
- GaBi database SP20 2013
