# Eurolight beschichtet

Dataset: ILCD process, EPD, specific dataset
Geography: EU-27
Reference year: 2015
Valid until: 2020
Classification: OEKOBAU.DAT: Holz / Holzwerkstoffe / Spanplatten
Classification: IBUCategories: 02 Bauprodukte / Holzwerkstoffe / Holzwerkstoffe
Method details: Holzwerkstoffe.pdf
Owner: Fritz EGGER GmbH & Co. OG Holzwerkstoffe
Compliance: DIN EN 15804; ISO 14025
Review: Accredited third party review by IBU
Amounts: rows without a unit in brackets have none in this file; such an amount is in the reference unit of its flow, which a separate flow dataset defines
copyright: true

## General comment
EUROLIGHT® dekor ist eine Leichtbauplatte mit einer melaminharzbeschichteten Spanplatte als Decklage und einem Kartonwabenkern im Inneren. Diese Sandwichplatte bietet eine maximale Gewichtseinsparung ohne Verlust von Tragfähigkeit und Steifigkeit.

Es wird ein durchschnittliches Produkt mit einer Gesamtstärke von 42,6 mm und einem Flächengewicht von 12,4 kg/m² betrachtet. Die Gesamtstärke sowie das Flächengewicht des Produktes stellen Mittelwerte dar, welche mit den Produktionsmengen der verschiedenen Dicken gewichtet wurden.

## Technology and included processes
Melaminbeschichtete Leichtbauplatte mit Decklagen aus Dünnspanplatte und einer Kartonwaben-Mittellage Herstellung der Rohplatten (Decklage) 1. Rundholzzerspanung 2. Hackschnitzelaufbereitung 3. Restholzaufbereitung 4. Trocknung der Späne auf ca. 2-3 % Restfeuchte 5. Beleimung der Späne 6. Streuung der beleimten Späne auf ein Formband 7. Verpressen des Spänekuchens in einer kontinuierlich arbeitenden Kalander-Heißpresse 8. Schleifen der Ober- und Unterseite 9. Aufteilen und Besäumen des Plattenstranges zu Rohplattenformaten 10. Abstapelung zu Großstapeln Herstellung der Imprägnate 1. Abwicklung der Rohpapiere 2. Aufnahme von Imprägnierharz (MUF) in der Anlage 3. Trocknung des imprägnierten Papiers in beheizten Trocknern 4. Formatierung des endlosen Papiers mittels Querschneider 5. Abstapelung der formatierten Bögen auf Paletten Herstellung der beschichteten Spanplatten: 1. Legung der Imprägnate auf die Oberund Unterseite der Rohplatte 2. Verpressung der Platte in der Heißpresse mit verschieden strukturierten Pressblechen 3. Qualitätssortierung und Abstapelung Herstellung der Leichtbauplatten 1. Auftrennung der beiden verbundenen beschichteten Platten mittels Längskreissägen und Quertrennmesser 2. Beleimung der beiden Decklagen mit PURKlebstoffsystem 3. Expansion der Sechseckwabe im Durchlauftrockner 4. Verbindung der beleimten Decklage mit der Mittellage 5. Kalibrierung des Verbundelementes in einer kontinuierlichen Kalibrierpresse 6. Besäumen und setzen von Trennschnitten 7. Abstapelung und Verpackung der Platten
Deklarierte Einheit:
Die Deklaration bezieht sich auf die Herstellung von
einem Kubikmeter beschichteter Eurolight Platte.
Unbeschichtete Eurolight Platten weisen eine mittlere
Dichte von 12,4 kg/m² und eine durchschnittliche Gesamtdicke von 42,6 mm auf. Der Durchschnitt wurde nach Produktionsmengen der einzelnen Dicken gewichtet.

## Technical purpose
Melaminharzbeschichtete Leichtbauplatten werden im dekorativen Innenausbau, im Möbel- sowie im Türenbau eingesetzt. Sie finden beispielsweise im Küchenbereich als Arbeitsplatte oder als Innentür Anwendung. Leichtbauplatten werden dort eingesetzt, wo ein massives Erscheinungsbild, aber ein geringes Gewicht gewünscht ist.

## Reference product
- 1 m² beschichtete Leichtbauplatte: 1

## Inputs
- Erneuerbare Primärenergie als Energieträger (PERE) [MJ]: A1-A3 49.0862
- Erneuerbare Primärenergie zur stofflichen Nutzung (PERM) [MJ]: A1-A3 187.623
- Total erneuerbare Primärenergie (PERT) [MJ]: A1-A3 236.709, D -29.3125
- Nicht-erneuerbare Primärenergie als Energieträger (PENRE) [MJ]: A1-A3 148.811
- Nicht-erneuerbare Primärenergie zur stofflichen Nutzung (PENRM) [MJ]: A1-A3 30.7499
- Total nicht erneuerbare Primärenergie (PENRT) [MJ]: A1-A3 179.561, D -217.097
- Einsatz von Sekundärstoffen (SM) [kg]: A1-A3 0.383, D 0
- Erneuerbare Sekundärbrennstoffe (RSF) [MJ]: A1-A3 0, D 187.623
- Nicht erneuerbare Sekundärbrennstoffe (NRSF) [MJ]: A1-A3 0, D 30.7499
- Einsatz von Süßwasserressourcen (FW) [m^3]: A1-A3 0.039696, D -0.0423975

## Outputs
- Gefährlicher Abfall zur Deponie (HWD) [kg]: A1-A3 0.00017976, D -7.62263e-5
- Entsorgter nicht gefährlicher Abfall (NHWD) [kg]: A1-A3 0.0627962, D 0.0247992
- Entsorgter radioaktiver Abfall (RWD) [kg]: A1-A3 0.00282977, D -0.0208592
- Komponenten für die Wiederverwendung (CRU) [kg]: A1-A3 0
- Stoffe zum Recycling (MFR) [kg]: A1-A3 0
- Stoffe für die Energierückgewinnung (MER) [kg]: C3 12.7
- Exportierte elektrische Energie (EEE) [MJ]
- Exportierte thermische Energie (EET) [MJ]

## Impact indicators
- Globales Erwärmungspotenzial (GWP) [kg CO_(2)-Äq.]: A1-A3 -7.85918, C3 20.4395, D -12.2991
- Abbau Potential der stratosphärischen Ozonschicht (ODP) [kg CFC11-Äq.]: A1-A3 2.74331e-10, D -5.82061e-9
- Versauerungspotenzial von Boden und Wasser (AP) [kg SO_(2)-Äq.]: A1-A3 0.0276847, D -0.00756651
- Eutrophierungspotenzial (EP) [kg PO_(4)^(3)-Äq.]: A1-A3 0.00733512, D 5.64761e-6
- Bildungspotential für troposphärisches Ozon (POCP) [kg Ethen-Äq.]: A1-A3 0.00660221, D 0.0010204
- Potenzial für den abiotischen Abbau nicht fossiler Ressourcen (ADPE) [kg Sb-Äq.]: A1-A3 7.26507e-6, D -1.40057e-6
- Potenzial für den abiotischen Abbau fossiler Brennstoffe (ADPF) [MJ]: A1-A3 172.421, D -164.733

## Use advice
Gültigkeitsbereich:
Dieses Dokument bezieht sich auf die von EGGER Holzwerkstoffe GmbH & Co. OG im Werk Wörgl und St. Johann in Tirol (Österreich) hergestellten beschichteten Leichtbauplatten.
Systemgrenze:
Es handelt sich um eine „von der Wiege bis zum Werkstor, mit Optionen" EPD. Die Lebenszyklusanalyse für die betrachteten Produkte umfasst die Lebenswegabschnitte „Produktstadium", sowie „Gutschriften und Lasten jenseits der Grenzen des Produktsystems". Die Systeme beinhalten somit folgende Stadien gemäß /EN 15804/: Produktstadium (Module A1-A3):

Modul A1 Rohstoffbereitstellung und -verarbeitung und Verarbeitungsprozesse von als Input dienenden Sekundärstoffen
Modul A2 Transport zum Hersteller
Modul A3 HerstellungEntsorgungsstadium (C3)

Modul C3:im Sinne der Klimaneutralität werden in C3 die biogenen Kohlendioxid-Emission deklariert Gutschriften und Lasten jenseits der Grenzen des
Produktsystems (Modul D):

Modul D beinhaltet das Rückgewinnungspotential der Nettoflüsse, welche die Systemgrenze am Lebensende verlassen. Das Produkt erreicht den End-of-Waste Status nach Ausbau aus dem Gebäude und wird zu 100% in einer europäischen Biomasseanlage thermisch verwertet. Die Lasten der thermischen Verwertung und die Gutschriften der erzeugten Energie werden in Modul D deklariert.

## Data sources
- Eurolight beschichtet.pdf
- GaBi Database (all versions)
- GaBi database SP27 2015
