# Sanitärkeramik

Dataset: ILCD process, EPD, average dataset
Geography: DE
Reference year: 2015
Valid until: 2020
Classification: OEKOBAU.DAT: Gebäudetechnik / Sanitär / Sanitärkeramik
Classification: IBUCategories: 03 Gebäudetechnik / Sanitäreinrichtungen / Sanitärkeramik
Method details: Sanitärkeramik.pdf
Owner: DURAVIT AG
Compliance: DIN EN 15804; ISO 14025
Review: Accredited third party review by IBU
Amounts: rows without a unit in brackets have none in this file; such an amount is in the reference unit of its flow, which a separate flow dataset defines
copyright: true

## General comment
Zur Gruppe der Sanitärkeramik gehören vor allem Waschtische, Bidets, WC’s, Urinale und Spülkästen, sowie Küchenspülen. Die Produkte bestehen hauptsächlich aus Materialien wie Ton, Kaolin, Quarz und Schamotte. Für die Berechnung der Umweltauswirkungen wurde ein repräsentatives Durchschnittsprodukt von Sanitärkeramik auf Basis des gesamten Absatzvolumens nach Masse der jeweiligen Produkte für das Jahr 2013 gebildet. Sanitärkeramiken werden nach der Aufbereitung des Schlickers gegossen oder gepresst, getrocknet, glasiert und anschließend gebrannt.

## Technology and included processes
Die betrachtete Produktgruppe Sanitärkeramik besteht hauptsächlich aus Materialien wie Ton, Kaolin, Quarz, Schamotte und Feldspat. Der Herstellungsprozess gliedert sich wie folgt: - Lagerung und ggf. Trocknung der Rohstoffe - Herstellung des Schlickers - Glasur - Gießen - Trocknung - Glasieren - Brennen in einem Tunnelofen - Produktprüfung und ggf. Oberflächenveredelung - Verpacken, Lagerung und Versand
Technische Daten:
Sanitärkeramik unterliegt folgenden (bau) technischen Daten (Angabe erfolgt in L x B x H):
Weitere technische Daten gemäß der PCR Teil B sind nicht relevant für die Produktgruppe der Sanitärkeramik.
Deklarierte Einheit:
Für die Berechnung der Ökobilanz von Sanitärkeramik wird eine deklarierte Einheit von 1 Tonne zugrunde gelegt. Alle Umweltwirkungen des Produktes werden auf eine Tonne (t) Sanitärkeramik bezogen. Kapitel 2.5 gibt einen Überblick über die Masse pro Produkt.
Auf Basis der Umweltauswirkungen wird eine Herstellerdeklaration für ein Durchschnittsprodukt eines Standortes von DURAVIT Sanitärkeramik erstellt. Auf Grund der vergleichbaren Herstellungsweise wird ein Durchschnittsprodukt aus Waschtischen, Bidets, WC‘s, Urinale, Spülkästen, sowie Küchenspülen, auf Basis des gesamten Absatzvolumens der jeweiligen Produkte für das Jahr 2013 gebildet.
Die Verpackung wird mit einem durchschnittlichen Gewicht von 61,2 kg pro deklarierte Einheit definiert.

## Technical purpose
Zur Gruppe der Sanitärkeramik gehören vor allem Waschtische, Bidets, WC’s, Urinale und Spülkästen. Diese Produkte sind Einrichtungsgegenstände für Badezimmer, und werden insbesondere für die Körperhygiene benutzt. Aufgrund des vergleichbaren Herstellungsprozesses können auch Küchenspülen dieser Gruppe zugeordnet werden. Küchenspülen sind ebenfalls Einrichtungsgegenstände.

## Reference product
- Sanitärkeramik: 1000

## Inputs
- Erneuerbare Primärenergie als Energieträger (PERE) [MJ]: A1-A3 3841
- Erneuerbare Primärenergie zur stofflichen Nutzung (PERM) [MJ]: A1-A3 0
- Total erneuerbare Primärenergie (PERT) [MJ]: A1-A3 3841
- Nicht-erneuerbare Primärenergie als Energieträger (PENRE) [MJ]: A1-A3 23522
- Nicht-erneuerbare Primärenergie zur stofflichen Nutzung (PENRM) [MJ]: A1-A3 0
- Total nicht erneuerbare Primärenergie (PENRT) [MJ]: A1-A3 23522
- Einsatz von Sekundärstoffen (SM) [kg]: A1-A3 0
- Erneuerbare Sekundärbrennstoffe (RSF) [MJ]: A1-A3 0
- Nicht erneuerbare Sekundärbrennstoffe (NRSF) [MJ]: A1-A3 0
- Einsatz von Süßwasserressourcen (FW) [m^3]: A1-A3 155

## Outputs
- Gefährlicher Abfall zur Deponie (HWD) [kg]
- Entsorgter nicht gefährlicher Abfall (NHWD) [kg]: A1-A3 85
- Entsorgter radioaktiver Abfall (RWD) [kg]
- Komponenten für die Wiederverwendung (CRU) [kg]
- Stoffe zum Recycling (MFR) [kg]
- Stoffe für die Energierückgewinnung (MER) [kg]
- Exportierte elektrische Energie (EEE) [MJ]
- Exportierte thermische Energie (EET) [MJ]

## Impact indicators
- Globales Erwärmungspotenzial (GWP) [kg CO_(2)-Äq.]: A1-A3 746.06
- Abbau Potential der stratosphärischen Ozonschicht (ODP) [kg CFC11-Äq.]: A1-A3 7.06e-6
- Versauerungspotenzial von Boden und Wasser (AP) [kg SO_(2)-Äq.]: A1-A3 1.49
- Eutrophierungspotenzial (EP) [kg PO_(4)^(3)-Äq.]: A1-A3 0.28
- Bildungspotential für troposphärisches Ozon (POCP) [kg Ethen-Äq.]: A1-A3 0.22
- Potenzial für den abiotischen Abbau nicht fossiler Ressourcen (ADPE) [kg Sb-Äq.]: A1-A3 0.00187
- Potenzial für den abiotischen Abbau fossiler Brennstoffe (ADPF) [MJ]: A1-A3 22189.3

## Use advice
Gültigkeitsbereich:
Gegenstand der vorliegenden Studie ist die Erstellung einer Ökobilanz für Sanitärkeramik der DURAVIT AG inklusive Verpackung, produziert am Standort Hornberg in Deutschland. Auf Grund einer vergleichbaren Herstellungsweise wird ein Durchschnittsprodukt aus Waschtischen, Bidets, WC's, Urinalen, Spülkästen und Küchenspülen, auf Basis des gesamten Absatzvolumens der jeweiligen Produkte für das Jahr 2013 gebildet.
Systemgrenze:
Die Systemgrenzen enthalten alle relevanten Prozessschritte der Herstellung von Sanitärkeramik innerhalb der Betrachtung Wiege bis Werkstor. Das heißt, dass gemäß dem zugrunde liegenden PCR-Dokument alle Prozesse bis zum Werkstor betrachtet werden (Produktionsstadium A1-A3). Der anschließende Transport des Produktes zur Baustelle ist in der Berechnung nicht mehr enthalten.

Grundsätzlich kann das System in drei Hauptprozesse eingeteilt werden:

Bereitstellung und Produktion der Vorprodukte und Verpackungsmaterialen (Modul A1)

Transporte der Vorprodukte sowie der Verpackungsmaterialien zum Werk (Modul A2)

Produktion von Sanitärkeramik im Werk, sowie Aufbereitung und Entsorgung von Produktionsabfällen (Modul A3)

Die folgende Abbildung gibt einen zusammenfassenden Überblick über die Systemgrenzen der Studie:

## Data sources
- Sanitärkeramik.pdf
- GaBi Database (all versions)
- GaBi database SP26 2014
