# Schichtstoff Flammex

Dataset: ILCD process, EPD, specific dataset
Geography: DE
Reference year: 2015
Valid until: 2020
Classification: OEKOBAU.DAT: Beschichtungen / Innenbeschichtungen / Wand- und Deckenbeläge
Classification: IBUCategories: 02 Bauprodukte / Inneneinrichtung / Schichtpressstoffe
Method details: Schichtpressstoffe.pdf
Owner: Fritz EGGER GmbH & Co.OG
Compliance: DIN EN 15804; ISO 14025
Review: Accredited third party review by IBU
Amounts: rows without a unit in brackets have none in this file; such an amount is in the reference unit of its flow, which a separate flow dataset defines
copyright: true

## General comment
EGGER Schichtstoffe Flammex sind dekorative Schichtstoffe auf Basis härtbarer Harze (Schichtpressstoffe). Schichtpressstoffe bestehen aus Zellulosefaserbahnen (Papier), die mit wärmehärtenden Harzen imprägniert sind. Sie sind mehrschichtig aufgebaut und bestehen aus melaminharzimprägniertem Dekorpapier und einem oder mehreren mit Phenolharz imprägnierten Natronkraftpapier/-en, die unter hohem Druck und Wärme miteinander verpresst werden. Die Schichtstoffqualität Flammex kann gemäß Norm /EN 438:2016/ als Schichtstofftype F –Flammenhemmend klassifiziert werden. Schichtstoff Flammex wird im Brandfall den speziellen Anforderungen der Baustoffklasse B1, gemäß /DIN 4102-1: 1998-05/ sowie der französischen Brandverhaltensklasse M1, gemäß /NF P92-501/, gerecht. Der Schichtstoffaufbau, die Harz- und Papierqualitäten, die Oberflächenstrukturen, die Verwendung spezieller Overlays sowie die Pressparameter bei der Herstellung entscheiden über die Schichtstoffqualität und somit über die spätere Anwendung bzw. das Einsatzgebiet.

## Technology and included processes
Produktbeschreibung EGGER Schichtstoffe Flammex sind dekorative Schichtstoffe auf Basis härtbarer Harze (Schichtpressstoffe). Schichtpressstoffe bestehen aus Zellulosefaserbahnen (Papier), die mit wärmehärtenden Harzen imprägniert sind. Sie sind mehrschichtig aufgebaut und bestehen aus melaminharzimprägniertem Dekorpapier und einem oder mehreren mit Phenolharz imprägnierten Natronkraftpapier/-en, die unter hohem Druck und Wärme miteinander verpresst werden. Die Schichtstoffqualität Flammex kann gemäß Norm /EN 438:2005/ als Schichtstofftype F –Flammenhemmend klassifiziert werden. Schichtstoff Flammex wird im Brandfall den speziellen Anforderungen der Baustoffklasse B1, gemäß /DIN 4102-1: 1998-05/ sowie der französischen Brandverhaltensklasse M1, gemäß /NF P92-501/, gerecht. Der Schichtstoffaufbau, die Harz- und Papierqualitäten, die Oberflächenstrukturen, die Verwendung spezieller Overlays sowie die Pressparameter bei der Herstellung entscheiden über die Schichtstoffqualität und somit über die spätere Anwendung bzw. das Einsatzgebiet. Herstellung EGGER Schichtstoffe werden ausschließlich kontinuierlich hergestellt. Mittels Doppelbandpressen ist es möglich, unterschiedliche Schichtstoffdicken und Qualitäten endlos herzustellen. Diese Art der Schichtstoffherstellung bzw. -qualität wird im Allgemeinen als CPL (Continuous Pressed Laminates) bezeichnet. Abhängig vom Herstelldruck werden EGGER Schichtstoffe gemäß oder in Anlehnung an /EN 438-3:2005/ hergestellt. Die Schichtstoffe bestehen aus Schichten von Zellulosefaserstoffbahnen (üblicherweise Papier), die mit härtbaren Harzen imprägniert sind. Die mit dekorativen Farben oder Mustern versehene(n) einseitige(n) Deckschicht(en) ist (sind) mit Harzen auf Melaminbasis imprägniert. Die Kernschichten sind mit Phenolharzen imprägniert. Die Zufuhr von Wärme und Druck bewirkt ein Fließen und anschließendes Aushärten der Harze. Durch die Vernetzung der Harze, verstärkt durch die Zellulosefasern der Papiere, entsteht ein sehr dichtes Material mit geschlossener Oberfläche.
Technische Daten:
EGGER Schichtstoff Flammex wird gemäß der in der /EN438-2:2016/ beschriebenen Prüfverfahren geprüft und erfüllt die in /EN 438-3:2016/ beschriebenen Anforderungen. Im technischen Datenblatt "EGGER Schichtstoff Flammex" finden Sie ausführliche Informationen zu den Qualitätsmerkmalen und Produkteigenschaften. www.egger.com/schichtstoffe
Deklarierte Einheit:
Die deklarierte Einheit ist ein Quadratmeter Schichtstoff Flammex 0,8 mm (1,080 kg/m2).

## Technical purpose
Schichtstoffe sind nicht selbsttragend und dienen als Beschichtungsmaterial. EGGER Schichtstoffe sind nur für die Verwendung im Innenbereich geeignet. Die Schichtstoffqualität Flammex wird hauptsächlich zur Beschichtung von Türen,Trennwänden und überall dort, wo schwerenflammbare Elemente gefordert sind, verwendet.

## Reference product
- 1 m² Schichtstoff Flammex (1.080 kg/m²): 1

## Inputs
- Erneuerbare Primärenergie als Energieträger (PERE) [MJ]: A1-A3 45.3964, C4 0.0483652, D -0.945481
- Erneuerbare Primärenergie zur stofflichen Nutzung (PERM) [MJ]: A1-A3 5.46774, C4 0, D 0
- Total erneuerbare Primärenergie (PERT) [MJ]: A1-A3 50.8642, C4 0.0483652, D -0.945481
- Nicht-erneuerbare Primärenergie als Energieträger (PENRE) [MJ]: A1-A3 72.0062, C4 0.92799, D -9.26998
- Nicht-erneuerbare Primärenergie zur stofflichen Nutzung (PENRM) [MJ]: A1-A3 9.03226, C4 0, D 0
- Total nicht erneuerbare Primärenergie (PENRT) [MJ]: A1-A3 81.0385, C4 0.92799, D -9.26998
- Einsatz von Sekundärstoffen (SM) [kg]: A1-A3 0, C4 0, D 0
- Erneuerbare Sekundärbrennstoffe (RSF) [MJ]: A1-A3 0, C4 0, D 0
- Nicht erneuerbare Sekundärbrennstoffe (NRSF) [MJ]: A1-A3 0, C4 0, D 0
- Einsatz von Süßwasserressourcen (FW) [m^3]: A1-A3 2.49297, C4 0.0565073, D -0.84757

## Outputs
- Gefährlicher Abfall zur Deponie (HWD) [kg]: A1-A3 0.00261232, C4 4.73963e-5, D -2.68698e-6
- Entsorgter nicht gefährlicher Abfall (NHWD) [kg]: A1-A3 0.317346, C4 0.00432377, D -0.00278665
- Entsorgter radioaktiver Abfall (RWD) [kg]: A1-A3 0.0017352, C4 3.43016e-5, D -0.000672171
- Komponenten für die Wiederverwendung (CRU) [kg]
- Stoffe zum Recycling (MFR) [kg]
- Stoffe für die Energierückgewinnung (MER) [kg]
- Exportierte elektrische Energie (EEE) [MJ]: C4 1.86441
- Exportierte thermische Energie (EET) [MJ]: C4 4.31281

## Impact indicators
- Globales Erwärmungspotenzial (GWP) [kg CO_(2)-Äq.]: A1-A3 3.68701, C4 2.07182, D -0.542155
- Abbau Potential der stratosphärischen Ozonschicht (ODP) [kg CFC11-Äq.]: A1-A3 3.1291e-10, C4 7.22563e-12, D -1.87458e-10
- Versauerungspotenzial von Boden und Wasser (AP) [kg SO_(2)-Äq.]: A1-A3 0.0209178, C4 0.00193451, D -0.00145
- Eutrophierungspotenzial (EP) [kg PO_(4)^(3)-Äq.]: A1-A3 0.0035573, C4 0.000493096, D -9.82657e-5
- Bildungspotential für troposphärisches Ozon (POCP) [kg Ethen-Äq.]: A1-A3 0.0020228, C4 0.000118648, D -0.000118833
- Potenzial für den abiotischen Abbau nicht fossiler Ressourcen (ADPE) [kg Sb-Äq.]: A1-A3 3.23931e-6, C4 2.24076e-8, D -5.5051e-8
- Potenzial für den abiotischen Abbau fossiler Brennstoffe (ADPF) [MJ]: A1-A3 76.6683, C4 0.841799, D -7.58259

## Use advice
Gültigkeitsbereich:
Dieses Dokument bezieht sich auf den von der
EGGER Kunststoffe GmbH & Co.KG (eine Tochter von
Fritz EGGER GmbH & Co. OG) im Werk Gifhorn
(Deutschland) hergestellten Schichtstoff Flammex.
Systemgrenze:
Die vorliegende Studie stellt eine Cradle-to-Gate Betrachtung mit Optionen dar. Es werden Modul A1-A3, Modul C4 und Modul D betrachtet. Damit sind im betrachteten System Rohstoffversorgung, Transport, Herstellung und die energetische Nutzung des Produktes enthalten.

Das Referenzjahr der Datensammlung ist das Jahr 2013 im Werk Gifhorn, Deutschland.

Die folgenden Lebenszyklusphasen werden berücksichtigt:

- Produktstadium

- Entsorgungsstadium

- Gutschriften und Lasten außerhalb der Systemgrenzen

Die Systemgrenzen der EPD folgen dem modularen Ansatz der /EN 15804/.

## Data sources
- Schichtstoff Flammex.pdf
- GaBi Database (all versions)
- GaBi database SP20 2013
