# MDF beschichtet

Dataset: ILCD process, EPD, specific dataset
Geography: RER
Reference year: 2015
Valid until: 2020
Classification: OEKOBAU.DAT: Holz / Holzwerkstoffe / Holzfaserplatten
Classification: IBUCategories: 02 Bauprodukte / Holzwerkstoffe / Holzwerkstoffe
Method details: Holzwerkstoffe.pdf
Owner: Fritz EGGER GmbH & Co. OG Holzwerkstoffe
Compliance: DIN EN 15804; ISO 14025
Review: Accredited third party review by IBU
Amounts: rows without a unit in brackets have none in this file; such an amount is in the reference unit of its flow, which a separate flow dataset defines
copyright: true

## General comment
EURODEKOR MDF-Platten sind plattenförmige Werkstoffe gemäß /EN 622-5/ und /EN 14322/. Diese Werkstoffplatten werden vorwiegend als Möbelplatte eingesetzt. Sie finden bspw. als Tiefziehfronten im Küchenbereich Anwendung. Die dekorative Zeichnung wird mittels eines bedruckten Dekorpapiers erreicht. Bei der Verpressung wird der Oberfläche gleichzeitig eine entsprechende Haptik verliehen.

## Technology and included processes
Herstellung der Rohplatten: 1. Entrindung der Stämme 2. Zerspanung des Holzes zu Spänen 3. Kochen der Späne 4. Zerfaserung im Refiner 5. Trockung der Fasern auf ca. 2-3% Restfeuchte 6. Beleimung der Fasern mit Harzen 7. Streuung der beleimten Fasern auf ein Formband 8. Verpressen der Fasermatte in einer kontinuierlich arbeitenden Heißpresse 9. Aufteilen und Besäumen des Faserstranges zu Rohplattenformaten 10. Auskühlen der Rohplatten in Sternkühlwendern 11. Abstapelung zu Großstapeln 12. Nach Klimatisierungsphase Schleifen der Oberund Unterseite Herstellung der Imprägnate: 1. Abwicklung der Rohpapiere 2. Aufnahme von Imprägnierharz (MUF) in der Anlage 3. Trocknung des imprägnierten Papiers in beheizten Trocknern 4. Formatierung des endlosen Papiers mittels Querschneider 5. Abstapelung der formatierten Bögen auf Paletten Herstellung der beschichteten MDF Platten: 1. Legung der Imprägnate auf die Ober- und Unterseite der Rohplatte 2. Verpressung der Platte in der Heißpresse mit verschieden strukturierten Pressblechen / -bändern 3. Qualitätssortierung und Abstapelung 4. Klimatisierungsphase von bis zu 14 Tagen Alle während der Produktion anfallenden Reste (Besäum-, Schneid- und Fräsreste) werden ausnahmslos einer thermischen Verwertung zugeführt.
Technische Daten:
Technische Daten für EGGER MDF-ST E1CE
Deklarierte Einheit:
Die Deklaration bezieht sich auf die Herstellung von 1 m² beschichteter MDF Platte mit einer durchschnittlichen Dicke von 11,7 mm und einem Flächengewicht von 12,7 kg/m².

## Technical purpose
Beschichtete MDF-Platten werden im Innenbereich für höherwertige Zwecke im Möbelbau eingesetzt. MDF-Platten können aufgrund ihres homogenen Aufbaues dreidimensional ausgefräst und anschließend entweder lackiert oder mit einer Folie in einer Membranpresse beschichtet werden. Gerne werden solcherart hergestellte Platten als Fronten für hochwertige Küchen eingesetzt.

## Reference product
- 1 m² MDF Platte beschichtet: 1

## Inputs
- Erneuerbare Primärenergie als Energieträger (PERE) [MJ]: A1-A3 148.298
- Erneuerbare Primärenergie zur stofflichen Nutzung (PERM) [MJ]: A1-A3 202.448
- Total erneuerbare Primärenergie (PERT) [MJ]: A1-A3 350.746, D -9.22433
- Nicht-erneuerbare Primärenergie als Energieträger (PENRE) [MJ]: A1-A3 167.208
- Nicht-erneuerbare Primärenergie zur stofflichen Nutzung (PENRM) [MJ]: A1-A3 34.2163
- Total nicht erneuerbare Primärenergie (PENRT) [MJ]: A1-A3 201.425, D -77.6835
- Einsatz von Sekundärstoffen (SM) [kg]: A1-A3 0.00472151, D -0.000432615
- Erneuerbare Sekundärbrennstoffe (RSF) [MJ]: A1-A3 156.087, D 202
- Nicht erneuerbare Sekundärbrennstoffe (NRSF) [MJ]: A1-A3 0, D 34.2
- Einsatz von Süßwasserressourcen (FW) [m^3]: A1-A3 0.0427959, D -0.0177242

## Outputs
- Gefährlicher Abfall zur Deponie (HWD) [kg]: A1-A3 0.00618485, D -0.00698716
- Entsorgter nicht gefährlicher Abfall (NHWD) [kg]: A1-A3 0.192967, D 0.0530845
- Entsorgter radioaktiver Abfall (RWD) [kg]: A1-A3 0.00392878, D -0.00727231
- Komponenten für die Wiederverwendung (CRU) [kg]: A1-A3 0
- Stoffe zum Recycling (MFR) [kg]: A1-A3 0
- Stoffe für die Energierückgewinnung (MER) [kg]: C3 7.87736
- Exportierte elektrische Energie (EEE) [MJ]
- Exportierte thermische Energie (EET) [MJ]

## Impact indicators
- Globales Erwärmungspotenzial (GWP) [kg CO_(2)-Äq.]: A1-A3 -8.10026, C3 14.5731, D -11.3
- Abbau Potential der stratosphärischen Ozonschicht (ODP) [kg CFC11-Äq.]: A1-A3 1.22226e-8, D -1.94271e-9
- Versauerungspotenzial von Boden und Wasser (AP) [kg SO_(2)-Äq.]: A1-A3 0.0318474, D -0.00251964
- Eutrophierungspotenzial (EP) [kg PO_(4)^(3)-Äq.]: A1-A3 0.0121803, D 9.84417e-5
- Bildungspotential für troposphärisches Ozon (POCP) [kg Ethen-Äq.]: A1-A3 0.00886125, D 0.000449468
- Potenzial für den abiotischen Abbau nicht fossiler Ressourcen (ADPE) [kg Sb-Äq.]: A1-A3 5.61701e-6, D -4.4381e-7
- Potenzial für den abiotischen Abbau fossiler Brennstoffe (ADPF) [MJ]: A1-A3 191.364, D -59.4231

## Use advice
Gültigkeitsbereich:
Dieses Dokument bezieht sich auf beschichtete mitteldichte Faserplatten EGGER MDF (Durchschnitt), welche in folgendem Werk der Gruppe hergestellt werden:

Egger Holzwerkstoffe Wismar GmbH & Co. KG, Am Haffeld 1, 23970 Wismar, Deutschland
Systemgrenze:
Es handelt sich um eine „von der Wiege bis zum Werkstor, mit Optionen" EPD. Die Lebenszyklusanalyse für das betrachtete Produkt umfasst die Lebenswegabschnitte „Produktstadium", sowie „Gutschriften und Lasten jenseits der Grenzen des Produktsystems". Die Systeme beinhalten somit folgende Stadien gemäß /EN 15804/: Produktstadium (Module A1-A3):

A1 Rohstoffbereitstellung und -verarbeitung und Verarbeitungsprozesse von als Input dienenden Sekundärstoffen
A2 Transport zum Hersteller
A3 Herstellung

Gutschriften und Lasten jenseits der Grenzen des Produktsystems (Modul D):
D Wiederverwendungs-; Rückgewinnungs- oder Recyclingpotential

## Data sources
- MDF beschichtet.pdf
- GaBi Database (all versions)
- GaBi database SP26 2014
