# Sanitäracryl

Dataset: ILCD process, EPD, average dataset
Geography: EG
Reference year: 2015
Valid until: 2020
Classification: OEKOBAU.DAT: Gebäudetechnik / Sanitär / Dusch- und Badewannen
Classification: IBUCategories: 03 Gebäudetechnik / Sanitäreinrichtungen / Bade- und Duschwannen aus Stahl-Email oder Acryl
Method details: Bade- und Duschwannen aus Stahl-Email oder Acryl.pdf
Owner: DURAVIT AG
Compliance: DIN EN 15804; ISO 14025
Review: Accredited third party review by IBU
Amounts: rows without a unit in brackets have none in this file; such an amount is in the reference unit of its flow, which a separate flow dataset defines
copyright: true

## General comment
Zur Gruppe Sanitäracryl zählen Bade- und Duschwannen, Pools sowie Acrylwannenverkleidungen. Die Produkte bestehen hauptsächlich aus Materialien wie Acrylplatten (PMMA – Polymethylmethacrylat), Kunstharz (Polyesterharz), Glasfaser, Calciumcarbonat und Holz. Für die Berechnung der Umweltauswirkungen wurde ein repräsentatives Durchschnittsprodukt von Sanitäracryl auf Basis des gesamten Absatzvolumens nach Masse der jeweiligen Produkte für das Jahr 2013 gebildet. Die Wannen sowie Pools bestehen aus einem tiefgezogenen Acrylgrundkörper, der mit Hilfe von Holz und einem Glasfaser-Kunstharz-Gemisch auf der Unterseite verstärkt wird.

## Technology and included processes
Die betrachtete Produktgruppe Sanitäracryl besteht hauptsächlich aus Materialien wie Acrylplatten (PMMA – Polymethylmethacrylat), Kunstharz (Polyesterharz), Fiberglass, Kalziumcarbonat und Holz. Der Herstellungsprozess gliedert sich wie folgt: Nach Anlieferung der Acryl- (PMMA-)Platten werden diese zunächst von Staub und anderen Fremdpartikeln befreit, geschnitten und anschließend thermisch verformt, um in eine vorgeformte Form tiefgezogen zu werden. Nach Abkühlung erfolgt die Polymerisation. Es folgt die Endbearbeitung. Im Anschluss werden die Produkte verpackt, gelagert und versandt.
Technische Daten:
Bade- und Duschwannen von Duravit erfüllen je nach Modell, verwendetem Installationszubehör sowie baulicher Situation einzelne oder mehrere Schallschutznormen. Hierzu zählen:

/DIN 4109 (A1)/, /VDI 4100/, /SIA 181/

Die Abmaße der Produkte im Lieferzustand sind in der folgenden Tabelle aufgelistet und werden in L x B x H angegeben. Weitere technische Daten sind für die Produktgruppe des Sanitäracryl nicht relevant.
Deklarierte Einheit:
Für die Berechnung der Ökobilanz von Sanitäracryl wird eine deklarierte Einheit von 1 m² Acryl-Oberfläche zugrunde gelegt. Alle Umweltwirkungen des Produktes werden auf 1 m² Acryl-Oberfläche bezogen. Auf Grund der identischen Herstellungsweise wird ein Durchschnittsprodukt aus Bade- und Duschwannen, sowie aus Acrylwannenverkleidungen auf Basis des gesamten Absatzvolumens der jeweiligen Produkte für das Jahr 2013 gebildet.

Zubehörteile für die Produkte sowie technische Komponenten für Whirlwannen und Pools werden innerhalb dieser Studie nicht betrachtet, da die Analyse von elektronischen Sensoren und Düsen für Badewannensysteme den Rahmen dieser Studie übersteigen würde. Darüber hinaus finden Füße und Fußsysteme kaum Anwendung bei den betrachteten Produkten.

Die Schichtdicke der Acrylfläche kann folgendermaßen für die jeweiligen Produkte unterschieden werden:

Badewannen: 4-5 mm

Duschewannen: 3,2-4 mm

Verkleidungen: 4-5 mm

Folgende Tabelle gibt eine weitere Übersicht über wichtige Parameter. Die Dichte von PMMA-Platten wird in der Literatur mit 1,19 g/cm³ angegeben. Das Durchschnittsprodukt ohne Verpackung weist ein Gesamtgewicht von 10,66 kg bezogen auf die deklarierte Einheit auf. Die Verpackung wird mit einem Gewicht von 0,34 kg pro deklarierte Einheit definiert.

## Technical purpose
Zur Gruppe Sanitäracryl zählen Bade- und Duschwannen, Pools sowie Acrylwannenverkleidungen, die hauptsächlich in Badezimmern zum Einsatz kommen. Bade- und Duschwannen sind Einrichtungsgegenstände für Badezimmer, die insbesondere für die Körperhygiene benutzt werden. Acrylwannenverkleidungen sind als Zubehör für Badewannen erhältlich.

## Reference product
- 1 m² Acryl-Oberfläche: 1

## Inputs
- Erneuerbare Primärenergie als Energieträger (PERE) [MJ]: A1-A3 70.01, C4 0.31, D -0.75
- Erneuerbare Primärenergie zur stofflichen Nutzung (PERM) [MJ]: A1-A3 0, C4 0, D 0
- Total erneuerbare Primärenergie (PERT) [MJ]: A1-A3 70.01, C4 0.31, D -0.75
- Nicht-erneuerbare Primärenergie als Energieträger (PENRE) [MJ]: A1-A3 803.49, C4 4, D -146
- Nicht-erneuerbare Primärenergie zur stofflichen Nutzung (PENRM) [MJ]: A1-A3 0, C4 0, D 0
- Total nicht erneuerbare Primärenergie (PENRT) [MJ]: A1-A3 803.49, C4 4, D -146
- Einsatz von Sekundärstoffen (SM) [kg]
- Erneuerbare Sekundärbrennstoffe (RSF) [MJ]
- Nicht erneuerbare Sekundärbrennstoffe (NRSF) [MJ]
- Einsatz von Süßwasserressourcen (FW) [m^3]: A1-A3 6.17, C4 0.03, D -0.66

## Outputs
- Gefährlicher Abfall zur Deponie (HWD) [kg]
- Entsorgter nicht gefährlicher Abfall (NHWD) [kg]: A1-A3 0.022
- Entsorgter radioaktiver Abfall (RWD) [kg]
- Komponenten für die Wiederverwendung (CRU) [kg]
- Stoffe zum Recycling (MFR) [kg]
- Stoffe für die Energierückgewinnung (MER) [kg]: C4 11.0036
- Exportierte elektrische Energie (EEE) [MJ]: C4 21.4
- Exportierte thermische Energie (EET) [MJ]: C4 67.3

## Impact indicators
- Globales Erwärmungspotenzial (GWP) [kg CO_(2)-Äq.]: A1-A3 44.29, C4 17.61, D -9.11
- Abbau Potential der stratosphärischen Ozonschicht (ODP) [kg CFC11-Äq.]: A1-A3 2.07e-8, C4 2.64e-8, D -9.68e-10
- Versauerungspotenzial von Boden und Wasser (AP) [kg SO_(2)-Äq.]: A1-A3 0.224, C4 0.004, D -0.007
- Eutrophierungspotenzial (EP) [kg PO_(4)^(3)-Äq.]: A1-A3 0.0215, C4 0.0009, D -0.001
- Bildungspotential für troposphärisches Ozon (POCP) [kg Ethen-Äq.]: A1-A3 0.028, C4 0.000208, D -0.001
- Potenzial für den abiotischen Abbau nicht fossiler Ressourcen (ADPE) [kg Sb-Äq.]: A1-A3 0.00017, C4 4.16e-8, D -3.43e-5
- Potenzial für den abiotischen Abbau fossiler Brennstoffe (ADPF) [MJ]: A1-A3 766.06, C4 3, D -145

## Use advice
Gültigkeitsbereich:
Gegenstand der vorliegenden Studie ist die Erstellung einer Ökobilanz für Sanitäracryl der DURAVIT AG inklusive Verpackung, produziert am Standort Kairo in Ägypten. Auf Grund der identischen Herstellungsweise wird ein Durchschnittsprodukt aus Bade- und Duschwannen, als auch aus Acrylwannenverkleidungen, auf Basis des gesamten Absatzvolumens der jeweiligen Produkte für das Jahr 2013 gebildet.
Systemgrenze:
Die Systemgrenzen enthalten alle relevanten Prozessschritte der Herstellung von Sanitäracryl innerhalb der Betrachtung von der Wiege bis zum Werkstor mit Optionen. Das heißt, dass gemäß dem zugrunde liegenden PCR-Dokument alle Prozesse bis zum Werkstor betrachtet werden (Produktionsstadium A1-A3). Der anschließende Transport des Produktes zur Baustelle ist in der Berechnung nicht mehr enthalten. Für die Entsorgungsphase wurde auf Basis von Expertenwissen der DURAVIT AG ein repräsentatives Entsorgungsszenario modelliert (Entsorgungsstadium C4 sowie Gutschriften und Lasten außerhalb der Systemgrenze D).

Grundsätzlich kann das System in vier Hauptprozesse eingeteilt werden:

- Bereitstellung und Produktion der Vorprodukte und Verpackungsmaterialien (Modul A1)

- Transporte der Vorprodukte sowie der Verpackungsmaterialien zum Werk (Modul A2)

- Produktion von Sanitäracryl im Werk (Modul A3)

- Entsorgung von Sanitäracryl (Modul C4 & D)

Die folgende Abbildung gibt einen zusammenfassenden Überblick über die Systemgrenzen der Studie:

## Data sources
- Sanitäracryl.pdf
- GaBi Database (all versions)
- GaBi database SP26 2014
