# Sikaplan SGmA

Dataset: ILCD process, EPD, specific dataset
Geography: RER
Reference year: 2015
Valid until: 2020
Classification: OEKOBAU.DAT: Kunststoffe / Dachbahnen / PVC-Dachbahnen
Classification: IBUCategories: 02 Bauprodukte / Abdichtungen / Dach- und Dichtungsbahnsysteme aus Kunststoffen und Elastomeren
Method details: Dach- und Dichtungsbahnsysteme aus Kunststoffen und Elastomeren.pdf
Owner: Sika Deutschland GmbH
Compliance: DIN EN 15804; ISO 14025
Review: Accredited third party review by IBU
Amounts: rows without a unit in brackets have none in this file; such an amount is in the reference unit of its flow, which a separate flow dataset defines
copyright: true

## General comment
Sikaplan SGmA ist eine mehrschichtige Kunststoff-abdichtungsbahn, basierend auf Polyvinylchlorid (PVC) mit einer Glasvlieseinlage (DE/E1 PVC-P-NB-E-GV).

Die Sikaplan SGmA Kunststoffabdichtungsbahnen sind in den Dicken 1,5 mm (SGmA 15), 1,8 mm (SGmA 18), 2,0 mm (SGmA 20) und 2,4 mm (SGmA 24) erhältlich.

Bei der Berechnung der Ökobilanz erfolgte keine Durchschnittsbildung über verschiedene Dicken der Kunststoffabdichtungsbahn Sikaplan SGmA. Alle an-gegebenen Werte beziehen sich auf Sikaplan SGmA 15; eine Formel zur eigenständigen Berechnung wei-terer Dicken findet sich in Kapitel 5.

## Technology and included processes
Sikaplan SGmA ist eine mehrschichtige Kunststoffabdichtungsbahn, basierend auf Polyvinylchlorid (PVC)mit einer Glasvlieseinlage (DE/E1 PVC-P-NB-E-GV). Die Sikaplan SGmA Kunststoffabdichtungsbahnen sind in den Dicken 1,5 mm (SGmA 15), 1,8 mm (SGmA 18), 2,0 mm (SGmA 20) und 2,4 mm (SGmA 24) erhältlich. Der Herstellungsprozess der Sikaplan SGmA Kunststoffabdichtungsbahn verläuft in folgenden Schritten: - Dosierung der einzelnen Rohstoffe und Plastifizierung der Mischung in einem Extruder - Auswalzen der Mischung zu Kunststofffolien im Kalander-Verfahren - Kühlen und Aufrollen der Membranen - Zusammenfügen von zwei Kunststofffolien (Ober- und Unterseite) und mittiger Glasvlieseinlage auf einer Triplieranlage durch Erhitzen - Zuschneiden und Aufwickeln der Kunststoffabdichtungsbahn auf Rollenkerne aus Altpapierkartonage - Palettierung und Verpacken der Rollen mit einer PE-Stretch-Folie Produktionsabfälle wie beispielsweise Abschnitte werden dem Herstellungsprozess sofort wieder zugeführt und auf diese Weise recycelt.
Technische Daten:
In der folgenden Übersicht sind ausschließlich die technischen Daten aufgeführt, die für die Kunststoff-dachabdichtungsbahn Sikaplan SGmA relevant sind.
Deklarierte Einheit:
Diese Deklaration bezieht sich auf 1 m² Sikaplan SGmA Kunststoffabdichtungsbahn mit der Dicke 1,5 mm. Für andere Dicken wird eine Formel zur eigen-ständigen Berechnung der Werte angegeben.

## Technical purpose
Sikaplan SGmA Kunststoffabdichtungsbahnen dienen hauptsächlich der Abdichtung von Flachdächern. Die Dachbahnen werden lose verlegt für das extensiv und intensiv begrünte und bekieste Dach unter Auflast. Die Dachbahn muss abgedeckt werden, die Auflast nach spätestens 3 Monaten aufgebracht sein.

## Reference product
- 1 m² Dachbahn: 1

## Inputs
- Erneuerbare Primärenergie als Energieträger (PERE) [MJ]: A1-A3 5.15508, A5 0.412406
- Erneuerbare Primärenergie zur stofflichen Nutzung (PERM) [MJ]: A1-A3 1.45603, A5 0.116483
- Total erneuerbare Primärenergie (PERT) [MJ]: A1-A3 6.61111, A4 0.036204, A5 0.575685, C2 0.0176, C3 0.341, D -5.48
- Nicht-erneuerbare Primärenergie als Energieträger (PENRE) [MJ]: A1-A3 94.7696, A5 7.58157
- Nicht-erneuerbare Primärenergie zur stofflichen Nutzung (PENRM) [MJ]: A1-A3 45.0489, A5 3.59992
- Total nicht erneuerbare Primärenergie (PENRT) [MJ]: A1-A3 139.815, A4 0.610185, A5 11.647, C2 0.449, C3 1.64, D -107
- Einsatz von Sekundärstoffen (SM) [kg]
- Erneuerbare Sekundärbrennstoffe (RSF) [MJ]
- Nicht erneuerbare Sekundärbrennstoffe (NRSF) [MJ]
- Einsatz von Süßwasserressourcen (FW) [m^3]: A1-A3 0.010278, A4 2.34e-5, A5 0.001251, C2 1.24e-5, C3 0.000827, D -0.0182

## Outputs
- Gefährlicher Abfall zur Deponie (HWD) [kg]: A1-A3 0.00487, A4 2.7e-6, A5 0.000449, C2 1.02e-6, C3 0.000492, D -0.00634
- Entsorgter nicht gefährlicher Abfall (NHWD) [kg]: A1-A3 0.127778, A4 0.000117, A5 0.075432, C2 5.64e-5, C3 0.00474, D -0.0322
- Entsorgter radioaktiver Abfall (RWD) [kg]: A1-A3 0.003398, A4 8.5e-7, A5 0.000296, C2 5.87e-7, C3 0.00019, D -0.00367
- Komponenten für die Wiederverwendung (CRU) [kg]
- Stoffe zum Recycling (MFR) [kg]: C3 1.91
- Stoffe für die Energierückgewinnung (MER) [kg]
- Exportierte elektrische Energie (EEE) [MJ]: A5 0.183, C3 0.117
- Exportierte thermische Energie (EET) [MJ]: A5 0.516, C3 0.34

## Impact indicators
- Globales Erwärmungspotenzial (GWP) [kg CO_(2)-Äq.]: A1-A3 5.5, A4 0.044537, A5 0.628563, C2 0.0324, C3 0.236, D -4.09
- Abbau Potential der stratosphärischen Ozonschicht (ODP) [kg CFC11-Äq.]: A1-A3 7.02e-8, A4 1.06e-13, A5 5.62e-9, C2 1.55e-13, C3 9.39e-12, D -1.73e-9
- Versauerungspotenzial von Boden und Wasser (AP) [kg SO_(2)-Äq.]: A1-A3 0.012222, A4 0.000162, A5 0.001168, C2 0.000164, C3 0.000256, D -0.0086
- Eutrophierungspotenzial (EP) [kg PO_(4)^(3)-Äq.]: A1-A3 0.001537, A4 3.72e-5, A5 0.000136, C2 3.75e-5, C3 3.4e-5, D -0.00102
- Bildungspotential für troposphärisches Ozon (POCP) [kg Ethen-Äq.]: A1-A3 0.003083, A4 1.93e-5, A5 0.000254, C2 1.75e-5, C3 1.74e-5, D -0.00283
- Potenzial für den abiotischen Abbau nicht fossiler Ressourcen (ADPE) [kg Sb-Äq.]: A1-A3 2.14e-5, A4 2.09e-9, A5 1.76e-6, C2 1.22e-9, C3 2.47e-8, D -1.72e-5
- Potenzial für den abiotischen Abbau fossiler Brennstoffe (ADPF) [MJ]: A1-A3 128.704, A4 0.607407, A5 10.6969, C2 0.447, C3 1.16, D -97.8

## Use advice
Gültigkeitsbereich:
Dieses Dokument bezieht sich auf die von der Sika Trocal GmbH in D-53840 Troisdorf hergestellten Sikaplan SGmA Kunststoffabdichtungsbahnen. Die Ökobilanzdaten wurden auf Basis der Produktions-daten aus dem Jahr 2014 von der Sika Services AG erfasst.
Systemgrenze:
Typ der EPD: Wiege bis Werkstor - mit Optionen

Die Systemgrenze der EPD folgt dem modularen Auf-bau gemäß /EN 15804/. In der Ökobilanz werden die folgenden Module berücksichtigt:

A1-A3: Herstellung der Vorprodukte, Verpackung sowie Hilfsstoffe, Transport zum Werk, Produktion inkl. Energiebereitstellung und Abfallbehandlung A4: Transport zur Baustelle A5: Einbau ins Gebäude (Schweißenergie, Entsorgung von Verpackung und Verschnitt der Dachbahn) C1: Rückbau und Abriss C2: Transport zur Abfallbewirtschaftung C3: Abfallbewirtschaftung zur Wiederverwendung, Rückgewinnung und/oder zum Recycling C4: Beseitigung (Abfallverbrennungsprozess) D: Wiederverwendungs-, Rückgewinnungs- und/oder Recyclingpotentiale als Nettoflüsse und Gutschriften (Vorteile)

## Data sources
- Sikaplan SGmA.pdf
- GaBi Database (all versions)
- GaBi database SP26 2014
