# Sikaplan G

Dataset: ILCD process, EPD, specific dataset
Geography: RER
Reference year: 2015
Valid until: 2020
Classification: OEKOBAU.DAT: Kunststoffe / Dachbahnen / PVC-Dachbahnen
Classification: IBUCategories: 02 Bauprodukte / Abdichtungen / Dach- und Dichtungsbahnsysteme aus Kunststoffen und Elastomeren
Method details: Dach- und Dichtungsbahnsysteme aus Kunststoffen und Elastomeren.pdf
Owner: Sika Deutschland GmbH
Compliance: DIN EN 15804; ISO 14025
Review: Accredited third party review by IBU
Amounts: rows without a unit in brackets have none in this file; such an amount is in the reference unit of its flow, which a separate flow dataset defines
copyright: true

## General comment
Sikaplan G ist eine mehrschichtige Kunststoffabdich-tungsbahn, basierend auf Polyvinylchlorid (PVC) mit innenliegendem Polyestergewebe (DE/E1 PVC-P-NB-V-PG).

Die Sikaplan G Kunststoffabdichtungsbahnen sind in den Dicken 1,5 mm (15 G), 1,8 mm (18 G), 2,0 mm

(20 G) und 2,4 mm (24 G) erhältlich.

Bei der Berechnung der Ökobilanz erfolgte keine Durchschnittsbildung über verschiedene Dicken der Kunststoffabdichtungsbahn Sikaplan G. Alle angege-benen Werte beziehen sich auf Sikaplan 15 G; eine Formel zur eigenständigen Berechnung weiterer Dicken findet sich in Kapitel 5.

## Technology and included processes
Sikaplan G ist eine mehrschichtige Kunststoffabdichtungsbahn, basierend auf Polyvinylchlorid (PVC) mit innenliegendem Polyestergewebe (DE/E1 PVC-P-NBV- PG). Die Sikaplan G Kunststoffabdichtungsbahnen sind in den Dicken 1,5 mm (15 G), 1,8 mm (18 G), 2,0 mm(20 G) und 2,4 mm (24 G) erhältlich. Der Herstellungsprozess der Sikaplan G Kunststoffabdichtungsbahn verläuft in folgenden Schritten: - Dosierung der einzelnen Rohstoffe und Plastifizierung der Mischung in einem Extruder - Auswalzen der Mischung zu Kunststofffolien im Kalander-Verfahren - Kühlen und Aufrollen der Membranen - Zusammenfügen von zwei Kunststofffolien (Ober- und Unterseite) und mittigem Polyestergewebe auf einer Triplieranlage durch Erhitzen - Zuschneiden und Aufwickeln der Kunststoffabdichtungsbahn auf Rollenkerne aus Altpapierkartonage - Palettierung und Verpacken der Rollen mit einer PE-Stretch-Folie Produktionsabfälle wie beispielsweise Abschnitte werden dem Herstellungsprozess sofort wieder zugeführt und auf diese Weise recycelt.
Technische Daten:
In der folgenden Übersicht sind ausschließlich die technischen Daten aufgeführt, die für die Kunststoff-dachabdichtungsbahn Sikaplan G relevant sind.
Deklarierte Einheit:
Diese Deklaration bezieht sich auf 1 m² Sikaplan G Kunststoffabdichtungsbahn mit der Dicke 1,5 mm. Für andere Dicken wird eine Formel zur eigenständigen Berechnung der Werte angegeben.

## Technical purpose
Sikaplan G Kunststoffabdichtungsbahnen dienen hauptsächlich der Abdichtung von Flachdächern. Die Dachbahnen können auf Dächern bis zu einer Dach-neigung von ≤ 20° lose verlegt und mechanisch befestigt werden.

## Reference product
- 1 m² Dachbahn: 1

## Inputs
- Erneuerbare Primärenergie als Energieträger (PERE) [MJ]: A1-A3 5.70137, A5 0.45611
- Erneuerbare Primärenergie zur stofflichen Nutzung (PERM) [MJ]: A1-A3 1.45603, A5 0.116483
- Total erneuerbare Primärenergie (PERT) [MJ]: A1-A3 7.15741, A4 0.034352, A5 0.574837, C2 0.0167, C3 0.323, D -5.07
- Nicht-erneuerbare Primärenergie als Energieträger (PENRE) [MJ]: A1-A3 94.2028, A5 7.53622
- Nicht-erneuerbare Primärenergie zur stofflichen Nutzung (PENRM) [MJ]: A1-A3 40.0564, A5 3.20452
- Total nicht erneuerbare Primärenergie (PENRT) [MJ]: A1-A3 134.259, A4 0.57963, A5 11.6306, C2 0.425, C3 1.56, D -97.2
- Einsatz von Sekundärstoffen (SM) [kg]
- Erneuerbare Sekundärbrennstoffe (RSF) [MJ]
- Nicht erneuerbare Sekundärbrennstoffe (NRSF) [MJ]
- Einsatz von Süßwasserressourcen (FW) [m^3]: A1-A3 0.011296, A4 2.22e-5, A5 0.001322, C2 1.18e-5, C3 0.000783, D -0.0165

## Outputs
- Gefährlicher Abfall zur Deponie (HWD) [kg]: A1-A3 0.005519, A4 2.57e-6, A5 0.0005, C2 9.68e-7, C3 0.000466, D -0.00576
- Entsorgter nicht gefährlicher Abfall (NHWD) [kg]: A1-A3 0.249074, A4 0.00011, A5 0.081735, C2 5.34e-5, C3 0.00449, D -0.0292
- Entsorgter radioaktiver Abfall (RWD) [kg]: A1-A3 0.003537, A4 8.07e-7, A5 0.000315, C2 5.56e-7, C3 0.00018, D -0.00333
- Komponenten für die Wiederverwendung (CRU) [kg]
- Stoffe zum Recycling (MFR) [kg]: C3 1.81
- Stoffe für die Energierückgewinnung (MER) [kg]
- Exportierte elektrische Energie (EEE) [MJ]: A5 0.183, C3 0.111
- Exportierte thermische Energie (EET) [MJ]: A5 0.516, C3 0.322

## Impact indicators
- Globales Erwärmungspotenzial (GWP) [kg CO_(2)-Äq.]: A1-A3 5.38889, A4 0.042315, A5 0.614496, C2 0.0307, C3 0.224, D -3.7
- Abbau Potential der stratosphärischen Ozonschicht (ODP) [kg CFC11-Äq.]: A1-A3 6.08e-8, A4 1.02e-13, A5 4.87e-9, C2 1.47e-13, C3 8.89e-12, D -1.7e-9
- Versauerungspotenzial von Boden und Wasser (AP) [kg SO_(2)-Äq.]: A1-A3 0.012963, A4 0.000154, A5 0.001219, C2 0.000155, C3 0.000242, D -0.00781
- Eutrophierungspotenzial (EP) [kg PO_(4)^(3)-Äq.]: A1-A3 0.001574, A4 3.53e-5, A5 0.000139, C2 3.55e-5, C3 3.22e-5, D -0.000926
- Bildungspotential für troposphärisches Ozon (POCP) [kg Ethen-Äq.]: A1-A3 0.002722, A4 1.82e-5, A5 0.000225, C2 1.66e-5, C3 1.65e-5, D -0.00257
- Potenzial für den abiotischen Abbau nicht fossiler Ressourcen (ADPE) [kg Sb-Äq.]: A1-A3 0.000869, A4 1.99e-9, A5 6.95e-5, C2 1.16e-9, C3 2.34e-8, D -1.6e-5
- Potenzial für den abiotischen Abbau fossiler Brennstoffe (ADPF) [MJ]: A1-A3 123.148, A4 0.576852, A5 10.238, C2 0.424, C3 1.1, D -88.8

## Use advice
Gültigkeitsbereich:
Dieses Dokument bezieht sich auf die von der Sika Trocal GmbH in D-53840 Troisdorf hergestellten Sikaplan G Kunststoffabdichtungsbahnen. Die Öko-bilanzdaten wurden auf Basis der Produktionsdaten aus dem Jahr 2014 von der Sika Services AG erfasst.
Systemgrenze:
Typ der EPD: Wiege bis Werkstor - mit Optionen

Die Systemgrenze der EPD folgt dem modularen Auf-bau gemäß /EN 15804/. In der Ökobilanz werden die folgenden Module berücksichtigt:

A1-A3: Herstellung der Vorprodukte, Verpackung sowie Hilfsstoffe, Transport zum Werk, Produktion inkl. Energiebereitstellung und Abfallbehandlung A4: Transport zur Baustelle A5: Einbau ins Gebäude (Schweißenergie, Entsorgung von Verpackung und Verschnitt der Dachbahn) C1: Rückbau und Abriss C2: Transport zur Abfallbewirtschaftung C3: Abfallbewirtschaftung zur Wiederverwendung, Rückgewinnung und/oder zum Recycling C4: Beseitigung (Abfallverbrennungsprozess) D: Wiederverwendungs-, Rückgewinnungs- und/oder Recyclingpotentiale als Nettoflüsse und Gutschriften (Vorteile)

## Data sources
- Sikaplan G.pdf
- GaBi Database (all versions)
- GaBi database SP26 2014
