# Volumenstromregler VRE, VR

Dataset: ILCD process, EPD, specific dataset
Geography: DE
Reference year: 2015
Valid until: 2020
Classification: OEKOBAU.DAT: Gebäudetechnik / Klimatisierung und Lüftung / Lüftungsanlagen
Classification: IBUCategories: 03 Gebäudetechnik / Raumlufttechnische Anlagen (RLT) und Klimatechnik / Volumenstromregler und Volumenstrombegrenzer für Lüftungsanlagen
Method details: Volumenstromregler und Volumenstrombegrenzer für Lüftungsanlagen.pdf
Owner: Wildeboer Bauteile GmbH
Compliance: DIN EN 15804; ISO 14025
Review: Accredited third party review by IBU
Amounts: rows without a unit in brackets have none in this file; such an amount is in the reference unit of its flow, which a separate flow dataset defines
copyright: true

## General comment
Elektronische Volumenstromregler VRE für konstante und variable Volumenströme sind wartungs- frei und lageunabhängig einbaubar in Rohrleitungen für Zuluft und Abluft raumlufttechnischer Anlagen. Sie sind werkseitig für den gesamten Volumenstrom- bereich justiert. Ein neuartiges Messverfahren nutzt den Differenzdruck und die Klappenblattstellung zur Volumenstrommessung und zur Regelung. Gleichzeitig wird ein Effizienzsignal zur energieeinsparenden Optimierung des Anlagenbetriebsdrucks geliefert. Das neuartige Messprinzip sorgt bei allen Drücken in den ca. 1:10 betragenden Volumenstrombereichen für die hohe Regelgenauigkeit von ± 5% bis ± 15% vom Soll-Volumenstrom. Das Rohrgehäuse und das zentrisch gelagerte Klappenblatt bestehen aus verzinktem Stahlblech mit einer Lagerachse aus Edelstahl in speziellen Lagerbuchsen, das Antriebsgehäuse ist aus Kunststoff. Möglich sind die Betriebsarten “Konstant”, “Variabel” und “4-Punkt”, außerdem die Über- steuerungen "Klappenblatt offen" und "Klappenblatt geschlossen". Die Betriebsart “Variabel” sieht die Betriebsmodi 0 - 10V, 2 - 10V und 2 - 8V vor. Parallelbetrieb und Folgeschaltungen sind möglich.

Konstant-mechanische VR Volumenstromregler sind wartungsfreie, mechanische Regler ohne Hilfsenergie für konstante Volumenströme in raumlufttechnischen Anlagen. Der Einbau erfolgt lageunabhängig in Lüftungsleitungen für Zuluft und Abluft. Gehäuse und Regelmechanik sind aus verzinktem Stahlblech. Das Klappenblatt zur Volumen- stromregulierung ist zentrisch gelagert und mit Lager- achsen aus Edelstahl in speziellen Lagerbuchsen geführt. Die Stelleinrichtung ist mit Drehzeiger, Skala und Arretierung. Die Volumenstromsollwerte sind manuell oder motorisch innerhalb der Volumenstrom- bereiche Vmin bis Vmax einstellbar. Die spezielle Regelmechanik gewährleistet eine hohe Regel- genauigkeit mit nur etwa ± 5% bis ± 10% Abweichung. Dementsprechend wird bei variablen Drücken der Volumenstrom im gesamten Druckbereich konstant gehalten. Optional gibt es den VR mit motorischer Einstellung auf zwei Volumenstromsollwerte, oder stetige motorische Einstellung auf beliebige Volumenstromsollwerte.

Weitere Informationen können den /Hersteller- unterlagen/ entnommen werden, zur Hygiene auch dem Kapitel 7.

## Technology and included processes
Elektronische Volumenstromregler VRE für konstante und variable Volumenströme sind wartungs- frei und lageunabhängig einbaubar in Rohrleitungen für Zuluft und Abluft raumlufttechnischer Anlagen. Ein neuartiges Messverfahren nutzt den Differenzdruck und die Klappenblattstellung zur Volumenstrommessung und zur Regelung. Das Rohrgehäuse und das zentrisch gelagerte Klappenblatt bestehen aus verzinktem Stahlblech mit einer Lagerachse aus Edelstahl in speziellen Lagerbuchsen, das Antriebsgehäuse ist aus Kunststoff. Konstant-mechanische VR Volumenstromregler sind wartungsfreie, mechanische Regler ohne Hilfsenergie für konstante Volumenströme in raumlufttechnischen Anlagen. Der Einbau erfolgt lageunabhängig in Lüftungsleitungen für Zuluft und Abluft. Gehäuse und Regelmechanik sind aus verzinktem Stahlblech. Das Klappenblatt zur Volumenstromregulierung ist zentrisch gelagert und mit Lagerachsen aus Edelstahl in speziellen Lagerbuchsen geführt. Die Produktion unterliegt einem Energieeffizienzsystem und erfolgt an dem Standort in Weener. Notwendige Roh- und Halbteile, Hilfs- und Betriebsstoffe werden von Lieferanten angeliefert und fließen in die Produktion mit ein. Die Fertigung der Halbteile erfolgt in einer Vorfertigung mit üblichen Fertigungsverfahren. Metallteile werden gestanzt und in Form gekantet. Die Teile der Vorfertigung werden zusammen mit eingekauften Teilen zu Volumenstromreglern endmontiert, im Rahmen der Qualitätssicherung nach DIN EN ISO 9001 geprüft, verpackt und ausgeliefert. Die Ökobilanz beinhaltet die Lebenszyklusstadien „von der Wiege bis zur Bahre“. Weitere und detaillierte Angaben können der EPD entnommen werden.
Technische Daten:
Erfüllt sind die Anforderungen nach harmonisierten Vorschriften zur CE-Kennzeichnung zur elektro- magnetischen Verträglichkeit (EMV) gemäß Richtlinie der EU /2004/108/EG/, die Leistungsbewertung nach /DIN EN 12589/ und die damit verbundenen Anforderungen nach /DIN EN ISO 5135/, /DIN EN ISO 3741/, /DIN EN ISO 5167-1/ und /DIN EN 1751/.
Deklarierte Einheit:
Die Deklaration bezieht sich auf die Herstellung von einem Stück Volumenstromregler VRE inklusive Antrieb, elektrischer Steuereinheit und der optionalen Dämmschale gemäß dem /IBU PCR Teil B/. Weitere Volumenstromregler vom Typ VRE und VR, deren Varianten und den variierenden Abmessungen abweichend von den hier betrachteten Referenzprodukten können über eine Gewichtstabelle, bereitgestellt von der Wildeboer Bauteile GmbH, durch Skalierung der Ergebnisse berechnet werden.

## Technical purpose
Volumenstromregler für die Regelung von konstanten und variablen Volumenströmen in raumlufttechnischen Anlagen und zum Absperren von Lüftungsleitungen.

## Reference product
- 1 Stück Volumenstromregler VRE mit 2,87 kg/Stück: 1

## Inputs
- Erneuerbare Primärenergie als Energieträger (PERE) [MJ]: A1-A3 15, A4 0.054, A5 0.00065, B1 0, B2 0, B3 0, B4 0, B5 0, B6 130, C1 0, C2 0.029, C3 0.013, C4 0.035, D -0.62
- Erneuerbare Primärenergie zur stofflichen Nutzung (PERM) [MJ]: A1-A3 0, A4 0, A5 0, B1 0, B2 0, B3 0, B4 0, B5 0, B6 0, C1 0, C2 0, C3 0, C4 0, D 0
- Total erneuerbare Primärenergie (PERT) [MJ]: A1-A3 15, A4 0.054, A5 0.00065, B1 0, B2 0, B3 0, B4 0, B5 0, B6 130, C1 0, C2 0.029, C3 0.013, C4 0.035, D -0.62
- Nicht-erneuerbare Primärenergie als Energieträger (PENRE) [MJ]: A1-A3 240, A4 0.92, A5 0.0073, B1 0, B2 0, B3 0, B4 0, B5 0, B6 630, C1 0, C2 0.5, C3 0.11, C4 0.56, D -46
- Nicht-erneuerbare Primärenergie zur stofflichen Nutzung (PENRM) [MJ]: A1-A3 19, A4 0, A5 0, B1 0, B2 0, B3 0, B4 0, B5 0, B6 0, C1 0, C2 0, C3 0, C4 0, D 0
- Total nicht erneuerbare Primärenergie (PENRT) [MJ]: A1-A3 260, A4 0.92, A5 0.0073, B1 0, B2 0, B3 0, B4 0, B5 0, B6 630, C1 0, C2 0.5, C3 0.11, C4 0.56, D -46
- Einsatz von Sekundärstoffen (SM) [kg]: A1-A3 0.437
- Erneuerbare Sekundärbrennstoffe (RSF) [MJ]: A1-A3 0, A4 0, A5 0, B1 0, B2 0, B3 0, B4 0, B5 0, B6 0, C1 0, C2 0, C3 0, C4 0, D 0
- Nicht erneuerbare Sekundärbrennstoffe (NRSF) [MJ]: A1-A3 0, A4 0, A5 0, B1 0, B2 0, B3 0, B4 0, B5 0, B6 0, C1 0, C2 0, C3 0, C4 0, D 0
- Einsatz von Süßwasserressourcen (FW) [m^3]: A1-A3 0.088, A4 3.5e-5, A5 4.7e-5, B1 0, B2 0, B3 0, B4 0, B5 0, B6 0.18, C1 0, C2 1.9e-5, C3 0.00061, C4 0.0027, D -0.0038

## Outputs
- Gefährlicher Abfall zur Deponie (HWD) [kg]: A1-A3 0.025, A4 4.1e-6, A5 9.5e-7, B1 0, B2 0, B3 0, B4 0, B5 0, B6 0.19, C1 0, C2 2.2e-6, C3 2e-5, C4 3.8e-5, D 0.00066
- Entsorgter nicht gefährlicher Abfall (NHWD) [kg]: A1-A3 0.47, A4 0.00018, A5 0.00055, B1 0, B2 0, B3 0, B4 0, B5 0, B6 0.24, C1 0, C2 9.4e-5, C3 0.025, C4 0.4, D -0.064
- Entsorgter radioaktiver Abfall (RWD) [kg]: A1-A3 0.0093, A4 1.3e-6, A5 3.6e-7, B1 0, B2 0, B3 0, B4 0, B5 0, B6 0.075, C1 0, C2 6.9e-7, C3 7.4e-6, C4 2.1e-5, D 0.00015
- Komponenten für die Wiederverwendung (CRU) [kg]: A1-A3 0, A4 0, A5 0, B1 0, B2 0, B3 0, B4 0, B5 0, B6 0, C1 0, C2 0, C3 0, C4 0, D 0
- Stoffe zum Recycling (MFR) [kg]: A1-A3 0, A4 0, A5 0, B1 0, B2 0, B3 0, B4 0, B5 0, B6 0, C1 0, C2 0, C3 0, C4 0, D 2.2
- Stoffe für die Energierückgewinnung (MER) [kg]: A1-A3 0, A4 0, A5 0.013, B1 0, B2 0, B3 0, B4 0, B5 0, B6 0, C1 0, C2 0, C3 0.16, C4 0.47
- Exportierte elektrische Energie (EEE) [MJ]: A1-A3 0, A4 0, A5 0.015, B1 0, B2 0, B3 0, B4 0, B5 0, B6 0, C1 0, C2 0, C3 0.2, C4 2.3
- Exportierte thermische Energie (EET) [MJ]: A1-A3 0, A4 0, A5 0.038, B1 0, B2 0, B3 0, B4 0, B5 0, B6 0, C1 0, C2 0, C3 0.52, C4 6.2

## Impact indicators
- Globales Erwärmungspotenzial (GWP) [kg CO_(2)-Äq.]: A1-A3 18, A4 0.067, A5 0.016, B1 0, B2 0, B3 0, B4 0, B5 0, B6 44, C1 0, C2 0.036, C3 0.12, C4 1.2, D -4.6
- Abbau Potential der stratosphärischen Ozonschicht (ODP) [kg CFC11-Äq.]: A1-A3 6.3e-9, A4 1.6e-13, A5 1.7e-14, B1 0, B2 0, B3 0, B4 0, B5 0, B6 3.5e-9, C1 0, C2 8.7e-14, C3 3.2e-13, C4 3.3e-12, D -8.6e-12
- Versauerungspotenzial von Boden und Wasser (AP) [kg SO_(2)-Äq.]: A1-A3 0.093, A4 0.00031, A5 6.3e-6, B1 0, B2 0, B3 0, B4 0, B5 0, B6 0.081, C1 0, C2 0.00017, C3 5.6e-5, C4 0.00031, D -0.015
- Eutrophierungspotenzial (EP) [kg PO_(4)^(3)-Äq.]: A1-A3 0.0072, A4 7.3e-5, A5 1.1e-6, B1 0, B2 0, B3 0, B4 0, B5 0, B6 0.0099, C1 0, C2 4e-5, C3 1.4e-5, C4 2.5e-5, D -0.0013
- Bildungspotential für troposphärisches Ozon (POCP) [kg Ethen-Äq.]: A1-A3 0.0077, A4 -0.0001, A5 3.9e-7, B1 0, B2 0, B3 0, B4 0, B5 0, B6 0.0057, C1 0, C2 -5.6e-5, C3 4.3e-6, C4 1.6e-5, D -0.0022
- Potenzial für den abiotischen Abbau nicht fossiler Ressourcen (ADPE) [kg Sb-Äq.]: A1-A3 0.0015, A4 3.2e-9, A5 9.2e-10, B1 0, B2 0, B3 0, B4 0, B5 0, B6 8.3e-6, C1 0, C2 1.7e-9, C3 3.7e-8, C4 -5.7e-6, D -1.3e-5
- Potenzial für den abiotischen Abbau fossiler Brennstoffe (ADPF) [MJ]: A1-A3 240, A4 0.91, A5 0.0064, B1 0, B2 0, B3 0, B4 0, B5 0, B6 440, C1 0, C2 0.49, C3 0.094, C4 0.51, D -46

## Use advice
Gültigkeitsbereich:
Dieses Dokument bezieht sich auf die Herstellung, den Transport, den Einbau, den Betrieb und die Entsorgung von Volumenstromreglern mit optionalem Zubehör für raumlufttechnische Anlagen. Die Produkte werden ausschließlich in Deutschland im Werk Weener produziert, in dem die Produktionsdaten des Jahres 2012 erhoben wurden.
Systemgrenze:
Die Systemgrenze der EPD vom Typ "Wiege bis Bahre" folgt dem modularen Aufbau gemäß /EN 15804/. Die Ökobilanz der betrachteten Produkte berücksichtigt die Module A, B, C und D:

A1-A3 (Produktionsstadium): Rohstoffbereitstellung, Transport zum Hersteller, Herstellung (incl. Energie und Wasserbereitstellung, Bereitstellung von Hilfsstoffen, Entsorgung von Abfällen)

A4-A5 (Einrichten eines Bauwerks): Transport zur Baustelle, Einbau in das Gebäude, Verwertung von Verpackungsabfällen

B1-B5 (Nutzungsstadium): Nutzung des eingebauten Produkts

B6-B7 (Nutzungsstadium - Betrieb des Gebäudes): Einsatz von elektrischer Energie für das Produkt

C1-C4 (Entsorgungsstadium): Rückbau des Produkts, Transport zur Abfallbehandlung, Abfallbehandlung, Entsorgung

D (Gutschriften): Recyclingpotential

## Data sources
- Volumenstromregler VRE, VR.pdf
- GaBi Database (all versions)
- GaBi database SP27 2015
