# Volumenstrombegrenzer VRL

Dataset: ILCD process, EPD, specific dataset
Geography: DE
Reference year: 2015
Valid until: 2020
Classification: OEKOBAU.DAT: Gebäudetechnik / Klimatisierung und Lüftung / Lüftungsanlagen
Classification: IBUCategories: 03 Gebäudetechnik / Raumlufttechnische Anlagen (RLT) und Klimatechnik / Volumenstromregler und Volumenstrombegrenzer für Lüftungsanlagen
Method details: Volumenstromregler und Volumenstrombegrenzer für Lüftungsanlagen.pdf
Owner: Wildeboer Bauteile GmbH
Compliance: DIN EN 15804; ISO 14025
Review: Accredited third party review by IBU
Amounts: rows without a unit in brackets have none in this file; such an amount is in the reference unit of its flow, which a separate flow dataset defines
copyright: true

## General comment
Wartungsfreie VRL Volumenstrombegrenzer sind mechanische Regler ohne Hilfsenergie zur Konstant- haltung von Volumenströmen in raumlufttechnischen Anlagen. Druckunabhängig regeln sie Volumenströme auf zuvor fest eingestellte Sollwerte und halten diese konstant. Sie können in beliebiger Einbaulage in Lüftungsrohrleitungen eingesetzt werden, beispiels- weise in Wickelfalzrohre. Die Einstell- und Regel- mechanik der VRL Volumenstrombegrenzer ist gekapselt und vor Verunreinigungen aus dem Luft- strom geschützt. Weiterhin positionieren und fixieren die beidseitigen Lippendichtungen den VRL Volumen- strombegrenzer so in der Lüftungsleitung, dass insgesamt eine vollständige Kapselung entsteht. Reglergehäuse und Klappenblatt bestehen aus einem speziellen antistatischen und mikrobiell beständigen Kunststoff. Die glatten Oberflächen der luftführenden Bauteile schließen Verschmutzungen nahezu aus. VRL Volumenstrombegrenzer erfüllen somit höchste hygienische Anforderungen, siehe auch das Kapitel 7.

VRL Volumenstrombegrenzer sind werkseitig in den gesamten, mindestens 1 : 7 betragenden Volumen- strombereichen justiert. Vor Ort kann der Sollwert stufenlos mit einem Drehzeiger auf einer Skala mit Volumenstrom- und Geschwindigkeitsangaben zwischen Vmin und Vmax eingestellt und arretiert werden. Die spezielle Regelmechanik gewährleistet in der Regel im gesamten Einsatzbereich eine hohe Regelgenauigkeit mit nur ± 5% bis ± 10% Abweichung.

Weitere Informationen können den /Herstellerunter- lagen/ entnommen werden, zur Hygiene auch dem Kapitel 7.

## Technology and included processes
Wartungsfreie VRL Volumenstrombegrenzer sind mechanische Regler ohne Hilfsenergie zur Konstanthaltung von Volumenströmen in raumlufttechnischen Anlagen. Druckunabhängig regeln sie Volumenströme auf zuvor fest eingestellte Sollwerte und halten diese konstant. Sie können in beliebiger Einbaulage in Lüftungsrohrleitungen eingesetzt werden, beispielsweise in Wickelfalzrohre. Gehäuse und Klappenblatt bestehen aus einem speziellen antistatischen und mikrobiell beständigen Kunststoff. Die Produktion unterliegt einem Energieeffizienzsystem und erfolgt an dem Standort Weener. Notwendige Roh- und Halbteile, Hilfs- und Betriebsstoffe werden von Lieferanten angeliefert und fließen in die Produktion mit ein. Die Fertigung der Halbteile erfolgt in einer Vorfertigung mit materialüblichen Fertigungsverfahren. Kunststoffteile werden in Spritzgussmaschinen gefertigt. Die Teile der Vorfertigung werden zusammen mit eingekauften Teilen zu Volumenstrombegrenzern endmontiert, im Rahmen der Qualitätssicherung nach DIN EN ISO 9001 geprüft, verpackt und ausgeliefert. Die Ökobilanz beinhaltet die Lebenszyklusstadien „von der Wiege bis zur Bahre“. Weitere und detaillierte Angaben können der EPD entnommen werden.
Technische Daten:
Erfüllt ist die Leistungsbewertung nach /DIN EN 12589/ und die damit verbundenen Anforderungen nach /DIN EN ISO 5135/, /DIN EN ISO 3741/, /DIN EN ISO 5167-1/ und /DIN EN 1751/.
Deklarierte Einheit:
Die Deklaration bezieht sich auf die Herstellung von einem Stück Volumenstrombegrenzer gemäß dem /IBU PCR Teil B/. Weitere Volumenstrombegrenzer mit variierenden Abmessungen von den hier betrachteten Referenzprodukten können über eine Gewichtstabelle, bereitgestellt von der Wildeboer Bauteile GmbH, durch Skalierung der Ergebnisse berechnet werden.

## Technical purpose
Runde Volumenstrombegrenzer dienen der Regelung von konstanten Volumenströmen in raumluft- technischen Anlagen und ersetzen herkömmliche Drosselelemente. Dadurch entfällt ein aufwändiges manuelles Abgleichen der Volumenströme innerhalb einer raumlufttechnischen Anlage. Der VRL ist zum Einschieben in Lüftungsrohrleitungen geeignet.

## Reference product
- 1 Stück Volumenstrombegrenzer VRL mit 0,08 kg/Stück: 1

## Inputs
- Erneuerbare Primärenergie als Energieträger (PERE) [MJ]: A1-A3 0.23, A4 0.0014, A5 1.7e-5, B1 0, B2 0, B3 0, B4 0, B5 0, B6 0, C1 0, C2 0.00075, C3 0, C4 0.004, D -0.13
- Erneuerbare Primärenergie zur stofflichen Nutzung (PERM) [MJ]: A1-A3 0, A4 0, A5 0, B1 0, B2 0, B3 0, B4 0, B5 0, B6 0, C1 0, C2 0, C3 0, C4 0, D 0
- Total erneuerbare Primärenergie (PERT) [MJ]: A1-A3 0.23, A4 0.0014, A5 1.7e-5, B1 0, B2 0, B3 0, B4 0, B5 0, B6 0, C1 0, C2 0.00075, C3 0, C4 0.004, D -0.13
- Nicht-erneuerbare Primärenergie als Energieträger (PENRE) [MJ]: A1-A3 0.92, A4 0.023, A5 0.00019, B1 0, B2 0, B3 0, B4 0, B5 0, B6 0, C1 0, C2 0.013, C3 0, C4 0.06, D -1.6
- Nicht-erneuerbare Primärenergie zur stofflichen Nutzung (PENRM) [MJ]: A1-A3 5.2, A4 0, A5 0, B1 0, B2 0, B3 0, B4 0, B5 0, B6 0, C1 0, C2 0, C3 0, C4 0, D 0
- Total nicht erneuerbare Primärenergie (PENRT) [MJ]: A1-A3 6.2, A4 0.023, A5 0.00019, B1 0, B2 0, B3 0, B4 0, B5 0, B6 0, C1 0, C2 0.013, C3 0, C4 0.06, D -1.6
- Einsatz von Sekundärstoffen (SM) [kg]: A1-A3 0.002
- Erneuerbare Sekundärbrennstoffe (RSF) [MJ]: A1-A3 0, A4 0, A5 0, B1 0, B2 0, B3 0, B4 0, B5 0, B6 0, C1 0, C2 0, C3 0, C4 0, D 0
- Nicht erneuerbare Sekundärbrennstoffe (NRSF) [MJ]: A1-A3 0, A4 0, A5 0, B1 0, B2 0, B3 0, B4 0, B5 0, B6 0, C1 0, C2 0, C3 0, C4 0, D 0
- Einsatz von Süßwasserressourcen (FW) [m^3]: A1-A3 0.00097, A4 9e-7, A5 1.2e-6, B1 0, B2 0, B3 0, B4 0, B5 0, B6 0, C1 0, C2 4.8e-7, C3 0, C4 0.0003, D -0.00021

## Outputs
- Gefährlicher Abfall zur Deponie (HWD) [kg]: A1-A3 0.00025, A4 1e-7, A5 2.4e-8, B1 0, B2 0, B3 0, B4 0, B5 0, B6 0, C1 0, C2 5.6e-8, C3 0, C4 4.2e-6, D -0.00017
- Entsorgter nicht gefährlicher Abfall (NHWD) [kg]: A1-A3 0.012, A4 4.5e-6, A5 1.4e-5, B1 0, B2 0, B3 0, B4 0, B5 0, B6 0, C1 0, C2 2.4e-6, C3 0, C4 0.019, D -0.0025
- Entsorgter radioaktiver Abfall (RWD) [kg]: A1-A3 0.00013, A4 3.3e-8, A5 9.3e-9, B1 0, B2 0, B3 0, B4 0, B5 0, B6 0, C1 0, C2 1.8e-8, C3 0, C4 2.4e-6, D -6.6e-5
- Komponenten für die Wiederverwendung (CRU) [kg]: A1-A3 0, A4 0, A5 0, B1 0, B2 0, B3 0, B4 0, B5 0, B6 0, C1 0, C2 0, C3 0, C4 0, D 0
- Stoffe zum Recycling (MFR) [kg]: A1-A3 0, A4 0, A5 0, B1 0, B2 0, B3 0, B4 0, B5 0, B6 0, C1 0, C2 0, C3 0, C4 0, D 0.018
- Stoffe für die Energierückgewinnung (MER) [kg]: A1-A3 0, A4 0, A5 0.00032, B1 0, B2 0, B3 0, B4 0, B5 0, B6 0, C1 0, C2 0, C3 0, C4 0.05
- Exportierte elektrische Energie (EEE) [MJ]: A1-A3 0, A4 0, A5 0.00038, B1 0, B2 0, B3 0, B4 0, B5 0, B6 0, C1 0, C2 0, C3 0, C4 0.24
- Exportierte thermische Energie (EET) [MJ]: A1-A3 0, A4 0, A5 0.00095, B1 0, B2 0, B3 0, B4 0, B5 0, B6 0, C1 0, C2 0, C3 0, C4 0.65

## Impact indicators
- Globales Erwärmungspotenzial (GWP) [kg CO_(2)-Äq.]: A1-A3 0.28, A4 0.0017, A5 0.00041, B1 0, B2 0, B3 0, B4 0, B5 0, B6 0, C1 0, C2 0.00092, C3 0, C4 0.13, D -0.11
- Abbau Potential der stratosphärischen Ozonschicht (ODP) [kg CFC11-Äq.]: A1-A3 8.4e-11, A4 4.1e-15, A5 4.3e-16, B1 0, B2 0, B3 0, B4 0, B5 0, B6 0, C1 0, C2 2.2e-15, C3 0, C4 3.8e-13, D -3.5e-12
- Versauerungspotenzial von Boden und Wasser (AP) [kg SO_(2)-Äq.]: A1-A3 0.00062, A4 7.8e-6, A5 1.6e-7, B1 0, B2 0, B3 0, B4 0, B5 0, B6 0, C1 0, C2 4.2e-6, C3 0, C4 3.2e-5, D -0.00024
- Eutrophierungspotenzial (EP) [kg PO_(4)^(3)-Äq.]: A1-A3 6.9e-5, A4 1.9e-6, A5 2.9e-8, B1 0, B2 0, B3 0, B4 0, B5 0, B6 0, C1 0, C2 1e-6, C3 0, C4 2.5e-6, D -2.4e-5
- Bildungspotential für troposphärisches Ozon (POCP) [kg Ethen-Äq.]: A1-A3 8.5e-5, A4 -2.6e-6, A5 9.8e-9, B1 0, B2 0, B3 0, B4 0, B5 0, B6 0, C1 0, C2 -1.4e-6, C3 0, C4 1.6e-6, D -2.7e-5
- Potenzial für den abiotischen Abbau nicht fossiler Ressourcen (ADPE) [kg Sb-Äq.]: A1-A3 5.3e-6, A4 8e-11, A5 2.3e-11, B1 0, B2 0, B3 0, B4 0, B5 0, B6 0, C1 0, C2 4.3e-11, C3 0, C4 8.3e-9, D -3e-6
- Potenzial für den abiotischen Abbau fossiler Brennstoffe (ADPF) [MJ]: A1-A3 5.8, A4 0.023, A5 0.00016, B1 0, B2 0, B3 0, B4 0, B5 0, B6 0, C1 0, C2 0.013, C3 0, C4 0.054, D -1.4

## Use advice
Gültigkeitsbereich:
Dieses Dokument bezieht sich auf die Herstellung, den Transport, den Einbau, den Betrieb und die Entsorgung von runden Volumenstrombegrenzern mit optionalem Zubehör für raumlufttechnische Anlagen. Die Produkte werden ausschließlich in Deutschland im Werk Weener produziert, in dem die Produktionsdaten des Jahres 2012 erhoben wurden.
Systemgrenze:
Die Systemgrenze der EPD vom Typ "Wiege bis Bahre" folgt dem modularen Aufbau gemäß /EN 15804/. Die Ökobilanz des betrachteten Produkts berücksichtigt die Module A, B, C und D:

A1-A3 (Produktionsstadium): Rohstoffbereitstellung, Transport zum Hersteller, Herstellung (incl. Energie und Wasserbereitstellung, Bereitstellung von Hilfsstoffen, Entsorgung von Abfällen)

A4-A5 (Einrichten eines Bauwerks): Transport zur Baustelle, Einbau in das Gebäude, Verwertung von Verpackungsabfällen

B1-B5 (Nutzungsstadium): Nutzung des eingebauten Produkts

B6 (Nutzungsstadium - Betrieb des Gebäudes): Einsatz von elektrischer Energie für das Produkt

C1-C4 (Entsorgungsstadium): Rückbau des Produkts, Transport zur Abfallbehandlung, Abfallbehandlung, Entsorgung

D (Gutschriften): Recyclingpotential

## Data sources
- Volumenstrombegrenzer VRL.pdf
- GaBi Database (all versions)
- GaBi database SP27 2015
