# Rhepanol hfk

Dataset: ILCD process, EPD, specific dataset
Geography: DE
Reference year: 2015
Valid until: 2020
Classification: OEKOBAU.DAT: Kunststoffe / Dachbahnen / PIB-Dachbahnen (Polyisobutylen)
Classification: IBUCategories: 02 Bauprodukte / Abdichtungen / Dach- und Dichtungsbahnsysteme aus Kunststoffen und Elastomeren
Method details: Dach- und Dichtungsbahnsysteme aus Kunststoffen und Elastomeren.pdf
Owner: FDT FlachdachTechnologie GmbH &. Co. KG
Compliance: DIN EN 15804; ISO 14025
Review: Accredited third party review by IBU
Amounts: rows without a unit in brackets have none in this file; such an amount is in the reference unit of its flow, which a separate flow dataset defines
copyright: true

## General comment
Rhepanol hfk ist eine bitumenverträgliche
Polyisobutylen (PIB)-Kunststoffdachbahn, bestehend
aus hochmolekularem PIB, Copolymeren und
funktionellen Zusatzstoffen sowie einem unterseitigen
Kunststoffvlies. Zur Nahtfügung wird Rhepanol hfk heißluftverschweißt.

## Technology and included processes
Grundstoffe/Hilfsstoffe: Rhepanol hfk besteht aus einer Dichtschicht mit 50-65 % Polyisobutylen (PIB) und Copolymeren, 30-45 % Flammschutzmittel (Metallhydroxid) und funktionellen mineralogischen Zuschlagsstoffen, 2-10 % Titandioxid und 0,5-2,0 % Ruß und Additiven. Daneben ist Rhepanol hfk mit einem rückseitigen Kunststoffvlies verstärkt. Herstellung: Die Herstellung der Rhepanol hfk-Compounds erfolgt über einen kontinuierlich arbeitenden Kneter, in dem die einzelnen Rohstoffe zu einer homogenen Masse vermischt und anschließend granuliert werden. Das Granulat wird über einen weiteren Mischextruder sowie einen Walzenmischer auf einen Kalander gegeben, der die Bahn ausformt. In einem weiteren Prozessschritt wird in gleicher Weise die Oberfolie hergestellt und auf die bereits bestehende Unterfolie aufgebracht. Anschließend werden Kunststoffbahn und Polyestervlies kraftschlüssig zusammengefügt. Am Ende des Fertigungsprozesses erfolgt die Konfektionierung der Dachbahnen.
Deklarierte Einheit:
Die deklarierte Einheit ist 1 m² produzierte Dachbahn Rhepanol hfk 1,5 mm.

## Technical purpose
Rhepanol hfk wird für die Abdichtung sowohl
von flachen und geneigten Dächern im mechanisch
befestigten bzw. verklebten Schichtenaufbau als
auch für bekieste oder genutzte Dächer, mit
Ausnahme von begrünten Dächern, eingesetzt.

Bei der Verarbeitung ist die Verlegeanleitung des

Herstellers einzuhalten.

## Reference product
- 1 m² Dachbahn: 1

## Inputs
- Erneuerbare Primärenergie als Energieträger (PERE) [MJ]: A1-A3 14.4
- Erneuerbare Primärenergie zur stofflichen Nutzung (PERM) [MJ]: A1-A3 0
- Total erneuerbare Primärenergie (PERT) [MJ]: A1-A3 14.4
- Nicht-erneuerbare Primärenergie als Energieträger (PENRE) [MJ]: A1-A3 98
- Nicht-erneuerbare Primärenergie zur stofflichen Nutzung (PENRM) [MJ]: A1-A3 61
- Total nicht erneuerbare Primärenergie (PENRT) [MJ]: A1-A3 159
- Einsatz von Sekundärstoffen (SM) [kg]: A1-A3 0
- Erneuerbare Sekundärbrennstoffe (RSF) [MJ]: A1-A3 0
- Nicht erneuerbare Sekundärbrennstoffe (NRSF) [MJ]: A1-A3 0
- Einsatz von Süßwasserressourcen (FW) [m^3]: A1-A3 0.0392

## Outputs
- Gefährlicher Abfall zur Deponie (HWD) [kg]: A1-A3 5.87e-5
- Entsorgter nicht gefährlicher Abfall (NHWD) [kg]: A1-A3 0.427
- Entsorgter radioaktiver Abfall (RWD) [kg]: A1-A3 0.00488
- Komponenten für die Wiederverwendung (CRU) [kg]: A1-A3 0
- Stoffe zum Recycling (MFR) [kg]: A1-A3 0
- Stoffe für die Energierückgewinnung (MER) [kg]: A1-A3 0
- Exportierte elektrische Energie (EEE) [MJ]: A1-A3 0
- Exportierte thermische Energie (EET) [MJ]: A1-A3 0

## Impact indicators
- Globales Erwärmungspotenzial (GWP) [kg CO_(2)-Äq.]: A1-A3 7.63
- Abbau Potential der stratosphärischen Ozonschicht (ODP) [kg CFC11-Äq.]: A1-A3 9.62e-10
- Versauerungspotenzial von Boden und Wasser (AP) [kg SO_(2)-Äq.]: A1-A3 0.0257
- Eutrophierungspotenzial (EP) [kg PO_(4)^(3)-Äq.]: A1-A3 0.00165
- Bildungspotential für troposphärisches Ozon (POCP) [kg Ethen-Äq.]: A1-A3 0.00298
- Potenzial für den abiotischen Abbau nicht fossiler Ressourcen (ADPE) [kg Sb-Äq.]: A1-A3 4.11e-5
- Potenzial für den abiotischen Abbau fossiler Brennstoffe (ADPF) [MJ]: A1-A3 147

## Use advice
Gültigkeitsbereich:
Die Deklaration gilt für die Dachbahn Rhepanol hfk mit der Dicke 1,5 mm, die in 68199 Mannheim-Neckarau gefertigt wird.
Systemgrenze:
Diese Ökobilanz adressiert das Lebenszyklusstadium der Produktherstellung (Wiege bis Werkstor). Das Produktstadium umfasst die Module A1 (Rohstoffbereitstellung), A2 (Transport), A3 (Herstellung) gemäß der /EN 15804/ einschließlich der Bereitstellung von allen Stoffen, Produkten und Energie. Abfälle gibt es in A1-A3 nur solche, die intern wieder rezykliert werden.

## Data sources
- Rhepanol hfk.pdf
- GaBi Database (all versions)
- GaBi database SP25 2014
