# Schichtstoff mit farbigem Kern

Dataset: ILCD process, EPD, specific dataset
Geography: DE
Reference year: 2015
Valid until: 2020
Classification: OEKOBAU.DAT: Beschichtungen / Innenbeschichtungen / Wand- und Deckenbeläge
Classification: IBUCategories: 02 Bauprodukte / Inneneinrichtung / Schichtpressstoffe
Method details: Schichtpressstoffe.pdf
Owner: Fritz EGGER GmbH & Co.OG
Compliance: DIN EN 15804; ISO 14025
Review: Accredited third party review by IBU
Amounts: rows without a unit in brackets have none in this file; such an amount is in the reference unit of its flow, which a separate flow dataset defines
copyright: true

## General comment
EGGER Schichtstoff mit farbigem Kern ist ein dekorativer Schichtstoff auf Basis härtbarer Harze (Schichtpressstoffe). Dieser Schichtpressstoff besteht aus Zellulosefaserbahnen (Papier), die mit wärmehärtenden Harzen imprägniert sind. Er ist mehrschichtig aufgebaut und besteht aus mehreren melaminharzimprägniertem Dekorpapieren, die unter hohem Druck und Wärme miteinander verpresst werden.

## Technology and included processes
EGGER Schichtstoff mit farbigem Kern ist ein dekorativer Schichtstoff auf Basis härtbarer Harze (Schichtpressstoffe). Dieser Schichtpressstoff besteht aus Zellulosefaserbahnen (Papier), die mit wärmehärtenden Harzen imprägniert sind. Er ist mehrschichtig aufgebaut und besteht aus mehreren melaminharzimprägniertem Dekorpapieren, die unter hohem Druck und Wärme miteinander verpresst werden. EGGER Schichtstoffe werden ausschließlich kontinuierlich hergestellt. Mittels Doppelbandpressen ist es möglich, unterschiedliche Schichtstoffdicken und Qualitäten endlos herzustellen. Diese Art der Schichtstoffherstellung bzw. -qualität wird im Allgemeinen als CPL (Continuous Pressed Laminates) bezeichnet. Abhängig vom Herstelldruck werden EGGER Schichtstoffe gemäß oder in Anlehnung an /EN 438-9:2010/ hergestellt. Die Schichtstoffe bestehen aus Schichten von Zellulosefaserstoffbahnen (üblicherweise Papier), die mit härtbaren Harzen imprägniert sind. Die einzelnen Papierschichten sind mit Harzen auf Melaminbasis imprägniert. Die Zufuhr von Wärme und Druck bewirkt ein Fließen und anschließendes Aushärten der Harze. Durch die Vernetzung der Harze, verstärkt durch die Zellulosefasern der Papiere, entsteht ein sehr dichtes Material mit geschlossener Oberfläche.
Technische Daten:
EGGER Schichtstoff mit farbigem Kern wird gemäß der in der /EN438-2:2016/ beschriebenen Prüfverfahren geprüft und erfüllt die in /EN 438-9:2010+A1/ beschriebenen Anforderungen. Im technischen Datenblatt "EGGER Schichtstoff mit farbigem Kern" finden Sie ausführliche Informationen zu den Qualitätsmerkmalen und Produkteigenschaften. www.egger.com/schichtstoffe
Deklarierte Einheit:
Die deklarierte Einheit ist ein Quadratmeter Schichtstoff mit farbigem Kern 0,8 mm (1,080 kg/m2).

## Technical purpose
Schichtstoffe sind nicht selbsttragend und dienen als Beschichtungsmaterial. EGGER Schichtstoffe sind nur für die Verwendung im Innenbereich geeignet. Die Schichtstoffqualität mit farbigem Kern wird hauptsächlich zur Beschichtung von Holzwerkstoffen, aber auch anderen Trägermaterialien - zur Herstellung sogenannter Verbundelemente für den Möbel- oder Innenausbau - verwendet.

## Reference product
- 1 m² Schichtstoff mit farbigem Kern (1.080 kg/m²): 1

## Inputs
- Erneuerbare Primärenergie als Energieträger (PERE) [MJ]: A1-A3 35.154, C4 0.0712258, D -1.02399
- Erneuerbare Primärenergie zur stofflichen Nutzung (PERM) [MJ]: A1-A3 6.86429, C4 0, D 0
- Total erneuerbare Primärenergie (PERT) [MJ]: A1-A3 42.0183, C4 0.0712258, D -1.02399
- Nicht-erneuerbare Primärenergie als Energieträger (PENRE) [MJ]: A1-A3 87.2551, C4 1.93312, D -10.0362
- Nicht-erneuerbare Primärenergie zur stofflichen Nutzung (PENRM) [MJ]: A1-A3 8.63571, C4 0, D 0
- Total nicht erneuerbare Primärenergie (PENRT) [MJ]: A1-A3 95.8908, C4 1.93312, D -10.0362
- Einsatz von Sekundärstoffen (SM) [kg]: A1-A3 0, C4 0, D 0
- Erneuerbare Sekundärbrennstoffe (RSF) [MJ]: A1-A3 0, C4 0, D 0
- Nicht erneuerbare Sekundärbrennstoffe (NRSF) [MJ]: A1-A3 0, C4 0, D 0
- Einsatz von Süßwasserressourcen (FW) [m^3]: A1-A3 0.0230104, C4 0.00459416, D -0.00206689

## Outputs
- Gefährlicher Abfall zur Deponie (HWD) [kg]: A1-A3 0.00260844, C4 8.04754e-5, D -2.90975e-6
- Entsorgter nicht gefährlicher Abfall (NHWD) [kg]: A1-A3 0.325133, C4 0.00221137, D -0.00301762
- Entsorgter radioaktiver Abfall (RWD) [kg]: A1-A3 0.00218658, C4 4.69899e-5, D -0.000727989
- Komponenten für die Wiederverwendung (CRU) [kg]
- Stoffe zum Recycling (MFR) [kg]
- Stoffe für die Energierückgewinnung (MER) [kg]
- Exportierte elektrische Energie (EEE) [MJ]: C4 2.01928
- Exportierte thermische Energie (EET) [MJ]: C4 4.66774

## Impact indicators
- Globales Erwärmungspotenzial (GWP) [kg CO_(2)-Äq.]: A1-A3 4.73, C4 1.99, D -0.587
- Abbau Potential der stratosphärischen Ozonschicht (ODP) [kg CFC11-Äq.]: A1-A3 4.32e-10, C4 7.82e-12, D -2.03e-10
- Versauerungspotenzial von Boden und Wasser (AP) [kg SO_(2)-Äq.]: A1-A3 0.0381, C4 0.00545, D -0.00158
- Eutrophierungspotenzial (EP) [kg PO_(4)^(3)-Äq.]: A1-A3 0.00355, C4 0.00142, D -0.000106
- Bildungspotential für troposphärisches Ozon (POCP) [kg Ethen-Äq.]: A1-A3 0.00314, C4 0.00032, D -0.000129
- Potenzial für den abiotischen Abbau nicht fossiler Ressourcen (ADPE) [kg Sb-Äq.]: A1-A3 4.28e-6, C4 2.49e-8, D -5.96e-8
- Potenzial für den abiotischen Abbau fossiler Brennstoffe (ADPF) [MJ]: A1-A3 90.4, C4 1.81, D -8.21

## Use advice
Gültigkeitsbereich:
Dieses Dokument bezieht sich auf den von der
EGGER Kunststoffe GmbH & Co.KG (eine Tochter der
Fritz EGGER GmbH & Co. OG) im Werk Gifhorn
(Deutschland) hergestellten Schichtstoff mit farbigem
Kern.
Systemgrenze:
Die vorliegende Studie stellt eine Cradle-to-Gate Betrachtung mit Optionen dar. Es werden Modul A1-A3, Modul C4 und Modul D betrachtet. Damit sind im betrachteten System Rohstoffversorgung, Transport, Herstellung und die energetische Nutzung des Produktes enthalten.

Das Referenzjahr der Datensammlung ist das Jahr 2013 im Werk Gifhorn, Deutschland.

Die folgenden Lebenszyklusphasen werden berücksichtigt:

- Produktstadium

- Entsorgungsstadium

- Gutschriften und Lasten außerhalb der Systemgrenzen

Die Systemgrenzen der EPD folgen dem modularen Ansatz der /EN 15804/.

## Data sources
- Schichtstoff mit farbigem Kern.pdf
- GaBi Database (all versions)
- GaBi database SP20 2013
