# Modulares Automatik-Antriebssystem für Schiebetüren ES 200 Produktfamilie

Dataset: ILCD process, EPD, specific dataset
Geography: DE
Reference year: 2016
Valid until: 2021
Classification: OEKOBAU.DAT: Komponenten von Fenstern und Vorhangfassaden / Antriebssysteme / elektrisch
Classification: IBUCategories: 02 Bauprodukte / Türen, Fenster, Beschläge und Zubehör / Antriebssysteme für Automatiktüren und -tore
Method details: Antriebssysteme für Automatiktüren und -tore.pdf
Registration number: 8932
Owner: DORMA Deutschland GmbH
Compliance: DIN EN 15804; ISO 14025
Review: Accredited third party review by Institut Bauen und Umwelt e. V.
Amounts: rows without a unit in brackets have none in this file; such an amount is in the reference unit of its flow, which a separate flow dataset defines
copyright: true

## General comment
Das innovative Schiebetür-Antriebssystem ES 200 bietet passgenaue Lösungen für alle Anwendungsgebiete und Einsatzbereiche. Mit dem ES 200 bietet DORMA ein Antriebssystem, das durch den modularen Aufbau mit einer geringen Anzahl von Komponenten alle Anwendungsbereiche abdeckt. Das modulare und flexible Antriebssystem steht in den nachfolgenden Varianten zur Verfügung:

ES 200 Standard
ES 200 2D
ES 200 EASY
ES 200 EASYplus

Die Produktfamilie des modularen automatischen Antriebssystems ES 200 steht stellvertretend für alle oben genannten Varianten. Die gewichtete Durchschnittsbildung (Stoff- und Energieströme) erfolgt anhand der im Bezugszeitraum anteilig verkauften Menge der analysierten ES 200 Varianten.

## Technology and included processes
Das innovative Schiebetür-Antriebssystem ES 200 bietet passgenaue Lösungen für alle Anwendungsgebiete und Einsatzbereiche. Mit dem ES 200 bietet DORMA ein Antriebssystem, das durch den modularen Aufbau mit einer geringen Anzahl von Komponenten alle Anwendungsbereiche abdeckt. Das modulare und flexible Antriebssystem steht in den nachfolgenden Varianten zur Verfügung:  ES 200 Standard  ES 200 2D  ES 200 EASY  ES 200 EASYplus Die Produktfamilie des modularen automatischen Antriebssystems ES 200 steht stellvertretend für alle oben genannten Varianten. Die gewichtete Durchschnittsbildung (Stoff- und Energieströme) erfolgt anhand der im Bezugszeitraum anteilig verkauften Menge der analysierten ES 200 Varianten. Die Antriebseinheiten der ES 200 Produktfamilie und deren Leiterplatinen werden im DORMA Werk Ennepetal gefertigt. Das zertifizierte Qualitätsmanagementsystem nach /DIN EN ISO 9001/ sichert den hohen Qualitätsstandard der DORMA Produkte ab und gewährleistet eine kontinuierliche Verbesserung der Gesamtqualität von Prozessen und Produkten an den DORMA Standorten.
Technische Daten:
Folgende technische Daten sind für die Ökobilanz relevant:
Deklarierte Einheit:
Die deklarierte Einheit ist der Durchschnitt für ein (1) Stück des modularen Automatikantriebsystems für Schiebetüren, gemittelt aus den Vertriebsmengen der Varianten:

ES 200 Standard
ES 200-2D
ES 200 EASY
ES 200 EASYplusinklusive der jeweiligen Verpackungsmaterialien.

## Technical purpose
Das automatische Antriebssystem ES 200 wird als automatischer Antrieb zur Automatisierung von Schiebetüranlagen sowie zur Automatisierung von Flucht- und Rettungswegen wie folgt eingesetzt:

## Reference product
- Modulares Automatik-Antriebssystem für Schiebetüren ES 200 Produktfamilie (Modulares Automatik-Antriebssystem für Schiebetüren ES 200 Produktfamilie ): 1

## Inputs
- Erneuerbare Primärenergie als Energieträger (PERE) [MJ]: A1-A3 668, A4 0.446, A5 0.212, B3 36.7, B6 2930, C2 0.145, C3 4.9, D -698
- Erneuerbare Primärenergie zur stofflichen Nutzung (PERM) [MJ]: A1-A3 87.1, A4 4.22e-13, A5 6.97e-12, B3 1.75, B6 8.22e-8, C2 1.37e-13, C3 1.78e-5, D 2.87e-7
- Total erneuerbare Primärenergie (PERT) [MJ]: A1-A3 756, A4 0.446, A5 0.212, B3 38.4, B6 2930, C2 0.145, C3 4.9, D -698
- Nicht-erneuerbare Primärenergie als Energieträger (PENRE) [MJ]: A1-A3 3070, A4 7.99, A5 2.22, B3 491, B6 13900, C2 2.6, C3 130, D -1960
- Nicht-erneuerbare Primärenergie zur stofflichen Nutzung (PENRM) [MJ]: A1-A3 45.2, A4 0, A5 0, B3 0.0218, B6 0, C2 0, C3 7.41e-10, D 1.77e-11
- Total nicht erneuerbare Primärenergie (PENRT) [MJ]: A1-A3 3110, A4 7.99, A5 2.22, B3 491, B6 13900, C2 2.6, C3 130, D -1960
- Einsatz von Sekundärstoffen (SM) [kg]: A1-A3 5.15, A4 0, A5 0, B3 0, B6 0, C2 0, C3 0, D 0
- Erneuerbare Sekundärbrennstoffe (RSF) [MJ]: A1-A3 0.0788, A4 5.3e-5, A5 7.94e-5, B3 0.00362, B6 0.184, C2 1.73e-5, C3 0.00213, D 0.0586
- Nicht erneuerbare Sekundärbrennstoffe (NRSF) [MJ]: A1-A3 0.688, A4 0.000555, A5 0.000369, B3 0, B6 1.92, C2 0.000181, C3 0.0153, D 0.714
- Einsatz von Süßwasserressourcen (FW) [m^3]: A1-A3 1320, A4 0.0358, A5 0.197, B3 45.5, B6 2640, C2 0.0116, C3 6.3, D -1780

## Outputs
- Gefährlicher Abfall zur Deponie (HWD) [kg]: A1-A3 0.0775, A4 0, A5 0, B3 0.032, B6 0, C2 0, C3 0, D 0.0694
- Entsorgter nicht gefährlicher Abfall (NHWD) [kg]: A1-A3 719, A4 0.0301, A5 0.443, B3 244, B6 3230, C2 0.00979, C3 11.7, D -243
- Entsorgter radioaktiver Abfall (RWD) [kg]: A1-A3 0.184, A4 1.09e-5, A5 0.000135, B3 0.013, B6 2.09, C2 3.55e-6, C3 0.00428, D -0.106
- Komponenten für die Wiederverwendung (CRU) [kg]: A1-A3 0, A4 0, A5 0, B3 0, B6 0, C2 0, C3 0, D 0
- Stoffe zum Recycling (MFR) [kg]: A1-A3 3.11, A4 0, A5 0, B3 6.09, B6 0, C2 0, C3 25.6, D 0
- Stoffe für die Energierückgewinnung (MER) [kg]: A1-A3 0, A4 0, A5 4.91, B3 1.48, B6 0, C2 0, C3 3.83, D 0
- Exportierte elektrische Energie (EEE) [MJ]: A1-A3 0, A4 0, A5 9.31, B3 2.79, B6 0, C2 0, C3 11.7, D 0
- Exportierte thermische Energie (EET) [MJ]: A1-A3 0, A4 0, A5 21.9, B3 7.25, B6 0, C2 0, C3 28.7, D 0

## Impact indicators
- Globales Erwärmungspotenzial (GWP) [kg CO_(2)-Äq.]: A1-A3 224, A4 0.58, A5 7.13, B3 43.4, B6 781, C2 0.189, C3 14.7, D -154
- Abbau Potential der stratosphärischen Ozonschicht (ODP) [kg CFC11-Äq.]: A1-A3 2.47e-6, A4 2.37e-12, A5 3.43e-11, B3 3.64e-7, B6 5.82e-7, C2 7.73e-13, C3 1.04e-7, D -3.93e-6
- Versauerungspotenzial von Boden und Wasser (AP) [kg SO_(2)-Äq.]: A1-A3 1.37, A4 0.00373, A5 0.00152, B3 0.575, B6 3.93, C2 0.0012, C3 0.0182, D -0.785
- Eutrophierungspotenzial (EP) [kg PO_(4)^(3)-Äq.]: A1-A3 0.109, A4 0.000957, A5 0.000267, B3 0.0188, B6 0.214, C2 0.000307, C3 0.00166, D -0.0429
- Bildungspotential für troposphärisches Ozon (POCP) [kg Ethen-Äq.]: A1-A3 0.0912, A4 -0.00155, A5 0.00011, B3 0.0265, B6 0.229, C2 -0.000493, C3 0.00159, D -0.0501
- Potenzial für den abiotischen Abbau nicht fossiler Ressourcen (ADPE) [kg Sb-Äq.]: A1-A3 0.0119, A4 2.26e-8, A5 1.2e-7, B3 0.00588, B6 0.000124, C2 7.35e-9, C3 1.18e-5, D -0.000173
- Potenzial für den abiotischen Abbau fossiler Brennstoffe (ADPF) [MJ]: A1-A3 2540, A4 7.96, A5 1.88, B3 442, B6 8710, C2 2.59, C3 120, D -1700

## Use advice
Gültigkeitsbereich:
Die EPD bezieht sich auf den gesamten Lebensweg eines durchschnittlichen ES 200 Antriebsystems. Die unterschiedlichen technischen Eigenschaften werden in Kapitel 2.3 dargestellt.

Produktionsstandort des Produkts ist der DORMA Produktionsstandort Ennepetal, Deutschland. Daneben werden Produktkomponenten von dem DORMA Standort Bonn bezogen. Die Stoff- und Energieströme wurden entsprechend berücksichtigt.
Systemgrenze:
Typ der EPD: Wiege bis Bahre (mit Optionen)

Berücksichtigt werden gemäß /DIN EN 15804/ folgende Module:

Module A1-3, A4 und A5 Das Produktstadium beginnt mit der Berücksichtigung der Gewinnung notwendiger Rohstoffe, sowie Energien inklusive aller entsprechenden Vorketten. Dies umfasst ebenfalls die Berücksichtigung entsprechender Beschaffungstransporte. Weiterhin wurde die gesamte Herstellungsphase am Produktionsstandort Ennepetal abgebildet, inkl. der Behandlung von Produktionsabfällen bis zum Erreichen des End-of-Waste Status (EoW). Zudem wurden ebenfalls die Distributionstransporte und der Einbau ins Gebäude über die Verwertung der Verpackungsabfälle berücksichtigt.

Modul B3

Das Modul beinhaltet das Auswechseln von Verschleißteilen über die gesamte Nutzungsdauer von 10 Jahren.

Modul B6

Das Modul beinhaltet den Energieverbrauch für den Betrieb der deklarierten ES 200 Antriebseinheiten über die gesamte Nutzungsdauer von 10 Jahren.

Module C2-3

Die Module beinhalten die Umweltwirkungen für die Behandlung der Abfallfraktionen bis zum Erreichen des End-of-Waste Status (EoW) inklusive der zugehörigen Transporte am Ende des Produktlebenswegs.

Modul D

Ausweis der aus der Abfallbehandlung resultierenden Gutschriften, resultierend aus einer energetischen (MVA-Route) oder werkstofflichen Verwertung (Recycling-Route) von Verpackungen (A5), der Ersatzteile (B3) und des Produktes im End of Life (C3).

## Data sources
- Modulares Automatik-Antriebssystem für Schiebetüren ES 200 Produktfamilie .pdf
- GaBi Database (all versions)
- GaBi database SP28 2015
